// SBML level 2 version 3

model cwc_8_7_07_1a_2ar()
  // Chang2008 - ERK activation, hallucinogenic drugs mediated signalling through serotonin receptors
  // This model is described in the article:
  // Towards a quantitative representation of the cell signaling mechanisms of hallucinogens: measurement and mathematical modeling of 5-HT1A and 5-HT2A receptor-mediated ERK1/2 activation.
  // Chang CW, Poteet E, Schetz JA, Gümü? ZH, Weinstein H.
  // Neuropharmacology 2009; 56 Suppl 1: 213-225
  // Abstract:
  // Through a multidisciplinary approach involving experimental and computational studies, we address quantitative aspects of signaling mechanisms triggered in the cell by the receptor targets of hallucinogenic drugs, the serotonin 5-HT2A receptors. To reveal the properties of the signaling pathways, and the way in which responses elicited through these receptors alone and in combination with other serotonin receptors' subtypes (the 5-HT1AR), we developed a detailed mathematical model of receptor-mediated ERK1/2 activation in cells expressing the 5-HT1A and 5-HT2A subtypes individually, and together. In parallel, we measured experimentally the activation of ERK1/2 by the action of selective agonists on these receptors expressed in HEK293 cells. We show here that the 5-HT1AR agonist Xaliproden HCl elicited transient activation of ERK1/2 by phosphorylation, whereas 5-HT2AR activation by TCB-2 led to higher, and more sustained responses. The 5-HT2AR response dominated the MAPK signaling pathway when co-expressed with 5-HT1AR, and diminution of the response by the 5-HT2AR antagonist Ketanserin could not be rescued by the 5-HT1AR agonist. Computational simulations produced qualitative results in good agreement with these experimental data, and parameter optimization made this agreement quantitative. In silico simulation experiments suggest that the deletion of the positive regulators PKC in the 5-HT2AR pathway, or PLA2 in the combined 5-HT1A/2AR model greatly decreased the basal level of active ERK1/2. Deletion of negative regulators of MKP and PP2A in 5-HT1AR and 5-HT2AR models was found to have even stronger effects. Under various parameter sets, simulation results implied that the extent of constitutive activity in a particular tissue and the specific drug efficacy properties may determine the distinct dynamics of the 5-HT receptor-mediated ERK1/2 activation pathways. Thus, the mathematical models are useful exploratory tools in the ongoing efforts to establish a mechanistic understanding and an experimentally testable representation of hallucinogen-specific signaling in the cellular machinery, and can be refined with quantitative, function-related information.
  // This model is hosted on BioModels Database and identified by: MODEL0975191032.
  // To cite BioModels Database, please use: BioModels Database: An enhanced, curated and annotated resource for published quantitative kinetic models.
  // To the extent possible under law, all copyright and related or neighbouring rights to this encoded model have been dedicated to the public domain worldwide. Please refer to CC0 Public Domain Dedication for more information.
  // biomodels.db:MODEL0975191032
  // isDescribedBy pubmed:18762202
  // hasTaxon taxonomy:9606

  // Compartments:
  compartment cell = 1;

  // Species:
  species TCB in cell = 0.01;  // substance in mole
  species cpxERK_PP_MKP_PP in cell = 0.010263;  // substance in mole
  species cpxERKP_MKP_PP in cell = 0.003791;  // substance in mole
  species cpxERKP_MKP_PPstar in cell = 0.0018979;  // substance in mole
  species Rafstarstar in cell = 0.0021849;  // substance in mole
  species cpxMEKPP_PP2A in cell = 0.00030847;  // substance in mole
  species cpxRafstarstar_PP2A in cell = 2.2131e-5;  // substance in mole
  species cpxERKPP_Rafstar in cell = 2.2131e-5;  // substance in mole
  species cpxRafstar_PP2A in cell = 0.00058373;  // substance in mole
  species ERK_PP in cell = 0.0090591;  // substance in mole
  species cpxERKP_MEKPP in cell = 6.2945e-5;  // substance in mole
  species cpxERK_MEK_PP in cell = 0.094895;  // substance in mole
  species MEK_PP in cell = 0.030392;  // substance in mole
  species cpxERK_MKP_PP in cell = 0.066479;  // substance in mole
  species MKP in cell = 0.48458;  // substance in mole
  species PLA2star_Ca in cell = 3.1036e-5;  // substance in mole
  species PLA2_Ca in cell = 0.00012445;  // substance in mole
  species cpxERKPP_MKP in cell = 0.0054982;  // substance in mole
  species PLA2star in cell = 1.489e-5;  // substance in mole
  species cpxERKPP_PLA2star in cell = 2.5313e-7;  // substance in mole
  species Ca in cell = 0.034739;  // substance in mole
  species PLA2 in cell = 0.00035823;  // substance in mole
  species MKP_PP in cell = 0.027491;  // substance in mole
  species ERK_P in cell = 0.010356;  // substance in mole
  species ERK in cell = 0.15768;  // substance in mole
  species cpxMEKP_Rafstar in cell = 0.017627;  // substance in mole
  species cpxMEKP_PP2A in cell = 0.00049691;  // substance in mole
  species PP2A in cell = 0.15859;  // substance in mole
  species MEK_P in cell = 0.048958;  // substance in mole
  species cpxMEK_Rafstar in cell = 0.028395;  // substance in mole
  species MEK in cell = 0.078866;  // substance in mole
  species Rafstar in cell = 0.057628;  // substance in mole
  species cpxRasGTP_Raf in cell = 0.023412;  // substance in mole
  species Raf in cell = 0.030124;  // substance in mole
  species RasGTP in cell = 0.02024;  // substance in mole
  species RasGAP in cell = 0.00041421;  // substance in mole
  species RasGDP in cell = 0.076348;  // substance in mole
  species $PIP2 in cell = 2.6578;  // substance in mole
  species Pi in cell = 618.69;  // substance in mole
  species RGS4 in cell = 0.019994;  // substance in mole
  species cpxRGS4_Gq_a_GTP in cell = 6.4168e-6;  // substance in mole
  species cpxA_2AR_Gq in cell = 0;  // substance in mole
  species cpx2AR_Gqtrimer in cell = 0.37759;  // substance in mole
  species ht2AR in cell = 1.0192;  // substance in mole
  species ht2AR_internal in cell = 0.010192;  // substance in mole
  species A_2AR_i_deg in cell = 0;  // substance in mole
  species cpxA_2AR_internal in cell = 0;  // substance in mole
  species cpxA_2AR in cell = 0;  // substance in mole
  species Gq_trimer in cell = 0.61869;  // substance in mole
  species Gq_a_GTP in cell = 0.00064172;  // substance in mole
  species Gq_betagamma in cell = 0.0037173;  // substance in mole
  species Gq_a_GDP in cell = 0.0027739;  // substance in mole
  species PLCb in cell = 0.090022;  // substance in mole
  species PLCb_Gq_a_GTP in cell = 0.00014492;  // substance in mole
  species PLCb_Ca in cell = 0.0093825;  // substance in mole
  species PLCb_Ca_Gq_a_GTP in cell = 0.00015038;  // substance in mole
  species IP3 in cell = 0.21952;  // substance in mole
  species DAG in cell = 0.055555;  // substance in mole
  species PKC in cell = 0.062951;  // substance in mole
  species PKC_Ca in cell = 0.0026242;  // substance in mole
  species PKC_DAG in cell = 0.58385;  // substance in mole
  species PKC_DAG_AA in cell = 0.031811;  // substance in mole
  species APC in cell = 23.496;  // substance in mole
  species AA in cell = 6.0539;  // substance in mole
  species PKC_Ca_AA in cell = 0.00019064;  // substance in mole
  species PKC_AA in cell = 0.00045732;  // substance in mole
  species PIP2_PLA2_Ca in cell = 0.0027563;  // substance in mole
  species RasGEF in cell = 0.072743;  // substance in mole
  species RasGEF_star in cell = 0.027257;  // substance in mole
  species RasGAP_star in cell = 0.0015858;  // substance in mole
  species PIP2_PLA2 in cell = 0.39671;  // substance in mole
  species PKC_Ca_DAG in cell = 1.3507e-7;  // substance in mole
  species PKC_Ca_DAGactive in cell = 1.3507e-6;  // substance in mole
  species PKC_DAG_AAactive_1 in cell = 0.31811;  // substance in mole
  species PA in cell = 83332;  // substance in mole
  species PI in cell = 94.922;  // substance in mole
  species PIP in cell = 1.8983;  // substance in mole
  species PI3K in cell = 0.16;  // substance in mole
  species Gi_br_PI3K in cell = 0;  // substance in mole
  species PI3Kstar in cell = 0;  // substance in mole
  species PIP2_PI3Kstar in cell = 0;  // substance in mole
  species PIP3 in cell = 0;  // substance in mole
  species Src in cell = 0.2;  // substance in mole
  species cpxSrc_PIP3 in cell = 0;  // substance in mole
  species Src_star in cell = 0;  // substance in mole
  species Csk in cell = 0.3;  // substance in mole
  species cpxCsk_Srcstar in cell = 0;  // substance in mole
  species PTEN in cell = 0.164;  // substance in mole
  species cpxPTEN_PIP3 in cell = 0;  // substance in mole
  species cpxA_HT1AR_internal in cell = 0;  // substance in mole
  species A_HT1R_i_deg in cell = 0;  // substance in mole
  species HT1AR_internal in cell = 0;
  species HT1AR in cell = 1.6929;  // substance in mole
  species cpxA_HT1AR in cell = 0;  // substance in mole
  species Gitrimer in cell = 1;  // substance in mole
  species cpxHT1AR_Gitrimer in cell = 0;  // substance in mole
  species cpxA_R1A_Gi in cell = 0;  // substance in mole
  species Gi_betagamma in cell = 0;  // substance in mole
  species Gi_a_GTP in cell = 0;  // substance in mole
  species Gi_a_GDP in cell = 0;  // substance in mole
  species cpxRGS4_Gi_a_GTP_1 in cell = 0;  // substance in mole
  species RGS4_1 in cell = 0.02;  // substance in mole
  species Shc in cell = 0.45;  // substance in mole
  species serotonin in cell = 0;  // substance in mole
  species Grb2 in cell = 0.255;  // substance in mole
  species Sos in cell = 0.12;  // substance in mole
  species Shc_star in cell = 0;  // substance in mole
  species Shcstar_Grb2 in cell = 0;  // substance in mole
  species Grb2_sos in cell = 0;  // substance in mole
  species Shcstar_Grb2_Sos in cell = 0;  // substance in mole
  species cpxRasGDP_Shcstar_Grb2_Sos in cell = 0;  // substance in mole
  species Grb2_sos_P in cell = 0;  // substance in mole
  species Ketanserin in cell = 0;
  species cpxKetanserin_2AR in cell = 0;
  species cpxKetanserin_2ARGq in cell = 0;
  species productX in cell = 0;

  // Reactions:
  // releaseERKP_MKPPP
  v57_w3: cpxERKP_MKP_PP -> ERK_P + MKP_PP; cell*(k67*cpxERKP_MKP_PP - k67r*ERK_P*MKP_PP);
    k67 = 1 ps; k67r = 10 pMps;
  // v56_w1, h1, ERKPP_bindsMKPPP
  v56_w1: MKP_PP + ERK_PP -> cpxERK_PP_MKP_PP; cell*(k65*MKP_PP*ERK_PP - k65r*cpxERK_PP_MKP_PP);
    k65 = 45 pMps; k65r = 1 ps;
  // releaseERKP_MKP_PP
  w2: cpxERK_PP_MKP_PP => cpxERKP_MKP_PP; cell*k66*cpxERK_PP_MKP_PP;
    k66 = 0.092 ps;
  // releasePP2A_Rafstar
  releaseRafstarstar: cpxRafstarstar_PP2A => PP2A + Rafstar; cell*k54*cpxRafstarstar_PP2A;
    k54 = 6 ps;
  // Rafstarstar_bindsPP2A
  PP2Abinds_Rafstarstar: Rafstarstar + PP2A -> cpxRafstarstar_PP2A; cell*(k53*Rafstarstar*PP2A - k53r*cpxRafstarstar_PP2A);
    k53 = 1.9161 pMps; k53r = 24 ps;
  // releasePLA2star_ERKPP
  releasePLA2star: cpxERKPP_PLA2star => PLA2star + ERK_PP; cell*k72*cpxERKPP_PLA2star;
    k72 = 10 ps;
  // PLA2binds_ERKPP
  ERKPPbinds_PLA2: PLA2 + ERK_PP -> cpxERKPP_PLA2star; cell*(k71*PLA2*ERK_PP - k71r*cpxERKPP_PLA2star);
    k71 = 3.9 pMps; k71r = 40 ps;
  // basalGi_a_GTPsplit
  basal_Gq_a_GTP_split_rx: Gq_a_GTP => Pi + Gq_a_GDP; cell*k8_2a*Gq_a_GTP;
    k8_2a = 0.01 ps;
  // releaseRafstar_MEKPP
  v47_89: cpxMEKP_Rafstar => Rafstar + MEK_PP; cell*k50*cpxMEKP_Rafstar;
    k50 = 0.105 ps;
  // Rafstarbinds_MEKP
  v46_88: Rafstar + MEK_P -> cpxMEKP_Rafstar; cell*(k49*Rafstar*MEK_P - k49r*cpxMEKP_Rafstar);
    k49 = 3.28 pMps; k49r = 0.42 ps;
  // releasePP2A_MEKP
  v49_91: cpxMEKPP_PP2A => PP2A + MEK_P; cell*k58*cpxMEKPP_PP2A;
    k58 = 6 ps;
  // MEKPPbinds_PP2A
  v48_90: MEK_PP + PP2A -> cpxMEKPP_PP2A; cell*(k57*MEK_PP*PP2A - k57r*cpxMEKPP_PP2A);
    k57 = 1.92 pMps; k57r = 24 ps;
  // degMKP_PP
  MKP_PPdegrade: MKP_PP => MKP; cell*k82*MKP_PP;
    k82 = 1 ps;
  releaseERKPP_MKPPP: cpxERKPP_MKP => MKP_PP + ERK_PP; cell*k64*cpxERKPP_MKP;
    k64 = 5 ps;
  // MKPbinds_ERKPP
  ERK_PPbinds_MKP: MKP + ERK_PP -> cpxERKPP_MKP; cell*(k63*MKP*ERK_PP - k63r*cpxERKPP_MKP);
    k63 = 31.5625 pMps; k63r = 20.2 ps;
  // releaseERK_MKPPP
  v59_w6: cpxERK_MKP_PP -> ERK + MKP_PP; cell*(k70*cpxERK_MKP_PP - k70r*ERK*MKP_PP);
    k70 = 0.086 ps; k70r = 1.1 pMps;
  // formERK_MKPPP
  w5: cpxERKP_MKP_PPstar => cpxERK_MKP_PP; cell*k69*cpxERKP_MKP_PPstar;
    k69 = 0.5 ps;
  // ERKP_bindsMKP_PP
  v58_w4: ERK_P + MKP_PP -> cpxERKP_MKP_PPstar; cell*(k68*ERK_P*MKP_PP - k68r*cpxERKP_MKP_PPstar);
    k68 = 10 pMps; k68r = 1 ps;
  // releaseERKPP_Rafstar
  releaseRafstarPP2A: cpxERKPP_Rafstar => ERK_PP + Rafstarstar; cell*k76*cpxERKPP_Rafstar;
    k76 = 6 ps;
  // releaseRaf_PP2A
  releaseRaf: cpxRafstar_PP2A => Raf + PP2A; cell*k52*cpxRafstar_PP2A;
    k52 = 6 ps;
  // PP2Abinds_Rafstar
  Rafstarbinds_PP2A: PP2A + Rafstar -> cpxRafstar_PP2A; cell*(k51*PP2A*Rafstar - k51r*cpxRafstar_PP2A);
    k51 = 1.9161 pMps; k51r = 24 ps;
  Rafstar_bindsERKPP: ERK_PP + Rafstar -> cpxERKPP_Rafstar; cell*(k75*ERK_PP*Rafstar - k75r*cpxERKPP_Rafstar);
    k75 = 1.95 pMps; k75r = 40 ps;
  // releaseMEKPP_ERKPP
  v55_u4: cpxERKP_MEKPP => MEK_PP + ERK_PP; cell*k62*cpxERKP_MEKPP;
    k62 = 15 ps;
  // u1
  u1: ERK + MEK_PP -> cpxERK_MEK_PP; cell*(k59*ERK*MEK_PP - k59r*cpxERK_MEK_PP);
    k59 = 20 pMps; k59r = 1 ps;
  // releaseERKP_MEKPP
  u2: cpxERK_MEK_PP => ERK_P + MEK_PP; cell*k60*cpxERK_MEK_PP;
    k60 = 0.01 ps;
  PLA2starbinds_Ca: Ca + PLA2star -> PLA2star_Ca; cell*(k83*Ca*PLA2star - k83r*PLA2star_Ca);
    k83 = 6 pMps; k83r = 0.1 ps;
  // ERKPbinds_MEKPP
  v54_u3: ERK_P + MEK_PP -> cpxERKP_MEKPP; cell*(k61*ERK_P*MEK_PP - k61r*cpxERKP_MEKPP);
    k61 = 3.2 pMps; k61r = 1 ps;
  // PLA2binds_Ca
  PLA2_binds_Ca: PLA2 + Ca -> PLA2_Ca; cell*(k74*PLA2*Ca - k74r*PLA2_Ca);
    k74 = 1 pMps; k74r = 0.1 ps;
  // releaseRafstar_RasGTP
  releaseRafstardRasGTP: cpxRasGTP_Raf => Rafstar + RasGTP; cell*k46*cpxRasGTP_Raf;
    k46 = 0.125 ps;
  // releaseMEK_PP2A
  v51_93: cpxMEKP_PP2A => MEK + PP2A; cell*k56*cpxMEKP_PP2A;
    k56 = 6 ps;
  // PP2Abinds_MEKP
  v50_92: PP2A + MEK_P -> cpxMEKP_PP2A; cell*(k55*PP2A*MEK_P - k55r*cpxMEKP_PP2A);
    k55 = 1.92 pMps; k55r = 24 ps;
  // releaseMEKP_Rafstar
  v45_87: cpxMEK_Rafstar => MEK_P + Rafstar; cell*k48*cpxMEK_Rafstar;
    k48 = 0.105 ps;
  // MEKbinds_Rafstar
  v44_86: MEK + Rafstar -> cpxMEK_Rafstar; cell*(k47*MEK*Rafstar - k47r*cpxMEK_Rafstar);
    k47 = 3.28 pMps; k47r = 0.42 ps;
  // releaseRasGDPRasGAP
  RasGTPactbyGAP: RasGTP => RasGDP; cell*(k41*RasGAP*RasGTP/(Km41 + RasGTP));  // modifiers: RasGAP
    k41 = 10 ps; Km41 = 1.01 M;
  // Rafbinds_RasGTP
  RasGTPbinds_Raf: Raf + RasGTP -> cpxRasGTP_Raf; cell*(k45*Raf*RasGTP - k45r*cpxRasGTP_Raf);
    k45 = 24 pMps; k45r = 0.5 ps;
  intrinsicRas: RasGDP -> RasGTP; cell*(k44*RasGDP - k44r*RasGTP);
    k44 = 0.00016 ps; k44r = 0.00012 ps;
  // RGS4deact_GiaGTP
  dissociation_RGS_Gqa_GTPcpx: cpxRGS4_Gq_a_GTP => RGS4 + Pi + Gq_a_GDP; cell*k10_2a*cpxRGS4_Gq_a_GTP;
    k10_2a = 8.33 ps;
  // Gi_a_GTPbindsRGS
  RGSfor2A_binds_Gqa_GTP: RGS4 + Gq_a_GTP -> cpxRGS4_Gq_a_GTP; cell*(k9_2a*RGS4*Gq_a_GTP - k9r_2a*cpxRGS4_Gq_a_GTP);
    k9_2a = 20.83 pMps; k9r_2a = 33.32 ps;
  Gqitrimer_GDP_to_Gbr_Gq_a_GTP: Gq_trimer => Gq_a_GTP + Gq_betagamma; cell*k7_2a*Gq_trimer;
    k7_2a = 0.0001 ps;
  Gqtrimerization: Gq_a_GDP + Gq_betagamma => Gq_trimer; cell*k6_2a*Gq_a_GDP*Gq_betagamma;
    k6_2a = 6 pMps;
  // cpxAR1Abinds_Gi
  HRbindsGqtrimer_GDP: cpxA_2AR + Gq_trimer -> cpxA_2AR_Gq; cell*(k4_2a*cpxA_2AR*Gq_trimer - k4r_2a*cpxA_2AR_Gq);
    k4_2a = 1 pMps; k4r_2a = 0.004667 ps;
  // HT1ARbinds_Gitrimer
  Gqtrimer_GDP_with_5HT2AR: ht2AR + Gq_trimer -> cpx2AR_Gqtrimer; cell*(k3_2a*ht2AR*Gq_trimer - k3r_2a*cpx2AR_Gqtrimer);
    k3_2a = 1 pMps; k3r_2a = 1.67 ps;
  // HTbinds_HT1AR
  TCBbinds_2AR: TCB + ht2AR -> cpxA_2AR; cell*(k1_2a*TCB*ht2AR - k1r_2a*cpxA_2AR);
    k1_2a = 1 pMps; k1r_2a = 2.5 ps;
  // Abinds_RGi
  TCB_binds2ARGq: TCB + cpx2AR_Gqtrimer -> cpxA_2AR_Gq; cell*(k2_2a*TCB*cpx2AR_Gqtrimer - k2r_2a*cpxA_2AR_Gq);
    k2_2a = 1 pMps; k2r_2a = 0.007 ps;
  // dep_PLA2star
  dep_PLA2_star: PLA2star => PLA2; cell*k73*PLA2star;
    k73 = 0.17 ps;
  insertion: -> ht2AR; cell*(Vr_2a - kt_2a*ht2AR);
    kt_2a = 0 ps; Vr_2a = 0 Mps;
  ligand_deg: TCB => ; cell*kh_2a*TCB;
    kh_2a = 2.43e-5 ps;
  receptor2a_inter: ht2AR_internal -> ht2AR; cell*(v6_2a*ht2AR_internal - v6r_2a*ht2AR);
    v6_2a = 0.005 ps; v6r_2a = 5e-5 ps;
  L2sR_internal_deg: cpxA_2AR_internal => A_2AR_i_deg; cell*v62_2a*cpxA_2AR_internal;
    v62_2a = 0.000667 ps;
  L2aRinternal: cpxA_2AR => cpxA_2AR_internal; cell*ke_2a*cpxA_2AR;
    ke_2a = 0.00235 ps;
  cpxARGq_split: cpxA_2AR_Gq => Gq_a_GTP + cpxA_2AR + Gq_betagamma; cell*k5_2a*cpxA_2AR_Gq;
    k5_2a = 0.04 ps;
  PLCb_binds_Gq_a_GTP: Gq_a_GTP + PLCb -> PLCb_Gq_a_GTP; cell*(k11_2a*Gq_a_GTP*PLCb - k11r_2a*PLCb_Gq_a_GTP);
    k11_2a = 2.52 pMps; k11r_2a = 1 ps;
  PLCb_binds_Ca: Ca + PLCb -> PLCb_Ca; cell*(k12_2a*Ca*PLCb - k12r_2a*PLCb_Ca);
    k12_2a = 3 pMps; k12r_2a = 1 ps;
  PLCb_Gq_a_GTPbinds_Ca: PLCb_Gq_a_GTP + Ca -> PLCb_Ca_Gq_a_GTP; cell*(k14_2a*PLCb_Gq_a_GTP*Ca - k14r_2a*PLCb_Ca_Gq_a_GTP);
    k14_2a = 30 pMps; k14r_2a = 1 ps;
  PLCb_Ca_binds_Gq_a_GTP: PLCb_Ca + Gq_a_GTP -> PLCb_Ca_Gq_a_GTP; cell*(k13_2a*PLCb_Ca*Gq_a_GTP - k13r_2a*PLCb_Ca_Gq_a_GTP);
    k13_2a = 25.2 pMps; k13r_2a = 1 ps;
  PKC_binds_Ca: PKC + Ca -> PKC_Ca; cell*(k21_2a*PKC*Ca - k21r_2a*PKC_Ca);
    k21_2a = 0.6 pMps; k21r_2a = 0.5 ps;
  DAGbindsPKC_Ca: DAG + PKC_Ca -> PKC_Ca_DAG; cell*(k23_2a*DAG*PKC_Ca - k23r_2a*PKC_Ca_DAG);
    k23_2a = 0.008 pMps; k23r_2a = 8.6348 ps;
  AAfrom_PLA2star_Ca: APC => AA; cell*(k57_2a*PLA2star_Ca*APC/(Km57_2a + APC));  // modifiers: PLA2star_Ca
    k57_2a = 120 ps; Km57_2a = 20 M;
  AA_binds_PKC_Ca: AA + PKC_Ca -> PKC_Ca_AA; cell*(k58_2a*AA*PKC_Ca - k58r_2a*PKC_Ca_AA);
    k58_2a = 0.0012 pMps; k58r_2a = 0.1 ps;
  AA_binds_PKC: AA + PKC -> PKC_AA; cell*(k61_2a*AA*PKC - k61r_2a*PKC_AA);
    k61_2a = 0.00012 pMps; k61r_2a = 0.1 ps;
  PIP2_binds_PLA2_Ca: $PIP2 + PLA2_Ca -> PIP2_PLA2_Ca; cell*(k65_2a*PIP2*PLA2_Ca - k65r_2a*PIP2_PLA2_Ca);
    k65_2a = 0.1 pMps; k65r_2a = 0.012 ps;
  AAfrom_PIP2_PLA2_Ca: APC => AA; cell*(k83_2a*PIP2_PLA2_Ca*APC/(Km83_2a + APC));  // modifiers: PIP2_PLA2_Ca
    Km83_2a = 20 M; k83_2a = 36 ps;
  AAfrom_PLA2_Ca: APC => AA; cell*(k64_2a*PLA2star_Ca*APC/(Km64_2a + APC));  // modifiers: PLA2star_Ca
    k64_2a = 5.4 ps; Km64_2a = 20 M;
  IP3deg: IP3 => ; cell*k19_2a*(IP3 - IP3basal);
    k19_2a = 0.14 ps; IP3basal = 0.16 M;
  // to regenerate the PIP2, DAG is phosphorylated by DAG kinase (dgk) to produce phosphatidic acid (PA). CDP-DAG synthase (CDS*) adds on CMP to phosphatidic acid.This product DGP-DAG, is the activator donor of the phosphatidyl group to inositol. The PI is phosphorylated by PI kinase and PIP kinase to yield PIP2.
  DAGdeg: DAG => PA; cell*k20_2a*DAG;
    k20_2a = 0.15 ps;
  degRasGAPstar: RasGAP_star => RasGAP; cell*k33_2a*RasGAP_star;
    k33_2a = 0.1 ps;
  PKC_Ca_DAGactive_actRasGAP: RasGAP => RasGAP_star; cell*k38_2a*PKC_Ca_DAGactive*RasGAP/(Km38_2a + RasGAP);  // modifiers: PKC_Ca_DAGactive
    k38_2a = 4 ps; Km38_2a = 3.33 M;
  GEF_deact: RasGEF_star => RasGEF; cell*k36_2a*RasGEF_star;
    k36_2a = 1 ps;
  PKC_AA_actRasGAP: RasGAP => RasGAP_star; cell*k40_2a*PKC_AA*RasGAP/(Km40_2a + RasGAP);  // modifiers: PKC_AA
    Km40_2a = 3.33 M; k40_2a = 4 ps;
  PKC_Ca_AAactRasGAP: RasGAP => RasGAP_star; cell*k39_2a*PKC_Ca_AA*RasGAP/(Km39_2a + RasGAP);  // modifiers: PKC_Ca_AA
    Km39_2a = 3.33 M; k39_2a = 4 ps;
  PKC_DAG_AAactive_actRasGAP: RasGAP => RasGAP_star; cell*k32_2a*PKC_DAG_AAactive_1*RasGAP/(Km32_2a + RasGAP);  // modifiers: PKC_DAG_AAactive_1
    k32_2a = 4 ps; Km32_2a = 3.33 M;
  PKC_Ca_DAGactive_actRasGEF: RasGEF => RasGEF_star; cell*k41_2a*PKC_Ca_DAGactive*RasGEF/(Km41_2a + RasGEF);  // modifiers: PKC_Ca_DAGactive
    k41_2a = 4 ps; Km41_2a = 3.33 M;
  PKC_AAactRasGEF: RasGEF => RasGEF_star; cell*k43_2a*PKC_AA*RasGEF/(Km43_2a + RasGEF);  // modifiers: PKC_AA
    Km43_2a = 3.33 M; k43_2a = 4 ps;
  PKC_Ca_AAactRasGEF: RasGEF => RasGEF_star; cell*k42_2a*PKC_Ca_AA*RasGEF/(Km42_2a + RasGEF);  // modifiers: PKC_Ca_AA
    Km42_2a = 3.33 M; k42_2a = 4 ps;
  PKC_DAG_AAregu_RasGEF: RasGEF => RasGEF_star; cell*k35_2a*PKC_DAG_AAactive_1*RasGEF/(Km35_2a + RasGEF);  // modifiers: PKC_DAG_AAactive_1
    k35_2a = 4 ps; Km35_2a = 3.33 M;
  PIP2_binds_PLA2: PLA2 + $PIP2 -> PIP2_PLA2; cell*(k80_2a*PLA2*PIP2 - k80r_2a*PIP2_PLA2);
    k80_2a = 0.5 pMps; k80r_2a = 0.0012 ps;
  AAfrom_PIP2PLA2: APC => AA; cell*k84_2a*PIP2_PLA2*APC/(Km84_2a + APC);  // modifiers: PIP2_PLA2
    k84_2a = 11.04 ps; Km84_2a = 20 M;
  IP3DAG_byPIP2_PLCCa: $PIP2 => IP3 + DAG; cell*k16_2a*PLCb_Ca*PIP2/(Km16_2a + PIP2);  // modifiers: PLCb_Ca
    Km16_2a = 40.13 M; k16_2a = 10 ps;
  IP3DAG_byPIP2_PLCCaGq: $PIP2 => IP3 + DAG; cell*k17_2a*PLCb_Ca_Gq_a_GTP*PIP2/(Km17_2a + PIP2);  // modifiers: PLCb_Ca_Gq_a_GTP
    Km17_2a = 5 M; k17_2a = 48 ps;
  DAGbindsPKC: PKC + DAG -> PKC_DAG; cell*(k22_2a*PKC*DAG - k22r_2a*PKC_DAG);
    k22_2a = 0.1 pMps; k22r_2a = 0.000599 ps;
  releasePKc_Ca_DAGactive: PKC_Ca_DAG -> PKC_Ca_DAGactive; cell*(k24_2a*PKC_Ca_DAG - k24r_2a*PKC_Ca_DAGactive);
    k24_2a = 1 ps; k24r_2a = 0.1 ps;
  AAbinds_PKC_DAG: AA + PKC_DAG -> PKC_DAG_AA; cell*(k59_2a*AA*PKC_DAG - k59r_2a*PKC_DAG_AA);
    k59_2a = 0.018 pMps; k59r_2a = 2 ps;
  PKC_DAG_AAactive_2: PKC_DAG_AA -> PKC_DAG_AAactive_1; cell*(k60_2a*PKC_DAG_AA - k60r_2a*PKC_DAG_AAactive_1);
    k60_2a = 2 ps; k60r_2a = 0.2 ps;
  inact_PLCb_Ca_Gq_a_GTP: PLCb_Ca_Gq_a_GTP => PLCb_Ca + Gq_a_GDP + Pi; cell*k15_2a*PLCb_Ca_Gq_a_GTP;
    k15_2a = 0.0133 ps;
  degradeAA: AA => APC; cell*k79_2a*AA;
    k79_2a = 0.4 ps;
  PIgene: PA => PI; cell*k_PA*PA;
    k_PA = 1 ps;
  PKC_Ca_DAGactive_actRaf: Raf => Rafstar; cell*k29_2a*PKC_Ca_DAGactive*Raf/(Km29_2a + Raf);  // modifiers: PKC_Ca_DAGactive
    k29_2a = 4 ps; Km29_2a = 66.67 M;
  PKC_Ca_AAactRaf: Raf => Rafstar; cell*k30_2a*PKC_Ca_AA*Raf/(Km30_2a + Raf);  // modifiers: PKC_Ca_AA
    Km30_2a = 66.67 M; k30_2a = 4 ps;
  PKC_AAact_Raf: Raf => Rafstar; k31_2a*cell*PKC_AA*Raf/(Km31_2a + Raf);  // modifiers: PKC_AA
    Km31_2a = 66.67 M; k31_2a = 4 ps;
  RafactbyPKC_DAG_AAactive: Raf => Rafstar; cell*k25_2a*PKC_DAG_AAactive_1*Raf/(Km25_2a + Raf);  // modifiers: PKC_DAG_AAactive_1
    Km25_2a = 66.67 M; k25_2a = 4 ps;
  // Gi_brbinds_PI3K
  bindingofPI3K_Gibr: PI3K + Gi_betagamma -> Gi_br_PI3K; cell*(k22*Gi_betagamma*PI3K - k22r*Gi_br_PI3K);
    k22 = 35 pMps; k22r = 1 ps;
  // releasePI3Kstar_betagamma
  release_activePI3K: Gi_br_PI3K => PI3Kstar + Gi_betagamma; cell*k23*Gi_br_PI3K;
    k23 = 0.25 ps;
  // PIP2binds_PI3Kstar
  PIP2bindfsPI3Kstar: PI3Kstar + $PIP2 -> PIP2_PI3Kstar; cell*(k24*PIP2*PI3Kstar - k24r*PIP2_PI3Kstar);
    k24 = 0.7813 pMps; k24r = 2.5 ps;
  // releasePIP3
  releasePI3Kstar: PIP2_PI3Kstar => PIP3 + PI3Kstar; cell*k25*PIP2_PI3Kstar;
    k25 = 0.625 ps;
  Srcbinds_PIP3: Src + PIP3 -> cpxSrc_PIP3; cell*(k26*Src*PIP3 - k26r*cpxSrc_PIP3);
    k26 = 1.6143 pMps; k26r = 4.52 ps;
  // releaseSrcstar_PIP3
  releaseSrcstar: cpxSrc_PIP3 => Src_star + PIP3; cell*k27*cpxSrc_PIP3;
    k27 = 1.13 ps;
  Srcstar_bindsCsk: Src_star + Csk -> cpxCsk_Srcstar; cell*(k30*Src_star*Csk - k30r*cpxCsk_Srcstar);
    k30 = 2.33 pMps; k30r = 56 ps;
  // deactSrc
  releaseSrc: cpxCsk_Srcstar => Src + Csk; cell*k31*cpxCsk_Srcstar;
    k31 = 14 ps;
  // PTENbindsPIP3
  PIP3bindsPTEN: PTEN + PIP3 -> cpxPTEN_PIP3; cell*(k28*PTEN*PIP3 - k28r*cpxPTEN_PIP3);
    k28 = 3.2 pMps; k28r = 51.2 ps;
  // releasePIP2PTEN
  releasePTEN: cpxPTEN_PIP3 => PTEN + $PIP2; cell*k29*cpxPTEN_PIP3;
    k29 = 12.8 ps;
  // degPI3Kstar
  deactPI3K_star: PI3Kstar => PI3K; cell*k79*PI3Kstar;
    k79 = 0.1 ps;
  LRinternal_1a: cpxA_HT1AR => cpxA_HT1AR_internal; cell*ke*cpxA_HT1AR;
    ke = 0.00235 ps;
  LR_internal_deg: cpxA_HT1AR_internal => A_HT1R_i_deg; cell*v62*cpxA_HT1AR_internal;
    v62 = 0.000667 ps;
  receptor_interl: HT1AR_internal -> HT1AR; cell*(v6*HT1AR_internal - v6r*HT1AR);
    v6 = 0.005 ps; v6r = 5e-5 ps;
  ligand1a_deg: serotonin => ; cell*kh*serotonin;
    kh = 2.43e-5 ps;
  insertion_1a: -> HT1AR; cell*(Vr - kt*HT1AR);
    Vr = 0 Mps; kt = 0 ps;
  // Abinds_RGi
  HT_binds1ARGi: serotonin + cpxHT1AR_Gitrimer -> cpxA_R1A_Gi; cell*(k2*serotonin*cpxHT1AR_Gitrimer - k2r*cpxA_R1A_Gi);
    k2 = 100 pMps; k2r = 0.1 ps;
  // HTbinds_HT1AR
  HTbinds_1AR: HT1AR + serotonin -> cpxA_HT1AR; cell*(k1*HT1AR*serotonin - k1r*cpxA_HT1AR);
    k1 = 0.45 pMps; k1r = 0.1 ps;
  // HT1ARbinds_Gitrimer
  Gitrimer_GDP_with_5HT1AR: HT1AR + Gitrimer -> cpxHT1AR_Gitrimer; cell*(k3*HT1AR*Gitrimer - k3r*cpxHT1AR_Gitrimer);
    k3 = 0.0599 pMps; k3r = 0.1 ps;
  // cpxAR1Abinds_Gi
  HRbindsGitrimer_GDP: cpxA_HT1AR + Gitrimer -> cpxA_R1A_Gi; cell*(k4*cpxA_HT1AR*Gitrimer - k4r*cpxA_R1A_Gi);
    k4 = 13.33 pMps; k4r = 0.1 ps;
  Gitrimerization: Gi_betagamma + Gi_a_GDP => Gitrimer; cell*k6*Gi_betagamma*Gi_a_GDP;
    k6 = 6 pMps;
  Gitrimer_GDP_to_GbrGi_a_GTP: Gitrimer => Gi_a_GTP + Gi_betagamma; cell*k7*Gitrimer; Gitrimer_GDP_to_GbrGi_a_GTP is "Gitrimer_GDP_to_Gbr,Gi_a_GTP";
    k7 = 0.0001 ps;
  // cpxARGi_split
  H1ARGi_split: cpxA_R1A_Gi => cpxA_HT1AR + Gi_a_GTP + Gi_betagamma + Pi; cell*k5*cpxA_R1A_Gi;
    k5 = 0.025 ps;
  // Gi_a_GTPbindsRGS
  RGSfor1A_binds_Gia_GTP: Gi_a_GTP + RGS4_1 -> cpxRGS4_Gi_a_GTP_1; cell*(k9*Gi_a_GTP*RGS4_1 - k9r*cpxRGS4_Gi_a_GTP_1);
    k9 = 20.83 pMps; k9r = 33.32 ps;
  // RGS4deact_GiaGTP
  dissociation_RGS_Gia_GTPcpx: cpxRGS4_Gi_a_GTP_1 => Gi_a_GDP + RGS4_1 + Pi; cell*k10*cpxRGS4_Gi_a_GTP_1;
    k10 = 8.33 ps;
  // basalGi_a_GTPsplit
  basal_Gi_a_GTP_split_rx: Gi_a_GTP => Gi_a_GDP + Pi; cell*k8*Gi_a_GTP;
    k8 = 0.0667 ps;
  // Shcstarbinds_Grb2
  v38_Grb2_binds_Shcstar: Shc_star + Grb2 -> Shcstar_Grb2; cell*(k36*Shc_star*Grb2 - k36r*Shcstar_Grb2);
    k36 = 3 pMps; k36r = 0.1 ps;
  // Grb2binds_Sos
  v17_64_SosbindsGrb2: Grb2 + Sos -> Grb2_sos; cell*(k35*Grb2*Sos - k35r*Grb2_sos);
    k35 = 10 pMps; k35r = 0.0214 ps;
  // Shcstarbinds_Grb2sos
  v41_83_Grb2_Sosbinds_Shc: Shc_star + Grb2_sos -> Shcstar_Grb2_Sos; cell*(k34*Shc_star*Grb2_sos - k34r*Shcstar_Grb2_Sos);
    k34 = 9 pMps; k34r = 0.0429 ps;
  // ShcstarGrb2_binds_Sos
  v40_Sosbinds_ShcstarGrb2: Shcstar_Grb2 + Sos -> Shcstar_Grb2_Sos; cell*(k37*Shcstar_Grb2*Sos - k37r*Shcstar_Grb2_Sos);
    k37 = 30 pMps; k37r = 0.064 ps;
  // releaseShcstar_Grb2sos
  v33_splitShc_star_Grb2_Sos: Shcstar_Grb2_Sos -> Shc_star + Grb2_sos; cell*(k39*Shcstar_Grb2_Sos - k39r*Shc_star*Grb2_sos);
    k39 = 2 ps; k39r = 21 pMps;
  // dep_Grb2SosP
  dep_Sos_P: Grb2_sos_P => Grb2_sos; cell*k78*Grb2_sos_P;
    k78 = 1 ps;
  // releaseGrb2_Sos
  v35_splitGrb2_Sos: Grb2_sos -> Grb2 + Sos; cell*(k38*Grb2_sos - k38r*Grb2*Sos);
    k38 = 0.0015 ps; k38r = 0.1 pMps;
  // Grb2sosP_byERKPP
  Sos_PbyERK_PP: Shcstar_Grb2_Sos => Grb2_sos_P + Shc_star; cell*kdd*Shcstar_Grb2_Sos*ERK_PP/(kmdd + Shcstar_Grb2_Sos);  // modifiers: ERK_PP
    kmdd = 2.564 M; kdd = 1 ps;
  ShcactbySrcstar: Shc => Shc_star; cell*kcat_bysrc*Src_star*Shc/(km_bysrc + Shc);  // modifiers: Src_star
    kcat_bysrc = 1.6 ps; km_bysrc = 8 M;
  // degShcstar
  v36_depShc_star: Shc_star => Shc + Pi; cell*Vm_33*Shc_star/(Km_33 + Shc_star);
    Km_33 = 0.34 M; Vm_33 = 0.17 Mps;
  // RasGDPbinds_Shrcstar_Grb2_Sos
  RasGDPbinds_ShcstarGrb2Sos: Shcstar_Grb2_Sos + RasGDP -> cpxRasGDP_Shcstar_Grb2_Sos; cell*(k42*Shcstar_Grb2_Sos*RasGDP - k42r*cpxRasGDP_Shcstar_Grb2_Sos);
    k42 = 0.2 pMps; k42r = 0.08 ps;
  // RasGTP_byShcstarGrb2Sos
  releaseRasGTPfromShc: cpxRasGDP_Shcstar_Grb2_Sos => Shcstar_Grb2_Sos + RasGTP; cell*k43*cpxRasGDP_Shcstar_Grb2_Sos;
    k43 = 0.02 ps;
  RasGDPbyRasGEFstar: RasGDP => RasGTP; cell*k37_2a*RasGEF_star*RasGDP/(km37_2a + RasGDP);  // modifiers: RasGEF_star
    k37_2a = 0.02 ps; km37_2a = 0.50505 M;
  Ketanserinbinds_2AR: Ketanserin + ht2AR -> cpxKetanserin_2AR; cell*(k1_ant*Ketanserin*ht2AR - k1r_ant*cpxKetanserin_2AR);
    k1_ant = 1 pMps; k1r_ant = 2.5 ps;
  Ket_2ARGq_split: Ketanserin + cpx2AR_Gqtrimer -> cpxKetanserin_2ARGq; cell*(k2_ant*Ketanserin*cpx2AR_Gqtrimer - k2r_ant*cpxKetanserin_2ARGq);
    k2_ant = 1 pMps; k2r_ant = 2.5 ps;
  cpxKetR_bindsGq: cpxKetanserin_2AR + Gq_trimer -> cpxKetanserin_2ARGq; cell*(kant_KRbindsG*cpxKetanserin_2AR*Gq_trimer - krant_KRbindsG*cpxKetanserin_2ARGq);
    kant_KRbindsG = 1 pMps; krant_KRbindsG = 1.67 ps;
  Ketanserin2ARGq_split: cpxKetanserin_2ARGq => cpxKetanserin_2AR + productX; cell*k_ant_split*cpxKetanserin_2ARGq;
    k_ant_split = 0.0001 ps;

  // Unit definitions:
  unit pMps = litre / (mole * second); pMps is "1/(M*sec)";
  unit ps = 1 / second; ps is "1/sec";
  unit M = mole / litre;
  unit Mps = mole / (litre * second);
end
