// SBML level 2 version 1

model MODEL1208030000()
  // Mandlik2013 - Synthetic circuit of IPC synthase in Leishmania
  // Mandlik2012 - Synthetic circuit of IPC synthase in Leishmania
  // A genetic circuit for the targeted enzyme inositol phosphorylceramide (IPC) synthase belonging to the protozoan parasite Leishmania is constructed by Mandlik et al. (2013).
  // This model is described in the article:
  // Synthetic circuit of inositol phosphorylceramide synthase in Leishmania: a chemical biology approach
  // Mandlik V., Limbachiya D., Shinde S., Mol M, S., Singh, S.
  // J Chem Biol. January 2013
  // Abstract:
  // Building circuits and studying their behavior in cells is a major goal of systems and synthetic biology. Synthetic biology enables the precise control of cellular states for systems studies, the discovery of novel parts, control strategies, and interactions for the design of robust synthetic systems. To the best of our knowledge, there are no literature reports for the synthetic circuit construction for protozoan parasites. This paper describes the construction of genetic circuit for the targeted enzyme inositol phosphorylceramide synthase belonging to the protozoan parasite Leishmania. To explore the dynamic nature of the circuit designed, simulation was done followed by circuit validation by qualitative and quantitative approaches. The genetic circuit designed for inositol phosphorylceramide synthase (Biomodels Database—MODEL1208030000) shows responsiveness, oscillatory and bistable behavior, together with intrinsic robustness.
  // This model is hosted on BioModels Database and identified by: MODEL1208030000 .
  // To cite BioModels Database, please use: BioModels Database: An enhanced, curated and annotated resource for published quantitative kinetic models .
  // To the extent possible under law, all copyright and related or neighbouring rights to this encoded model have been dedicated to the public domain worldwide. Please refer to CC0 Public Domain Dedication for more information.
  // biomodels.db:MODEL1208030000
  // hasTaxon taxonomy:5658
  // isVersionOf GO:0051707 DOID:9065

  // Compartments:
  compartment DefaultCompartment = 1;

  // Species:
  species IPCS1protein in DefaultCompartment = 0.05;
  species IPCS2protein in DefaultCompartment = 0.05;
  species $IPCS_1 in DefaultCompartment;
  species $IPCS_2 in DefaultCompartment;
  species TetrRepressor in DefaultCompartment = 0.1;
  species $Tetrgene in DefaultCompartment;
  species lacI in DefaultCompartment = 10;
  species lactoserepressor in DefaultCompartment = 0.05;
  species $lamdar in DefaultCompartment;
  species lamdarepressor in DefaultCompartment = 0.05;
  species $rp1 in DefaultCompartment;
  species $rp2 in DefaultCompartment;
  species $rp3 in DefaultCompartment;
  species $rp4 in DefaultCompartment;
  species $rp5 in DefaultCompartment;
  species $rs1 in DefaultCompartment;

  // Parameters:
  rp1_strength = 5;
  rp2_strength = 5;
  rp3_strength = 5;
  rp4_strength = 5;
  rp5_strength = 5;
  TetrRepressor_degradation_rate = 0.5;
  IPCS1protein_degradation_rate = 0.1;
  tr1_Kd = 1;
  tr1_h = 2;
  tr2_Kd = 1;
  tr2_h = 2;
  tr3_Kd = 1;
  tr3_h = 2;
  tr4_Kd = 1;
  tr4_h = 2;
  tr5_Kd = 1;
  tr5_h = 2;
  tr6_Kd = 1;
  tr6_h = 2;
  pp1_translation_rate = 1;
  pp2_translation_rate = 1;
  pp3_translation_rate = 1;
  pp4_translation_rate = 1;
  pp5_translation_rate = 1;
  IPCS2protein_degradation_rate = 0.1;
  lamdarepressor_degradation_rate = 0.1;
  lactoserepressor_degradation_rate = 0.1;

  // Assignment rules:
  rp1 := 1/(1 + (IPCS2protein/tr2_Kd)^tr2_h);
  rp2 := 1/(1 + (IPCS1protein/tr1_Kd)^tr1_h);
  rp3 := 1/(1 + (lamdarepressor/tr5_Kd)^tr5_h);
  rp4 := 1/(1 + (lactoserepressor/tr3_Kd)^tr3_h);
  rp5 := 1/(1 + (TetrRepressor/tr4_Kd)^tr4_h);
  Tetrgene := rp4_strength*rp4;
  rs1 := 1/(1 + (lactoserepressor/tr6_Kd)^tr6_h);
  IPCS_1 := rp1_strength*rp1;
  IPCS_2 := rp2_strength*rp2;
  lamdar := rp5_strength*rp5;

  // Reactions:
  pp1_v1: => IPCS1protein; pp1_translation_rate*rp1_strength*IPCS_1;  // modifiers: IPCS_1
  pp1_v2: IPCS1protein => ; IPCS1protein_degradation_rate*IPCS1protein;
  pp2_v1: => IPCS2protein; pp2_translation_rate*rp2_strength*IPCS_2;  // modifiers: IPCS_2
  pp2_v2: IPCS2protein => ; IPCS2protein_degradation_rate*IPCS2protein;
  pp3_v1: => lactoserepressor; pp3_translation_rate*rp3_strength*lacI;  // modifiers: lacI
  pp3_v2: lactoserepressor => ; lactoserepressor_degradation_rate*lactoserepressor;
  pp4_v1: => TetrRepressor; pp4_translation_rate*1*Tetrgene;  // modifiers: Tetrgene
  pp4_v2: TetrRepressor => ; TetrRepressor_degradation_rate*TetrRepressor;
  pp5_v1: => lamdarepressor; pp5_translation_rate*1*lamdar;  // modifiers: lamdar
  pp5_v2: lamdarepressor => ; lamdarepressor_degradation_rate*lamdarepressor;
end
