// SBML level 2 version 4

function _1_Reactant_1_inhibitor(r1, K, n, I, Vr, p, c0, c1)
  r1*(c0 + c1*(K^n/(I^n + K^n))) - Vr*p;
end
_1_Reactant_1_inhibitor is "1 Reactant, 1 inhibitor";

function function_3(Vf, r1, K, n, I, A1, n1, K1, Vr, p)
  Vf*r1*(K^n/(I^n + K^n))*(A1^n1/(A1^n1 + K1^n1)) - Vr*p;
end
function_3 is "1 Reactant, 1 inhibitor, 1 activator";

function _1_Reactant_1_Activator(r1, c0, c1, A, n, K, Vr, p)
  r1*(c0 + c1*(A^n/(A^n + K^n))) - Vr*p;
end
_1_Reactant_1_Activator is "1 Reactant, 1 Activator";

model MODEL()
  // Viladomiu2012 - PPARgamma role in C.diff associated disease
  // "Modeling the Role of Peroxisome Proliferator-Activated Receptor γ and MicroRNA-146 in Mucosal Immune Responses to Clostridium difficile"
  // Monica Viladomiu1,2, Raquel Hontecillas1,2, Mireia Pedragosa1,2, Adria Carbo1,2, Stefan Hoops1,2, Pawel Michalak4,5, Katarzyna Michalak4, Richard L. Guerrant2,3, James K. Roche2,3, Cirle A. Warren2,3, Josep Bassaganya-Riera1,2*
  // 1) Nutritional Immunology and Molecular Medicine Laboratory, Virginia Bioinformatics Institute, Virginia Tech, Blacksburg, Virginia, United States of America, 2) Center for Modeling Immunity to Enteric Pathogens, Virginia Tech, Blacksburg, Virginia, United States of America, 3) Division of Infectious Disease and International Health, Center for Global Health, University of Virginia, Charlottesville, Virginia, United States of America, 4) Medical Informatics and Systems Division, Virginia Bioinformatics Institute, Virginia Tech, Blacksburg, Virginia, United States of America, 5) Department of Biological Sciences, Virginia Tech, Blacksburg, Virginia, United States of America
  // E-mail: jbassaga@vt.edu
  // This model represents the interaction between Cdiff, miRNA146b, NCOA4, PPARg, IL10 and IL17. Simulation studies show an aberrant expression of miRNA146b with increasing concentrations of Cdiff over time, which results in decreased PPARg activation due to NCOA4 inhibition. As a final result, PPARg is unable to modulate effector and regulatory responses, since results show an upregulation of IL17 expression and downregulation of IL10 production.
  // biomodels.db:MODEL1210260004
  // isDescribedBy pubmed:23071818
  // hasTaxon taxonomy:10090 taxonomy:1496
  // isVersionOf GO:0042742

  // Compartments:
  compartment compartment_1 = 1; compartment_1 is "default";

  // Species:
  // Clostridium difficile
  species Cdiff in compartment_1 = 0;
  // miRNA 146b
  species miR_146b in compartment_1 = 0.568; miR_146b is "miR-146b";
  // Precursor of miRNA 146b
  species $p_miR_146b in compartment_1 = 1; p_miR_146b is "p-miR-146b";
  // NCOA4, a PPARg co-activator
  species NCOA4 in compartment_1 = 0.4399991;
  // Precursor of NCOA4
  species $pNCOA4 in compartment_1 = 1;
  // Peroxisome proliferator receptor gamma
  species PPARg in compartment_1 = 0.003796353;
  // Precursor of PPARg
  species $pPPARg in compartment_1 = 1;
  // Precursor of interleukin 10
  species $pIL_10 in compartment_1 = 1; pIL_10 is "pIL-10";
  // Precursor of interleukin 17
  species $pIL_17 in compartment_1 = 1; pIL_17 is "pIL-17";
  // Interleukin 10
  species IL_10 in compartment_1 = 2.29882e-5; IL_10 is "IL-10";
  // Interleukin 17
  species IL_17 in compartment_1 = -1.963421e-34; IL_17 is "IL-17";

  // Parameters:
  HillCoeff = 2;
  Bactin = 1;
  var NCOA4_ratio;
  var PPARg_ratio;
  var IL10_ratio;
  var IL17_ratio;

  // Assignment rules:
  NCOA4_ratio := NCOA4/Bactin;
  PPARg_ratio := PPARg/Bactin;
  IL10_ratio := IL_10/Bactin;
  IL17_ratio := IL_17/Bactin;

  // Reactions:
  pmiR_146b_miR_146b: $p_miR_146b -> miR_146b; compartment_1*_1_Reactant_1_Activator(p_miR_146b, pmiR_146b_miR_146b_c0, pmiR_146b_miR_146b_c1, Cdiff, HillCoeff, pmiR_146b_miR_146b_K, pmiR_146b_miR_146b_Vr, miR_146b); pmiR_146b_miR_146b is "pmiR-146b -> miR-146b";  // modifiers: Cdiff
    pmiR_146b_miR_146b_c0 = 0.0568; pmiR_146b_miR_146b_c1 = 20.9518; pmiR_146b_miR_146b_K = 89.763; pmiR_146b_miR_146b_Vr = 0.1;
  pNCOA4_NCOA4: $pNCOA4 -> NCOA4; compartment_1*_1_Reactant_1_inhibitor(pNCOA4, pNCOA4_NCOA4_K, n, miR_146b, pNCOA4_NCOA4_Vr, NCOA4, pNCOA4_NCOA4_c0, pNCOA4_NCOA4_c1); pNCOA4_NCOA4 is "pNCOA4 -> NCOA4";  // modifiers: miR_146b
    pNCOA4_NCOA4_K = 0.384846; n = 18; pNCOA4_NCOA4_Vr = 0.1; pNCOA4_NCOA4_c0 = 0.00059841; pNCOA4_NCOA4_c1 = 47.9736;
  pPPARg_PPARg: $pPPARg -> PPARg; compartment_1*_1_Reactant_1_Activator(pPPARg, pPPARg_PPARg_c0, pPPARg_PPARg_c1, NCOA4, HillCoeff, pPPARg_PPARg_K, pPPARg_PPARg_Vr, PPARg); pPPARg_PPARg is "pPPARg -> PPARg";  // modifiers: NCOA4
    pPPARg_PPARg_c0 = 0.000141678; pPPARg_PPARg_c1 = 0.0270105; pPPARg_PPARg_K = 4.6671; pPPARg_PPARg_Vr = 0.1;
  pIL_10_IL_10: $pIL_10 -> IL_10; compartment_1*function_3(pIL_10_IL_10_Vf, pIL_10, pIL_10_IL_10_K, HillCoeff, Cdiff, PPARg, pIL_10_IL_10_n1, pIL_10_IL_10_K1, pIL_10_IL_10_Vr, IL_10); pIL_10_IL_10 is "pIL-10 -> IL-10";  // modifiers: Cdiff, PPARg
    pIL_10_IL_10_Vf = 3.30707e-6; pIL_10_IL_10_K = 1000; pIL_10_IL_10_n1 = 0.1; pIL_10_IL_10_K1 = 1e-6; pIL_10_IL_10_Vr = 0.1;
  pIL_17_IL_17: $pIL_17 -> IL_17; compartment_1*function_3(pIL_17_IL_17_Vf, pIL_17, pIL_17_IL_17_K, HillCoeff, PPARg, Cdiff, pIL_17_IL_17_n1, pIL_17_IL_17_K1, pIL_17_IL_17_Vr, IL_17); pIL_17_IL_17 is "pIL-17 -> IL-17";  // modifiers: PPARg, Cdiff
    pIL_17_IL_17_Vf = 0.06; pIL_17_IL_17_K = 996.619; pIL_17_IL_17_n1 = 0.1; pIL_17_IL_17_K1 = 7.80698e-6; pIL_17_IL_17_Vr = 0.06;
end
