// SBML level 3 version 1

function Int(x, y, z)
  x*y/(x + z);
end
Int is "Interaction term";

model MODEL1302180001()
  // Sanjuan2013 - Evolution of HIV T-cell epitope, immune activation model
  // Model of cellular immune response against HIV.
  // This model is described in the article:
  // Immune activation promotes evolutionary conservation of T-cell epitopes in HIV-1.
  // Sanjuán R, Nebot MR, Peris JB, Alcamí J.
  // PLoS Biol. 2013 Apr;11(4):e1001523
  // Abstract:
  // The immune system should constitute a strong selective pressure promoting viral genetic diversity and evolution. However, HIV shows lower sequence variability at T-cell epitopes than elsewhere in the genome, in contrast with other human RNA viruses. Here, we propose that epitope conservation is a consequence of the particular interactions established between HIV and the immune system. On one hand, epitope recognition triggers an anti-HIV response mediated by cytotoxic T-lymphocytes (CTLs), but on the other hand, activation of CD4(+) helper T lymphocytes (TH cells) promotes HIV replication. Mathematical modeling of these opposite selective forces revealed that selection at the intrapatient level can promote either T-cell epitope conservation or escape. We predict greater conservation for epitopes contributing significantly to total immune activation levels (immunodominance), and when TH cell infection is concomitant to epitope recognition (trans-infection). We suggest that HIV-driven immune activation in the lymph nodes during the chronic stage of the disease may offer a favorable scenario for epitope conservation. Our results also support the view that some pathogens draw benefits from the immune response and suggest that vaccination strategies based on conserved TH epitopes may be counterproductive.
  // Note from the author: this version of the model is more general that the one described in the paper. This is because: (i) it can consider simultaneously Th-epitope escape mutants, CTL-epitope escape mutants and full T-cell (Th and CTL) escape mutants, by setting the mutation rate of Th and CTL escape mutants to zero. (ii) It allows for back mutations, which were ignored in all the simulations shown in the paper. (iii) It allows for a fitness cost of escape mutants, which was set to zero in the article. (iv) pAPCs can be infected and produce viruses (the rate of viral production for pAPCs was set to zero in the paper).
  // This model is hosted on BioModels Database and identified by: MODEL1302180001 .
  // To cite BioModels Database, please use: BioModels Database: An enhanced, curated and annotated resource for published quantitative kinetic models .
  // To the extent possible under law, all copyright and related or neighbouring rights to this encoded model have been dedicated to the public domain worldwide. Please refer to CC0 Public Domain Dedication for more information.
  // biomodels.db:MODEL1302180001
  // hasTaxon taxonomy:9606
  // isVersionOf GO:0002253

  // Compartments:
  compartment org = 1; org is "body";

  // Species:
  substanceOnly species THr in org = 1000000;
  substanceOnly species THa in org = 1000000;
  substanceOnly species THw in org = 1;
  substanceOnly species TH4 in org = 0;
  substanceOnly species TH8 in org = 0;
  substanceOnly species TH48 in org = 0;
  substanceOnly species TCr in org = 3000000;
  substanceOnly species TCPr1 in org = 0;
  substanceOnly species TCPr2 in org = 0;
  substanceOnly species TCa in org = 0;
  substanceOnly species Dr in org = 100000;
  substanceOnly species Dw in org = 0;
  substanceOnly species D4 in org = 0;
  substanceOnly species D8 in org = 0;
  substanceOnly species D48 in org = 0;
  substanceOnly species Vw in org = 0;
  substanceOnly species V4 in org = 0;
  substanceOnly species V8 in org = 0;
  substanceOnly species V48 in org = 0;

  // Parameters:
  rho4 = 0.05;
  C4r0 = 1000000;
  gamma4r = 0.005;
  gamma4a = 0.1;
  gamma4i = 1;
  rho8 = 0.05;
  C8r0 = 3000000;
  gamma8r = 0.005;
  gamma8pr = 0.005;
  gamma8a = 0.1;
  rhoD = 0.05;
  CDr0 = 100000;
  gammaDr = 0.005;
  gammaDa = 0.1;
  a4 = 0.1;
  a8 = 0.1;
  a8D = 0.1;
  a8prime = 0.1;
  b = 0.001;
  b8 = 0;
  d = 0.03;
  k = 0.1;
  sigma = 0.01;
  sigmaD = 0.01;
  alpha = 5000;
  alphaD = 0;
  gammaV = 15;
  muw4 = 1e-5;
  muw8 = 1e-5;
  muw48 = 1e-5;
  murevw4 = 0;
  murevw8 = 0;
  murevw48 = 0;
  cost = 0;

  // Reactions:
  _Evolution_THr: THr + Dw + D8 => THr; rho4*(C4r0 - THr) - gamma4r*THr - b*THr - a4*THr*Dw/(THr + Dw + D8) - a4*THr*D8/(THr + Dw + D8);
  _Evolution_THa: THr + THa + Dw + D8 + Vw + V4 + V8 + V48 => THa; -gamma4a*THa + b*THr - sigma*THa*Vw/(THa + Vw + V4 + V8 + V48) - sigma*THa*V4/(THa + Vw + V4 + V8 + V48) - sigma*THa*V8/(THa + Vw + V4 + V8 + V48) - sigma*THa*V48/(THa + Vw + V4 + V8 + V48) + (1 - d)*a4*THr*Dw/(THr + Dw + D8) + (1 - d)*a4*THr*D8/(THr + Dw + D8);
  _Evolution_THw: THr + THw + TH4 + TCa + Dw + D8 + Vw + V4 + V8 + V48 => THw; -gamma4i*THw + sigma*THw*Vw/(THw + Vw + V4 + V8 + V48) - k*TCa*THw/(TCa + THw + TH4) + d*a4*THr*Dw/(THr + Dw + D8);
  _Evolution_TH4: THa + THw + TH4 + TCa + Vw + V4 + V8 + V48 => TH4; -gamma4i*TH4 + sigma*THa*V4/(THa + Vw + V4 + V8 + V48) - k*TCa*TH4/(TCa + THw + TH4);
  _Evolution_TH8: THr + THa + TH8 + Dw + D8 + Vw + V4 + V8 + V48 => TH8; -gamma4i*TH8 + sigma*THa*V8/(THa + Vw + V4 + V8 + V48) + d*a4*THr*D8/(THr + D8 + Dw);
  _Evolution_TH48: THa + V48 + Vw + V4 + V8 => TH48; -gamma4i*TH48 + sigma*THa*V48/(Vw + V4 + V8 + V48);
  _Evolution_TCr: THa + THw + TH4 + TCr + Dw + D4 => TCr; rho8*(C8r0 - TCr) - gamma8r*TCr - b8*TCr - a8*TCr*THw/(TCr + THw + TH4) - a8*TCr*TH4/(TCr + THw + TH4) - a8D*TCr*Dw/(TCr + Dw + D4) - a8D*TCr*D4/(TCr + Dw + D4) - a8prime*TCr*THa/(TCr + THa);
  _Evolution_TCPr1: THa + THw + TH4 + TCr + TCPr1 + Dw + D4 => TCPr1; -gamma8pr*TCPr1 + a8*TCr*THw/(TCr + THw + TH4) + a8*TCr*TH4/(TCr + THw + TH4) + a8D*TCr*Dw/(TCr + Dw + D4) + a8D*TCr*D4/(TCr + Dw + D4) - a8prime*TCPr1*THa/(TCPr1 + THa);
  _Evolution_TCPr2: THa + THw + TH4 + TCr + TCPr2 + TCa + Dw + D4 => TCPr2; -gamma8pr*TCPr2 + a8prime*TCr*THa/(TCr + THa) - a8*TCPr2*THw/(TCPr2 + THw + TH4) - a8*TCPr2*TH4/(TCPr2 + THw + TH4) - a8D*TCPr2*Dw/(TCPr2 + Dw + D4) - a8D*TCPr2*D4/(TCPr2 + Dw + D4);
  _Evolution_TCa: THa + TCa + THw + TH4 + TCr + TCPr1 + TCPr2 + Dw + D4 => TCa; -gamma8a*TCa + b8*TCr + a8prime*TCPr1*THa/(TCPr1 + THa) + a8*TCPr2*THw/(TCPr2 + THw + TH4) + a8*TCPr2*TH4/(TCPr2 + THw + TH4) + a8D*TCPr2*Dw/(TCPr2 + Dw + D4) + a8D*TCPr2*D4/(TCPr2 + Dw + D4);
  _Evolution_Dr: Dr + Dw + D4 + D8 + D48 + Vw + V4 + V8 + V48 => Dr; rhoD*(CDr0 - (Dr + Dw + D4 + D8 + D48)) - gammaDr*Dr - sigmaD*Dr*Vw/(Dr + V48 + Vw + V4 + V8) - sigmaD*Dr*V4/(Dr + V48 + Vw + V4 + V8) - sigmaD*Dr*V8/(Dr + V48 + Vw + V4 + V8) - sigmaD*Dr*V48/(Dr + V48 + Vw + V4 + V8);
  _Evolution_Dw: Dr + Dw + Vw + V4 + V8 + V48 => Dw; -gammaDa*Dw + sigmaD*Dr*Vw/(Dr + V48 + Vw + V4 + V8);
  _Evolution_D4: Dr + D4 + Vw + V4 + V8 + V48 => D4; -gammaDa*D4 + sigmaD*Dr*V4/(Dr + V48 + Vw + V4 + V8);
  _Evolution_D8: Dr + D8 + Vw + V4 + V8 + V48 => D8; -gammaDa*D8 + sigmaD*Dr*V8/(Dr + V48 + Vw + V4 + V8);
  _Evolution_D48: Dr + D48 + Vw + V4 + V8 + V48 => D48; -gammaDa*D48 + sigmaD*Dr*V48/(Dr + V48 + Vw + V4 + V8);
  _Evolution_Vw: THa + THw + TH4 + TH8 + TH48 + Dr + Dw + D4 + D8 + D48 + Vw + V4 + V8 + V48 => Vw; -gammaV*Vw - sigma*THa*Vw/(THa + Vw + V4 + V8 + V48) - sigmaD*Dr*Vw/(Dr + Vw + V4 + V8 + V48) + alpha*(1 - muw4 - muw8 - muw48)*THw + alpha*murevw4*TH4 + alpha*murevw8*TH8 + alpha*murevw48*TH48 + alphaD*(1 - muw4 - muw8 - muw48)*Dw + alphaD*murevw4*D4 + alphaD*murevw8*D8 + alphaD*murevw48*D48;
  _Evolution_V4: THa + THw + TH4 + Dr + Dw + D4 + Vw + V4 + V8 + V48 => V4; -gammaV*V4 - sigma*THa*V4/(THa + Vw + V4 + V8 + V48) - sigmaD*Dr*V4/(Dr + Vw + V4 + V8 + V48) + alpha*(1 - murevw4)*TH4 + alpha*muw4*THw + alphaD*(1 - murevw4)*D4 + alphaD*muw4*Dw;
  _Evolution_V8: THa + THw + TH8 + Dr + Dw + D8 + Vw + V4 + V8 + V48 => V8; -gammaV*V8 - sigma*THa*V8/(THa + Vw + V4 + V8 + V48) - sigmaD*Dr*V8/(Dr + Vw + V4 + V8 + V48) + alpha*(1 - murevw8)*TH8 + alpha*muw8*THw + alphaD*(1 - murevw8)*D8 + alphaD*muw8*Dw;
  _Evolution_V48: THa + THw + TH48 + Dr + Dw + D48 + Vw + V4 + V8 + V48 => V48; -gammaV*V48 - sigma*THa*V48/(THa + Vw + V4 + V8 + V48) - sigmaD*Dr*V48/(Dr + V48 + Vw + V4 + V8) + alpha*(1 - murevw48)*TH48 + alpha*(1 - muw48)*THw + alphaD*(1 - murevw48)*D48 + alphaD*muw48*Dw;
end
