// SBML level 3 version 1

function Int(x, y, z)
  x*y/(x + z);
end
Int is "Interaction term";

model MODEL1302180002()
  // Sanjuan2013 - Evolution of HIV T-cell epitope, control model
  // Control model in which the virus targets a nonimmune cell type C (e.g., hepatocytes, epithelial cells, etc.), instead of T H cells.
  // This model is described in the article:
  // Immune activation promotes evolutionary conservation of T-cell epitopes in HIV-1.
  // Sanjuán R, Nebot MR, Peris JB, Alcamí J.
  // PLoS Biol. 2013 Apr;11(4):e1001523
  // Abstract:
  // The immune system should constitute a strong selective pressure promoting viral genetic diversity and evolution. However, HIV shows lower sequence variability at T-cell epitopes than elsewhere in the genome, in contrast with other human RNA viruses. Here, we propose that epitope conservation is a consequence of the particular interactions established between HIV and the immune system. On one hand, epitope recognition triggers an anti-HIV response mediated by cytotoxic T-lymphocytes (CTLs), but on the other hand, activation of CD4(+) helper T lymphocytes (TH cells) promotes HIV replication. Mathematical modeling of these opposite selective forces revealed that selection at the intrapatient level can promote either T-cell epitope conservation or escape. We predict greater conservation for epitopes contributing significantly to total immune activation levels (immunodominance), and when TH cell infection is concomitant to epitope recognition (trans-infection). We suggest that HIV-driven immune activation in the lymph nodes during the chronic stage of the disease may offer a favorable scenario for epitope conservation. Our results also support the view that some pathogens draw benefits from the immune response and suggest that vaccination strategies based on conserved TH epitopes may be counterproductive.
  // This model is hosted on BioModels Database and identified by: MODEL1302180002 .
  // To cite BioModels Database, please use: BioModels Database: An enhanced, curated and annotated resource for published quantitative kinetic models .
  // To the extent possible under law, all copyright and related or neighbouring rights to this encoded model have been dedicated to the public domain worldwide. Please refer to CC0 Public Domain Dedication for more information.
  // biomodels.db:MODEL1302180002
  // hasTaxon taxonomy:9606
  // isVersionOf GO:0002253

  // Compartments:
  compartment org = 1; org is "body";

  // Species:
  substanceOnly species THr in org = 1000000;
  substanceOnly species THa in org = 1000000;
  substanceOnly species C in org = 1;
  substanceOnly species Cw in org = 0;
  substanceOnly species C4 in org = 0;
  substanceOnly species C8 in org = 0;
  substanceOnly species C48 in org = 0;
  substanceOnly species TCr in org = 3000000;
  substanceOnly species TCPr1 in org = 0;
  substanceOnly species TCPr2 in org = 0;
  substanceOnly species TCa in org = 0;
  substanceOnly species Dr in org = 100000;
  substanceOnly species Dw in org = 0;
  substanceOnly species D4 in org = 0;
  substanceOnly species D8 in org = 0;
  substanceOnly species D48 in org = 0;
  substanceOnly species Vw in org = 0;
  substanceOnly species V4 in org = 0;
  substanceOnly species V8 in org = 0;
  substanceOnly species V48 in org = 0;

  // Parameters:
  rho4 = 0.05;
  C4r0 = 1000000;
  gamma4r = 0.005;
  gamma4a = 0.1;
  rho8 = 0.05;
  C8r0 = 3000000;
  gamma8r = 0.005;
  gamma8pr = 0.005;
  gamma8a = 0.1;
  rhoD = 0.05;
  CDr0 = 100000;
  gammaDr = 0.005;
  gammaDa = 0.1;
  rhoC = 0.05;
  CC0 = 250000;
  gammaC = 0.1;
  gammaCi = 1;
  a4 = 0.1;
  a8 = 0.1;
  a8D = 0.1;
  a8prime = 0.1;
  b = 0.001;
  b8 = 0;
  k = 0.1;
  sigma = 0.01;
  sigmaD = 0.01;
  alpha = 5000;
  alphaD = 0;
  gammaV = 15;
  muw4 = 0;
  muw8 = 0;
  muw48 = 0;
  murevw4 = 0;
  murevw8 = 0;
  murevw48 = 0;
  cost = 0;

  // Reactions:
  _Evolution_THr: THr + Dw + D8 => THr; rho4*(C4r0 - THr) - gamma4r*THr - b*THr - a4*THr*Dw/(THr + Dw + D8) - a4*THr*D8/(THr + Dw + D8);
  _Evolution_THa: THr + THa + Dw + D8 + Vw + V4 + V8 + V48 => THa; -gamma4a*THa + b*THr + a4*THr*Dw/(THr + Dw + D8) + a4*THr*D8/(THr + Dw + D8);
  _Evolution_TCr: THa + TCr + Dw + D4 + Cw + C4 => TCr; rho8*(C8r0 - TCr) - gamma8r*TCr - b8*TCr - a8*TCr*Cw/(TCr + Cw + C4) - a8*TCr*C4/(TCr + Cw + C4) - a8D*TCr*Dw/(TCr + Dw + D4) - a8D*TCr*D4/(TCr + Dw + D4) - a8prime*TCr*THa/(TCr + THa);
  _Evolution_TCPr1: THa + TCr + TCPr1 + Dw + D4 + Cw + C4 => TCPr1; -gamma8pr*TCPr1 + a8*TCr*Cw/(TCr + Cw + C4) + a8*TCr*C4/(TCr + Cw + C4) + a8D*TCr*Dw/(TCr + Dw + D4) + a8D*TCr*D4/(TCr + Dw + D4) - a8prime*TCPr1*THa/(TCPr1 + THa);
  _Evolution_TCPr2: THa + TCr + TCPr2 + TCa + Dw + D4 + Cw + C4 => TCPr2; -gamma8pr*TCPr2 + a8prime*TCr*THa/(TCr + THa) - a8*TCPr2*Cw/(TCPr2 + Cw + C4) - a8*TCPr2*C4/(TCPr2 + Cw + C4) - a8D*TCPr2*Dw/(TCPr2 + Dw + D4) - a8D*TCPr2*D4/(TCPr2 + Dw + D4);
  _Evolution_TCa: THa + TCr + TCPr1 + TCPr2 + TCa + Dw + D4 + Cw + C4 => TCa; -gamma8a*TCa + b8*TCr + a8prime*TCPr1*THa/(TCPr1 + THa) + a8*TCPr2*Cw/(TCPr2 + Cw + C4) + a8*TCPr2*C4/(TCPr2 + Cw + C4) + a8D*TCPr2*Dw/(TCPr2 + Dw + D4) + a8D*TCPr2*D4/(TCPr2 + Dw + D4);
  _Evolution_Dr: Dr + Dw + D4 + D8 + D48 + Vw + V4 + V8 + V48 => Dr; rhoD*(CDr0 - (Dr + Dw + D4 + D8 + D48)) - gammaDr*Dr - sigmaD*Dr*Vw/(Dr + V48 + Vw + V4 + V8) - sigmaD*Dr*V4/(Dr + V48 + Vw + V4 + V8) - sigmaD*Dr*V8/(Dr + V48 + Vw + V4 + V8) - sigmaD*Dr*V48/(Dr + V48 + Vw + V4 + V8);
  _Evolution_Dw: Dr + Dw + Vw + V4 + V8 + V48 => Dw; -gammaDa*Dw + sigmaD*Dr*Vw/(Dr + V48 + Vw + V4 + V8);
  _Evolution_D4: Dr + D4 + Vw + V4 + V8 + V48 => D4; -gammaDa*D4 + sigmaD*Dr*V4/(Dr + V48 + Vw + V4 + V8);
  _Evolution_D8: Dr + D8 + Vw + V4 + V8 + V48 => D8; -gammaDa*D8 + sigmaD*Dr*V8/(Dr + V48 + Vw + V4 + V8);
  _Evolution_D48: Dr + D48 + Vw + V4 + V8 + V48 => D48; -gammaDa*D48 + sigmaD*Dr*V48/(Dr + V48 + Vw + V4 + V8);
  _Evolution_Vw: Dr + Vw + V4 + V8 + V48 + C + Cw + C4 + C8 + C48 => Vw; -gammaV*Vw - sigma*C*Vw/(C + Vw + V4 + V8 + V48) - sigmaD*Dr*Vw/(Dr + Vw + V4 + V8 + V48) + alpha*(1 - muw4 - muw8 - muw48)*Cw + alpha*murevw4*C4 + alpha*murevw8*C8 + alpha*murevw48*C48;
  _Evolution_V4: THa + Dr + Vw + V4 + V8 + V48 + C + Cw + C4 => V4; -gammaV*V4 - sigma*C*V4/(C + Vw + V4 + V8 + V48) - sigmaD*Dr*V4/(Dr + Vw + V4 + V8 + V48) + alpha*(1 - murevw4)*C4 + alpha*muw4*Cw;
  _Evolution_V8: Dr + Vw + V4 + V8 + V48 + C + Cw + C8 => V8; -gammaV*V8 - sigma*C*V8/(C + Vw + V4 + V8 + V48) - sigmaD*Dr*V8/(Dr + Vw + V4 + V8 + V48) + alpha*(1 - murevw8)*C8 + alpha*muw8*Cw;
  _Evolution_V48: THa + Dr + Dw + D48 + Vw + V4 + V8 + V48 + C + Cw + C48 => V48; -gammaV*V48 - sigma*C*V48/(C + Vw + V4 + V8 + V48) - sigmaD*Dr*V48/(Dr + V48 + Vw + V4 + V8) + alpha*(1 - murevw48)*C48 + alpha*muw48*Cw;
  _Evolution_C: C + Cw + C4 + C8 + C48 + Vw + V4 + V8 + V48 => C; rhoC*(CC0 - (C + Cw + C4 + C8 + C48)) - gammaC*C - sigma*C*Vw/(C + Vw + V4 + V8 + V48) - sigma*C*V4/(C + Vw + V4 + V8 + V48) - sigma*C*V8/(C + Vw + V4 + V8 + V48) - sigma*C*V48/(C + Vw + V4 + V8 + V48);
  _Evolution_Cw: TCa + Vw + V4 + V8 + V48 + C + Cw + C4 => Cw; -gammaCi*Cw + sigma*C*Vw/(C + Vw + V4 + V8 + V48) - k*TCa*Cw/(TCa + Cw + C4);
  _Evolution_C4: TCa + Vw + V4 + V8 + V48 + C + Cw + C4 => C4; -gammaCi*C4 + sigma*C*V4/(C + Vw + V4 + V8 + V48) - k*TCa*C4/(TCa + Cw + C4);
  _Evolution_C8: Vw + V4 + V8 + V48 + C + C8 => C8; -gammaCi*C8 + sigma*C*V8/(C + Vw + V4 + V8 + V48);
  _Evolution_C48: Vw + V4 + V8 + V48 + C + C48 => C48; -gammaCi*C48 + sigma*C*V48/(C + Vw + V4 + V8 + V48);
end
