// SBML level 2 version 1

model MODEL1303010000()
  // Lopez2013 - extrinsic apoptosis M1a embedded
  // biomodels.db:MODEL1303010000
  // hasTaxon taxonomy:9606
  // isVersionOf GO:0097190

  // Compartments:
  compartment default = 1;

  // Species:
  species L_bf_None in default = 3000/default; L_bf_None is "L(bf=None)";  // uniprot:P50591
  species R_bf_None in default = 200/default; R_bf_None is "R(bf=None)";  // uniprot:O14763
  species flip_bf_None in default = 100/default; flip_bf_None is "flip(bf=None)";  // uniprot:O15519
  species C8_bf_None_state_pro in default = 20000/default; C8_bf_None_state_pro is "C8(bf=None, state=pro)";  // uniprot:Q14790
  species BAR_bf_None in default = 1000/default; BAR_bf_None is "BAR(bf=None)";  // uniprot:Q9NZS9
  species Apaf_bf_None_state_I in default = 100000/default; Apaf_bf_None_state_I is "Apaf(bf=None, state=I)";  // uniprot:O14727
  species C3_bf_None_state_pro in default = 10000/default; C3_bf_None_state_pro is "C3(bf=None, state=pro)";  // uniprot:P42574
  species C6_bf_None_state_pro in default = 10000/default; C6_bf_None_state_pro is "C6(bf=None, state=pro)";  // uniprot:P55212
  species C9_bf_None in default = 100000/default; C9_bf_None is "C9(bf=None)";  // uniprot:P55211
  species PARP_bf_None_state_U in default = 1000000/default; PARP_bf_None_state_U is "PARP(bf=None, state=U)";  // uniprot:P09874
  species XIAP_bf_None in default = 100000/default; XIAP_bf_None is "XIAP(bf=None)";  // uniprot:P98170
  species Bid_bf_None_state_U in default = 40000/default; Bid_bf_None_state_U is "Bid(bf=None, state=U)";  // uniprot:P55957
  species Bad_bf_None_state_C in default = 1000/default; Bad_bf_None_state_C is "Bad(bf=None, state=C)";  // uniprot:Q92934
  species s13 in default = 80000/default; s13 is "Bax(bf=None, s1=None, s2=None, state=C)";  // uniprot:Q07812
  species s14 in default = 20000/default; s14 is "Bak(bf=None, s1=None, s2=None, state=M)";  // uniprot:Q16611
  species Bcl2_bf_None in default = 20000/default; Bcl2_bf_None is "Bcl2(bf=None)";  // uniprot:P10415
  species BclxL_bf_None_state_C in default = 20000/default; BclxL_bf_None_state_C is "BclxL(bf=None, state=C)";  // uniprot:Q07817
  species Mcl1_bf_None_state_M in default = 20000/default; Mcl1_bf_None_state_M is "Mcl1(bf=None, state=M)";  // uniprot:Q07820
  species Noxa_bf_None_state_C in default = 1000/default; Noxa_bf_None_state_C is "Noxa(bf=None, state=C)";  // uniprot:Q13794
  species CytoC_bf_None_state_M in default = 500000/default; CytoC_bf_None_state_M is "CytoC(bf=None, state=M)";  // uniprot:P99999
  species Smac_bf_None_state_M in default = 100000/default; Smac_bf_None_state_M is "Smac(bf=None, state=M)";  // uniprot:Q9NR28
  species L_bf_1__br_R_bf_1 in default = 0; L_bf_1__br_R_bf_1 is "L(bf=1) ._br_R(bf=1)";  // hasPart uniprot:P50591 uniprot:O14763
  species s22 in default = 0; s22 is "Bax(bf=None, s1=None, s2=None, state=M)";  // uniprot:Q07812
  species BclxL_bf_None_state_M in default = 0; BclxL_bf_None_state_M is "BclxL(bf=None, state=M)";  // uniprot:Q07817
  species DISC_bf_None in default = 0; DISC_bf_None is "DISC(bf=None)";  // GO:0031264
  species C8_bf_1_state_pro__br_DISC_bf_1 in default = 0; C8_bf_1_state_pro__br_DISC_bf_1 is "C8(bf=1, state=pro) ._br_DISC(bf=1)";  // hasPart uniprot:Q14790 GO:0031264
  species DISC_bf_1__br_flip_bf_1 in default = 0; DISC_bf_1__br_flip_bf_1 is "DISC(bf=1) ._br_flip(bf=1)";  // hasPart uniprot:O15519 GO:0031264
  species C8_bf_None_state_A in default = 0; C8_bf_None_state_A is "C8(bf=None, state=A)";  // uniprot:Q14790
  species s28 in default = 0; s28 is "Bid(bf=1, state=U) ._br_C8(bf=1, state=A)";  // hasPart uniprot:P55957 uniprot:Q14790
  species BAR_bf_1__br_C8_bf_1_state_A in default = 0; BAR_bf_1__br_C8_bf_1_state_A is "BAR(bf=1) ._br_C8(bf=1, state=A)";  // hasPart uniprot:Q9NZS9 uniprot:Q14790
  species s30 in default = 0; s30 is "C3(bf=1, state=pro) ._br_C8(bf=1, state=A)";  // hasPart uniprot:P42574 uniprot:Q14790
  species Bid_bf_None_state_T in default = 0; Bid_bf_None_state_T is "Bid(bf=None, state=T)";  // uniprot:P55957
  species C3_bf_None_state_A in default = 0; C3_bf_None_state_A is "C3(bf=None, state=A)";  // uniprot:P42574
  species C3_bf_1_state_A__br_XIAP_bf_1 in default = 0; C3_bf_1_state_A__br_XIAP_bf_1 is "C3(bf=1, state=A) ._br_XIAP(bf=1)";  // hasPart uniprot:P42574 uniprot:P98170
  species s34 in default = 0; s34 is "C3(bf=1, state=A) ._br_PARP(bf=1, state=U)";  // hasPart uniprot:P42574 uniprot:P09874
  species s35 in default = 0; s35 is "C3(bf=1, state=A) ._br_C6(bf=1, state=pro)";  // hasPart uniprot:P42574 uniprot:P55212
  species Bid_bf_None_state_M in default = 0; Bid_bf_None_state_M is "Bid(bf=None, state=M)";  // uniprot:P55957
  species C3_bf_None_state_ub in default = 0; C3_bf_None_state_ub is "C3(bf=None, state=ub)";  // uniprot:P42574
  species PARP_bf_None_state_C in default = 0; PARP_bf_None_state_C is "PARP(bf=None, state=C)";  // uniprot:P09874
  species C6_bf_None_state_A in default = 0; C6_bf_None_state_A is "C6(bf=None, state=A)";  // uniprot:P55212
  species s40 in default = 0; s40 is "Bax(bf=1, s1=None, s2=None, state=M) ._br_Bid(bf=1, state=M)";  // hasPart uniprot:P55957 uniprot:Q07812
  species s41 in default = 0; s41 is "Bak(bf=1, s1=None, s2=None, state=M) ._br_Bid(bf=1, state=M)";  // hasPart uniprot:Q16611 uniprot:P55957
  species Bcl2_bf_1__br_Bid_bf_1_state_M in default = 0; Bcl2_bf_1__br_Bid_bf_1_state_M is "Bcl2(bf=1) ._br_Bid(bf=1, state=M)";  // hasPart uniprot:P55957 uniprot:P10415
  species s43 in default = 0; s43 is "BclxL(bf=1, state=M) ._br_Bid(bf=1, state=M)";  // hasPart uniprot:Q07817 uniprot:P55957
  species s44 in default = 0; s44 is "Bid(bf=1, state=M) ._br_Mcl1(bf=1, state=M)";  // hasPart uniprot:P55957 uniprot:Q07820
  species s45 in default = 0; s45 is "C6(bf=1, state=A) ._br_C8(bf=1, state=pro)";  // hasPart uniprot:P55212 uniprot:Q14790
  species s46 in default = 0; s46 is "Bax(bf=None, s1=None, s2=None, state=A)";  // uniprot:Q07812
  species s47 in default = 0; s47 is "Bak(bf=None, s1=None, s2=None, state=A)";  // uniprot:Q16611
  species s48 in default = 0; s48 is "Bax(bf=1, s1=None, s2=None, state=A) ._br_Bax(bf=1, s1=None, s2=None, state=M)";  // hasPart uniprot:Q07812
  species s49 in default = 0; s49 is "Bak(bf=1, s1=None, s2=None, state=A) ._br_Bak(bf=1, s1=None, s2=None, state=M)";  // hasPart uniprot:Q16611
  species s50 in default = 0; s50 is "Bax(bf=1, s1=None, s2=None, state=A) ._br_Bcl2(bf=1)";  // hasPart uniprot:Q07812 uniprot:P10415
  species s51 in default = 0; s51 is "Bax(bf=1, s1=None, s2=None, state=A) ._br_BclxL(bf=1, state=M)";  // hasPart uniprot:Q07817 uniprot:Q07812
  species s52 in default = 0; s52 is "Bak(bf=1, s1=None, s2=None, state=A) ._br_BclxL(bf=1, state=M)";  // hasPart uniprot:Q16611 uniprot:Q07817
  species s53 in default = 0; s53 is "Bak(bf=1, s1=None, s2=None, state=A) ._br_Mcl1(bf=1, state=M)";  // hasPart uniprot:Q16611 uniprot:Q07820
  species s54 in default = 0; s54 is "Bax(bf=None, s1=1, s2=None, state=A) ._br_Bax(bf=None, s1=None, s2=1, state=A)";  // hasPart uniprot:Q07812
  species s55 in default = 0; s55 is "Bak(bf=None, s1=1, s2=None, state=A) ._br_Bak(bf=None, s1=None, s2=1, state=A)";  // hasPart uniprot:Q16611
  species s56 in default = 0; s56 is "Bax(bf=None, s1=1, s2=2, state=A) ._br_Bax(bf=None, s1=2, s2=3, state=A) ._br_Bax(bf=None, s1=3, s2=1, state=A)";  // hasPart uniprot:Q07812
  species s57 in default = 0; s57 is "Bak(bf=None, s1=1, s2=2, state=A) ._br_Bak(bf=None, s1=2, s2=3, state=A) ._br_Bak(bf=None, s1=3, s2=1, state=A)";  // hasPart uniprot:Q16611
  species s58 in default = 0; s58 is "Bax(bf=None, s1=1, s2=2, state=A) ._br_Bax(bf=None, s1=2, s2=3, state=A) ._br_Bax(bf=None, s1=3, s2=4, state=A) ._br_Bax(bf=None, s1=4, s2=1, state=A)";  // hasPart uniprot:Q07812
  species s59 in default = 0; s59 is "Bak(bf=None, s1=1, s2=2, state=A) ._br_Bak(bf=None, s1=2, s2=3, state=A) ._br_Bak(bf=None, s1=3, s2=4, state=A) ._br_Bak(bf=None, s1=4, s2=1, state=A)";  // hasPart uniprot:Q16611
  species s60 in default = 0; s60 is "Bax(bf=1, s1=2, s2=3, state=A) ._br_Bax(bf=None, s1=3, s2=4, state=A) ._br_Bax(bf=None, s1=4, s2=5, state=A) ._br_Bax(bf=None, s1=5, s2=2, state=A) ._br_CytoC(bf=1, state=M)";  // hasPart uniprot:P99999 uniprot:Q07812
  species s61 in default = 0; s61 is "Bax(bf=1, s1=2, s2=3, state=A) ._br_Bax(bf=None, s1=3, s2=4, state=A) ._br_Bax(bf=None, s1=4, s2=5, state=A) ._br_Bax(bf=None, s1=5, s2=2, state=A) ._br_Smac(bf=1, state=M)";  // hasPart uniprot:Q07812 uniprot:Q9NR28
  species s62 in default = 0; s62 is "Bak(bf=1, s1=2, s2=3, state=A) ._br_Bak(bf=None, s1=3, s2=4, state=A) ._br_Bak(bf=None, s1=4, s2=5, state=A) ._br_Bak(bf=None, s1=5, s2=2, state=A) ._br_CytoC(bf=1, state=M)";  // hasPart uniprot:Q16611 uniprot:P99999
  species s63 in default = 0; s63 is "Bak(bf=1, s1=2, s2=3, state=A) ._br_Bak(bf=None, s1=3, s2=4, state=A) ._br_Bak(bf=None, s1=4, s2=5, state=A) ._br_Bak(bf=None, s1=5, s2=2, state=A) ._br_Smac(bf=1, state=M)";  // hasPart uniprot:Q16611 uniprot:Q9NR28
  species CytoC_bf_None_state_C in default = 0; CytoC_bf_None_state_C is "CytoC(bf=None, state=C)";  // uniprot:P99999
  species Smac_bf_None_state_C in default = 0; Smac_bf_None_state_C is "Smac(bf=None, state=C)";  // uniprot:Q9NR28
  species Smac_bf_None_state_A in default = 0; Smac_bf_None_state_A is "Smac(bf=None, state=A)";  // uniprot:Q9NR28
  species CytoC_bf_None_state_A in default = 0; CytoC_bf_None_state_A is "CytoC(bf=None, state=A)";  // uniprot:P99999
  species s68 in default = 0; s68 is "Apaf(bf=1, state=I) ._br_CytoC(bf=1, state=A)";  // hasPart uniprot:O14727 uniprot:P99999
  species Smac_bf_1_state_A__br_XIAP_bf_1 in default = 0; Smac_bf_1_state_A__br_XIAP_bf_1 is "Smac(bf=1, state=A) ._br_XIAP(bf=1)";  // hasPart uniprot:P98170 uniprot:Q9NR28
  species Apaf_bf_None_state_A in default = 0; Apaf_bf_None_state_A is "Apaf(bf=None, state=A)";  // uniprot:O14727
  species Apop_bf_None in default = 0; Apop_bf_None is "Apop(bf=None)";  // GO:0043293
  species Apop_bf_1__br_C3_bf_1_state_pro in default = 0; Apop_bf_1__br_C3_bf_1_state_pro is "Apop(bf=1) ._br_C3(bf=1, state=pro)";  // hasPart uniprot:P42574 GO:0043293
  species Apop_bf_1__br_XIAP_bf_1 in default = 0; Apop_bf_1__br_XIAP_bf_1 is "Apop(bf=1) ._br_XIAP(bf=1)";  // hasPart uniprot:P98170 GO:0043293

  // Parameters:
  bind_L_R_to_LR_kf = 4e-7;
  bind_L_R_to_LR_kr = 0.001;
  convert_LR_to_DISC_kc = 1e-5;
  bind_DISC_C8pro_to_DISCC8pro_kf = 1e-6;
  bind_DISC_C8pro_to_DISCC8pro_kr = 0.001;
  catalyze_DISCC8pro_to_DISC_C8A_kc = 1;
  bind_C8A_BidU_to_C8ABidU_kf = 1e-6;
  bind_C8A_BidU_to_C8ABidU_kr = 0.001;
  catalyze_C8ABidU_to_C8A_BidT_kc = 1;
  bind_DISC_flip_kf = 1e-6;
  bind_DISC_flip_kr = 0.001;
  bind_BAR_C8A_kf = 1e-6;
  bind_BAR_C8A_kr = 0.001;
  equilibrate_SmacC_to_SmacA_kf = 0.01;
  equilibrate_SmacC_to_SmacA_kr = 0.01;
  equilibrate_CytoCC_to_CytoCA_kf = 0.01;
  equilibrate_CytoCC_to_CytoCA_kr = 0.01;
  bind_CytoCA_ApafI_to_CytoCAApafI_kf = 5e-7;
  bind_CytoCA_ApafI_to_CytoCAApafI_kr = 0.001;
  catalyze_CytoCAApafI_to_CytoCA_ApafA_kc = 1;
  convert_ApafA_C9_to_Apop_kf = 5e-8;
  convert_ApafA_C9_to_Apop_kr = 0.001;
  bind_Apop_C3pro_to_ApopC3pro_kf = 5e-9;
  bind_Apop_C3pro_to_ApopC3pro_kr = 0.001;
  catalyze_ApopC3pro_to_Apop_C3A_kc = 1;
  bind_Apop_XIAP_kf = 2e-6;
  bind_Apop_XIAP_kr = 0.001;
  bind_SmacA_XIAP_kf = 7e-6;
  bind_SmacA_XIAP_kr = 0.001;
  bind_C8A_C3pro_to_C8AC3pro_kf = 1e-7;
  bind_C8A_C3pro_to_C8AC3pro_kr = 0.001;
  catalyze_C8AC3pro_to_C8A_C3A_kc = 1;
  bind_XIAP_C3A_to_XIAPC3A_kf = 2e-6;
  bind_XIAP_C3A_to_XIAPC3A_kr = 0.001;
  catalyze_XIAPC3A_to_XIAP_C3ub_kc = 0.1;
  bind_C3A_PARPU_to_C3APARPU_kf = 1e-6;
  bind_C3A_PARPU_to_C3APARPU_kr = 0.01;
  catalyze_C3APARPU_to_C3A_PARPC_kc = 1;
  bind_C3A_C6pro_to_C3AC6pro_kf = 1e-6;
  bind_C3A_C6pro_to_C3AC6pro_kr = 0.001;
  catalyze_C3AC6pro_to_C3A_C6A_kc = 1;
  bind_C6A_C8pro_to_C6AC8pro_kf = 3e-8;
  bind_C6A_C8pro_to_C6AC8pro_kr = 0.001;
  catalyze_C6AC8pro_to_C6A_C8A_kc = 1;
  equilibrate_BidT_to_BidM_kf = 0.1;
  equilibrate_BidT_to_BidM_kr = 0.001;
  equilibrate_BaxC_to_BaxM_kf = 0.01;
  equilibrate_BaxC_to_BaxM_kr = 0.01;
  equilibrate_BclxLC_to_BclxLM_kf = 0.01;
  equilibrate_BclxLC_to_BclxLM_kr = 0.01;
  bind_BidM_BaxM_to_BidMBaxM_kf = 1e-7;
  bind_BidM_BaxM_to_BidMBaxM_kr = 0.001;
  catalyze_BidMBaxM_to_BidM_BaxA_kc = 1;
  bind_BidM_BakM_to_BidMBakM_kf = 1e-7;
  bind_BidM_BakM_to_BidMBakM_kr = 0.001;
  catalyze_BidMBakM_to_BidM_BakA_kc = 1;
  bind_BaxA_BaxM_to_BaxABaxM_kf = 1e-7;
  bind_BaxA_BaxM_to_BaxABaxM_kr = 0.001;
  catalyze_BaxABaxM_to_BaxA_BaxA_kc = 1;
  bind_BakA_BakM_to_BakABakM_kf = 1e-7;
  bind_BakA_BakM_to_BakABakM_kr = 0.001;
  catalyze_BakABakM_to_BakA_BakA_kc = 1;
  bind_BidM_Bcl2_kf = 1e-6;
  bind_BidM_Bcl2_kr = 0.066;
  bind_BidM_BclxLM_kf = 1e-6;
  bind_BidM_BclxLM_kr = 0.012;
  bind_BidM_Mcl1M_kf = 1e-6;
  bind_BidM_Mcl1M_kr = 0.01;
  bind_BaxA_Bcl2_kf = 1e-6;
  bind_BaxA_Bcl2_kr = 0.01;
  bind_BaxA_BclxLM_kf = 1e-6;
  bind_BaxA_BclxLM_kr = 0.01;
  bind_BakA_BclxLM_kf = 1e-6;
  bind_BakA_BclxLM_kr = 0.05;
  bind_BakA_Mcl1_kf = 1e-6;
  bind_BakA_Mcl1_kr = 0.01;
  bind_BadM_Bcl2_kf = 1e-6;
  bind_BadM_Bcl2_kr = 0.011;
  bind_BadM_BclxLM_kf = 1e-6;
  bind_BadM_BclxLM_kr = 0.01;
  bind_NoxaM_Mcl1M_kf = 1e-6;
  bind_NoxaM_Mcl1M_kr = 0.019;
  assemble_pore_sequential_Bax_2_kf = 0.0002040816;
  assemble_pore_sequential_Bax_2_kr = 0.001;
  assemble_pore_sequential_Bax_3_kf = 0.0002040816;
  assemble_pore_sequential_Bax_3_kr = 0.001;
  assemble_pore_sequential_Bax_4_kf = 0.0002040816;
  assemble_pore_sequential_Bax_4_kr = 0.001;
  assemble_pore_sequential_Bak_2_kf = 0.0002040816;
  assemble_pore_sequential_Bak_2_kr = 0.001;
  assemble_pore_sequential_Bak_3_kf = 0.0002040816;
  assemble_pore_sequential_Bak_3_kr = 0.001;
  assemble_pore_sequential_Bak_4_kf = 0.0002040816;
  assemble_pore_sequential_Bak_4_kr = 0.001;
  pore_transport_complex_BaxA_4_CytoCM_kf = 2.857143e-5;
  pore_transport_complex_BaxA_4_CytoCM_kr = 0.001;
  pore_transport_dissociate_BaxA_4_CytoCC_kc = 10;
  pore_transport_complex_BaxA_4_SmacM_kf = 2.857143e-5;
  pore_transport_complex_BaxA_4_SmacM_kr = 0.001;
  pore_transport_dissociate_BaxA_4_SmacC_kc = 10;
  pore_transport_complex_BakA_4_CytoCM_kf = 2.857143e-5;
  pore_transport_complex_BakA_4_CytoCM_kr = 0.001;
  pore_transport_dissociate_BakA_4_CytoCC_kc = 10;
  pore_transport_complex_BakA_4_SmacM_kf = 2.857143e-5;
  pore_transport_complex_BakA_4_SmacM_kr = 0.001;
  pore_transport_dissociate_BakA_4_SmacC_kc = 10;

  // Reactions:
  r0: L_bf_None + R_bf_None -> L_bf_1__br_R_bf_1; bind_L_R_to_LR_kf*L_bf_None*R_bf_None - bind_L_R_to_LR_kr*L_bf_1__br_R_bf_1;
  r1: s13 -> s22; equilibrate_BaxC_to_BaxM_kf*s13 - equilibrate_BaxC_to_BaxM_kr*s22;
  r2: BclxL_bf_None_state_C -> BclxL_bf_None_state_M; equilibrate_BclxLC_to_BclxLM_kf*BclxL_bf_None_state_C - equilibrate_BclxLC_to_BclxLM_kr*BclxL_bf_None_state_M;
  r3: L_bf_1__br_R_bf_1 => DISC_bf_None; convert_LR_to_DISC_kc*L_bf_1__br_R_bf_1;
  r4: C8_bf_None_state_pro + DISC_bf_None -> C8_bf_1_state_pro__br_DISC_bf_1; bind_DISC_C8pro_to_DISCC8pro_kf*DISC_bf_None*C8_bf_None_state_pro - bind_DISC_C8pro_to_DISCC8pro_kr*C8_bf_1_state_pro__br_DISC_bf_1;
  r5: flip_bf_None + DISC_bf_None -> DISC_bf_1__br_flip_bf_1; bind_DISC_flip_kf*flip_bf_None*DISC_bf_None - bind_DISC_flip_kr*DISC_bf_1__br_flip_bf_1;
  r6: C8_bf_1_state_pro__br_DISC_bf_1 => DISC_bf_None + C8_bf_None_state_A; catalyze_DISCC8pro_to_DISC_C8A_kc*C8_bf_1_state_pro__br_DISC_bf_1;
  r7: Bid_bf_None_state_U + C8_bf_None_state_A -> s28; bind_C8A_BidU_to_C8ABidU_kf*Bid_bf_None_state_U*C8_bf_None_state_A - bind_C8A_BidU_to_C8ABidU_kr*s28;
  r8: BAR_bf_None + C8_bf_None_state_A -> BAR_bf_1__br_C8_bf_1_state_A; bind_BAR_C8A_kf*C8_bf_None_state_A*BAR_bf_None - bind_BAR_C8A_kr*BAR_bf_1__br_C8_bf_1_state_A;
  r9: C3_bf_None_state_pro + C8_bf_None_state_A -> s30; bind_C8A_C3pro_to_C8AC3pro_kf*C8_bf_None_state_A*C3_bf_None_state_pro - bind_C8A_C3pro_to_C8AC3pro_kr*s30;
  r10: s28 => C8_bf_None_state_A + Bid_bf_None_state_T; catalyze_C8ABidU_to_C8A_BidT_kc*s28;
  r11: s30 => C8_bf_None_state_A + C3_bf_None_state_A; catalyze_C8AC3pro_to_C8A_C3A_kc*s30;
  r12: XIAP_bf_None + C3_bf_None_state_A -> C3_bf_1_state_A__br_XIAP_bf_1; bind_XIAP_C3A_to_XIAPC3A_kf*XIAP_bf_None*C3_bf_None_state_A - bind_XIAP_C3A_to_XIAPC3A_kr*C3_bf_1_state_A__br_XIAP_bf_1;
  r13: PARP_bf_None_state_U + C3_bf_None_state_A -> s34; bind_C3A_PARPU_to_C3APARPU_kf*C3_bf_None_state_A*PARP_bf_None_state_U - bind_C3A_PARPU_to_C3APARPU_kr*s34;
  r14: C6_bf_None_state_pro + C3_bf_None_state_A -> s35; bind_C3A_C6pro_to_C3AC6pro_kf*C3_bf_None_state_A*C6_bf_None_state_pro - bind_C3A_C6pro_to_C3AC6pro_kr*s35;
  r15: Bid_bf_None_state_T -> Bid_bf_None_state_M; equilibrate_BidT_to_BidM_kf*Bid_bf_None_state_T - equilibrate_BidT_to_BidM_kr*Bid_bf_None_state_M;
  r16: C3_bf_1_state_A__br_XIAP_bf_1 => XIAP_bf_None + C3_bf_None_state_ub; catalyze_XIAPC3A_to_XIAP_C3ub_kc*C3_bf_1_state_A__br_XIAP_bf_1;
  r17: s34 => C3_bf_None_state_A + PARP_bf_None_state_C; catalyze_C3APARPU_to_C3A_PARPC_kc*s34;
  r18: s35 => C3_bf_None_state_A + C6_bf_None_state_A; catalyze_C3AC6pro_to_C3A_C6A_kc*s35;
  r19: s22 + Bid_bf_None_state_M -> s40; bind_BidM_BaxM_to_BidMBaxM_kf*s22*Bid_bf_None_state_M - bind_BidM_BaxM_to_BidMBaxM_kr*s40;
  r20: s14 + Bid_bf_None_state_M -> s41; bind_BidM_BakM_to_BidMBakM_kf*s14*Bid_bf_None_state_M - bind_BidM_BakM_to_BidMBakM_kr*s41;
  r21: Bcl2_bf_None + Bid_bf_None_state_M -> Bcl2_bf_1__br_Bid_bf_1_state_M; bind_BidM_Bcl2_kf*Bcl2_bf_None*Bid_bf_None_state_M - bind_BidM_Bcl2_kr*Bcl2_bf_1__br_Bid_bf_1_state_M;
  r22: BclxL_bf_None_state_M + Bid_bf_None_state_M -> s43; bind_BidM_BclxLM_kf*BclxL_bf_None_state_M*Bid_bf_None_state_M - bind_BidM_BclxLM_kr*s43;
  r23: Mcl1_bf_None_state_M + Bid_bf_None_state_M -> s44; bind_BidM_Mcl1M_kf*Mcl1_bf_None_state_M*Bid_bf_None_state_M - bind_BidM_Mcl1M_kr*s44;
  r24: C8_bf_None_state_pro + C6_bf_None_state_A -> s45; bind_C6A_C8pro_to_C6AC8pro_kf*C8_bf_None_state_pro*C6_bf_None_state_A - bind_C6A_C8pro_to_C6AC8pro_kr*s45;
  r25: s40 => Bid_bf_None_state_M + s46; catalyze_BidMBaxM_to_BidM_BaxA_kc*s40;
  r26: s41 => Bid_bf_None_state_M + s47; catalyze_BidMBakM_to_BidM_BakA_kc*s41;
  r27: s45 => C8_bf_None_state_A + C6_bf_None_state_A; catalyze_C6AC8pro_to_C6A_C8A_kc*s45;
  r28: s22 + s46 -> s48; bind_BaxA_BaxM_to_BaxABaxM_kf*s22*s46 - bind_BaxA_BaxM_to_BaxABaxM_kr*s48;
  r29: s14 + s47 -> s49; bind_BakA_BakM_to_BakABakM_kf*s14*s47 - bind_BakA_BakM_to_BakABakM_kr*s49;
  r30: Bcl2_bf_None + s46 -> s50; bind_BaxA_Bcl2_kf*Bcl2_bf_None*s46 - bind_BaxA_Bcl2_kr*s50;
  r31: BclxL_bf_None_state_M + s46 -> s51; bind_BaxA_BclxLM_kf*BclxL_bf_None_state_M*s46 - bind_BaxA_BclxLM_kr*s51;
  r32: BclxL_bf_None_state_M + s47 -> s52; bind_BakA_BclxLM_kf*BclxL_bf_None_state_M*s47 - bind_BakA_BclxLM_kr*s52;
  r33: Mcl1_bf_None_state_M + s47 -> s53; bind_BakA_Mcl1_kf*Mcl1_bf_None_state_M*s47 - bind_BakA_Mcl1_kr*s53;
  r34: s46 + s46 -> s54; assemble_pore_sequential_Bax_2_kf*s46^2 - assemble_pore_sequential_Bax_2_kr*s54;
  r35: s47 + s47 -> s55; assemble_pore_sequential_Bak_2_kf*s47^2 - assemble_pore_sequential_Bak_2_kr*s55;
  r36: s48 => s46 + s46; catalyze_BaxABaxM_to_BaxA_BaxA_kc*s48;
  r37: s49 => s47 + s47; catalyze_BakABakM_to_BakA_BakA_kc*s49;
  r38: s46 + s54 -> s56; assemble_pore_sequential_Bax_3_kf*s46*s54 - assemble_pore_sequential_Bax_3_kr*s56;
  r39: s47 + s55 -> s57; assemble_pore_sequential_Bak_3_kf*s47*s55 - assemble_pore_sequential_Bak_3_kr*s57;
  r40: s46 + s56 -> s58; assemble_pore_sequential_Bax_4_kf*s46*s56 - assemble_pore_sequential_Bax_4_kr*s58;
  r41: s47 + s57 -> s59; assemble_pore_sequential_Bak_4_kf*s47*s57 - assemble_pore_sequential_Bak_4_kr*s59;
  r42: CytoC_bf_None_state_M + s58 -> s60; pore_transport_complex_BaxA_4_CytoCM_kf*CytoC_bf_None_state_M*s58 - pore_transport_complex_BaxA_4_CytoCM_kr*s60;
  r43: Smac_bf_None_state_M + s58 -> s61; pore_transport_complex_BaxA_4_SmacM_kf*Smac_bf_None_state_M*s58 - pore_transport_complex_BaxA_4_SmacM_kr*s61;
  r44: CytoC_bf_None_state_M + s59 -> s62; pore_transport_complex_BakA_4_CytoCM_kf*CytoC_bf_None_state_M*s59 - pore_transport_complex_BakA_4_CytoCM_kr*s62;
  r45: Smac_bf_None_state_M + s59 -> s63; pore_transport_complex_BakA_4_SmacM_kf*Smac_bf_None_state_M*s59 - pore_transport_complex_BakA_4_SmacM_kr*s63;
  r46: s60 => s58 + CytoC_bf_None_state_C; pore_transport_dissociate_BaxA_4_CytoCC_kc*s60;
  r47: s61 => s58 + Smac_bf_None_state_C; pore_transport_dissociate_BaxA_4_SmacC_kc*s61;
  r48: s62 => s59 + CytoC_bf_None_state_C; pore_transport_dissociate_BakA_4_CytoCC_kc*s62;
  r49: s63 => s59 + Smac_bf_None_state_C; pore_transport_dissociate_BakA_4_SmacC_kc*s63;
  r50: Smac_bf_None_state_C -> Smac_bf_None_state_A; equilibrate_SmacC_to_SmacA_kf*Smac_bf_None_state_C - equilibrate_SmacC_to_SmacA_kr*Smac_bf_None_state_A;
  r51: CytoC_bf_None_state_C -> CytoC_bf_None_state_A; equilibrate_CytoCC_to_CytoCA_kf*CytoC_bf_None_state_C - equilibrate_CytoCC_to_CytoCA_kr*CytoC_bf_None_state_A;
  r52: Apaf_bf_None_state_I + CytoC_bf_None_state_A -> s68; bind_CytoCA_ApafI_to_CytoCAApafI_kf*Apaf_bf_None_state_I*CytoC_bf_None_state_A - bind_CytoCA_ApafI_to_CytoCAApafI_kr*s68;
  r53: XIAP_bf_None + Smac_bf_None_state_A -> Smac_bf_1_state_A__br_XIAP_bf_1; bind_SmacA_XIAP_kf*XIAP_bf_None*Smac_bf_None_state_A - bind_SmacA_XIAP_kr*Smac_bf_1_state_A__br_XIAP_bf_1;
  r54: s68 => CytoC_bf_None_state_A + Apaf_bf_None_state_A; catalyze_CytoCAApafI_to_CytoCA_ApafA_kc*s68;
  r55: C9_bf_None + Apaf_bf_None_state_A -> Apop_bf_None; convert_ApafA_C9_to_Apop_kf*Apaf_bf_None_state_A*C9_bf_None - convert_ApafA_C9_to_Apop_kr*Apop_bf_None;
  r56: C3_bf_None_state_pro + Apop_bf_None -> Apop_bf_1__br_C3_bf_1_state_pro; bind_Apop_C3pro_to_ApopC3pro_kf*C3_bf_None_state_pro*Apop_bf_None - bind_Apop_C3pro_to_ApopC3pro_kr*Apop_bf_1__br_C3_bf_1_state_pro;
  r57: XIAP_bf_None + Apop_bf_None -> Apop_bf_1__br_XIAP_bf_1; bind_Apop_XIAP_kf*XIAP_bf_None*Apop_bf_None - bind_Apop_XIAP_kr*Apop_bf_1__br_XIAP_bf_1;
  r58: Apop_bf_1__br_C3_bf_1_state_pro => C3_bf_None_state_A + Apop_bf_None; catalyze_ApopC3pro_to_Apop_C3A_kc*Apop_bf_1__br_C3_bf_1_state_pro;
end
