// SBML level 2 version 4

function Constant_flux_irreversible(v)
  v;
end
Constant_flux_irreversible is "Constant flux (irreversible)";

model MODEL1303140000()
  // Mazemondet2012 - beta-catenin dynamics in human neural progenitor cells
  // biomodels.db:MODEL1303140000
  // hasTaxon taxonomy:9606
  // occursIn BTO:0000138

  // Compartments:
  compartment cyto = 1;
  compartment nucl = 1;

  // Species:
  species BetaCyt in cyto = 16365;
  species Axin in cyto = 4;
  species AxinP in cyto = 0;
  species Wnt in cyto = 1000;
  species BetaNuc in nucl = 6655;

  // Reactions:
  v12: => BetaCyt; cyto*Constant_flux_irreversible(v);
    v = 300;
  k13: BetaCyt => ; cyto*k13_k1*BetaCyt;
    k13_k1 = 0.000113;
  In: BetaCyt => BetaNuc; In_k1*BetaCyt;
    In_k1 = 0.0549;
  Out: BetaNuc => BetaCyt; Out_k1*BetaNuc;
    Out_k1 = 0.135;
  aPho: Axin => AxinP; cyto*aPho_k1*Axin;
    aPho_k1 = 0.001619;
  aDec: Axin => ; cyto*aDec_k1*Axin;
    aDec_k1 = 0.0167;
  apDec: AxinP => ; cyto*apDec_k1*AxinP;
    apDec_k1 = 0.167;
  aProd: BetaNuc => Axin + BetaNuc; aProd_k1*BetaNuc;
    aProd_k1 = 9.9e-5;
  Deg: AxinP + BetaCyt => AxinP; cyto*Deg_k1*AxinP*BetaCyt;
    Deg_k1 = 0.1;
  dephoBasic: AxinP => Axin; cyto*dephoBasic_k1*AxinP;
    dephoBasic_k1 = 0.0182;
  dephoAcc: AxinP + Wnt => Axin + Wnt; cyto*dephoAcc_k1*AxinP*Wnt;
    dephoAcc_k1 = 10;
  Wdec: Wnt => ; cyto*Wdec_k1*Wnt;
    Wdec_k1 = 0.27;

  // Unit definitions:
  unit volume = 1e-12 litre;
  unit time = 60 second;
  unit substance = item;
end
