// SBML level 2 version 4

model MODEL1304300000()
  // Hofmeyr1996 - metabolic control analysis
  // Understanding of genetic mechanisms would not be possible by studying the properties of individual components. To better understand the system as a whole, it is necessary to study the interaction between components and their response to each other. This paper describes a strategy for the experimental control analysis called co-response analysis.
  // This model is described in the article:
  // Co-response analysis: a new experimental strategy for metabolic control analysis
  // Hofmeyr JH, Cornish-Bowden A
  // Journal of Theoretical Biology [1996, 182(3):371-380]
  // Abstract:
  // The formulation of the standard summation and connectivity relationships as a statement that the matrix of all the elasticities in a system is the inverse of the matrix of all the control coefficients is completely general, provided that only control coefficients for independent fluxes and concentrations are considered, and that the elasticity matrix is written to take account of the stoichiometry of the pathway and the implied dependences between concentrations. This generally implies that co-response analysis is also general, i.e. that all of the elasticities and all of the control coefficients in any system, regardless of branching, feedback effects, moiety conservation or other complications, can be determined by comparing the effects of perturbations of the enzyme activities on the steady-state fluxes and concentrations of the pathway. The approach requires no quantitative information about the magnitudes of the effects on the individual enzyme activities, and consequently no enzymes need to be studied in isolation from the pathway.
  // This model is hosted on BioModels Database and identified by: MODEL1304300000 .
  // To cite BioModels Database, please use: BioModels Database: An enhanced, curated and annotated resource for published quantitative kinetic models .
  // To the extent possible under law, all copyright and related or neighbouring rights to this encoded model have been dedicated to the public domain worldwide. Please refer to CC0 Public Domain Dedication for more information.
  // isDescribedBy pubmed:8944170
  // biomodels.db:MODEL1304300000
  // isVersionOf GO:0050790

  // Compartments:
  compartment cell = 1;  // GO:0005623

  // Species:
  species s1 in cell = 0;
  species s2 in cell = 2.5;
  species s3 in cell = 2.5;
  species $x0 in cell = 10;
  species $x4 in cell = 0;
  species $x5 in cell = 0;
  species $x6 in cell = 1;
  species $x7 in cell = 1;

  // Reactions:
  v1: $x0 + s2 -> s1 + s3; e1*(p1*x0*s2 - s1*s3)/(1 + x0 + s2 + s1 + s3 + x0*s2 + s1*s3);
    e1 = 1 dimensionless; p1 = 10 dimensionless;
  v2: $x6 + s3 -> $x7 + s2; e2*(p2*x6*s3 - x7*s2)/(1 + s3 + s2 + x6 + x7 + s3*x6 + s2*x7);
    e2 = 1 dimensionless; p2 = 10 dimensionless;
  v3: s1 -> $x4; e3*(p3*s1 - x4)/(1 + s1 + x4);
    e3 = 1 dimensionless; p3 = 50 dimensionless;
  v4: s1 -> $x5; e4*(p4*s1 - x5)/(1 + s1 + x5);
    e4 = 1 dimensionless; p4 = 10 dimensionless;

  // Unit definitions:
  unit substance = dimensionless;
  unit time = dimensionless;
  unit volume = dimensionless;
end
