// SBML level 2 version 4

model MODEL1305010000()
  // Chavez2009 - a core regulatory network of OCT4 in human embryonic stem cells
  // A core OCT4-regulated network has been identified as a test case, to analyase stem cell characteristics and cellular differentiation.
  // This model is described in the article:
  // In silico identification of a core regulatory network of OCT4 in human embryonic stem cells using an integrated approach.
  // Chavez L, Bais AS, Vingron M, Lehrach H, Adjaye J, Herwig R
  // BMC Genomics, 2009, 10:314
  // Abstract:
  // BACKGROUND: The transcription factor OCT4 is highly expressed in pluripotent embryonic stem cells which are derived from the inner cell mass of mammalian blastocysts. Pluripotency and self renewal are controlled by a transcription regulatory network governed by the transcription factors OCT4, SOX2 and NANOG. Recent studies on reprogramming somatic cells to induced pluripotent stem cells highlight OCT4 as a key regulator of pluripotency.
  // RESULTS: We have carried out an integrated analysis of high-throughput data (ChIP-on-chip and RNAi experiments along with promoter sequence analysis of putative target genes) and identified a core OCT4 regulatory network in human embryonic stem cells consisting of 33 target genes. Enrichment analysis with these target genes revealed that this integrative analysis increases the functional information content by factors of 1.3 - 4.7 compared to the individual studies. In order to identify potential regulatory co-factors of OCT4, we performed a de novo motif analysis. In addition to known validated OCT4 motifs we obtained binding sites similar to motifs recognized by further regulators of pluripotency and development; e.g. the heterodimer of the transcription factors C-MYC and MAX, a prerequisite for C-MYC transcriptional activity that leads to cell growth and proliferation.
  // CONCLUSION: Our analysis shows how heterogeneous functional information can be integrated in order to reconstruct gene regulatory networks. As a test case we identified a core OCT4-regulated network that is important for the analysis of stem cell characteristics and cellular differentiation. Functional information is largely enriched using different experimental results. The de novo motif discovery identified well-known regulators closely connected to the OCT4 network as well as potential new regulators of pluripotency and differentiation. These results provide the basis for further targeted functional studies.
  // This model is hosted on BioModels Database and identified by: MODEL1305010000 .
  // To cite BioModels Database, please use: BioModels Database: An enhanced, curated and annotated resource for published quantitative kinetic models .
  // To the extent possible under law, all copyright and related or neighbouring rights to this encoded model have been dedicated to the public domain worldwide. Please refer to CC0 Public Domain Dedication for more information.
  // biomodels.db:MODEL1305010000
  // hasTaxon taxonomy:9606
  // isVersionOf GO:0019827
  // occursIn BTO:0001086

  // Compartments:
  compartment Compartment__Reactome_356; Compartment__Reactome_356 is "cell";
  compartment Compartment__Reactome_354; Compartment__Reactome_354 is "intracellular";
  compartment Compartment__Reactome_352; Compartment__Reactome_352 is "nucleus";
  compartment Compartment__Reactome_13231; Compartment__Reactome_13231 is "nuclear membrane";
  compartment Compartment__Reactome_13230; Compartment__Reactome_13230 is "nuclear pore";
  compartment Compartment__Reactome_7660; Compartment__Reactome_7660 is "nucleoplasm";
  compartment Compartment__Reactome_459; Compartment__Reactome_459 is "cytoplasm";
  compartment Compartment__Reactome_70101; Compartment__Reactome_70101 is "cytosol";

  // Species:
  species $Enzyme__RNAPolymerase in Compartment__Reactome_7660 = 100;
  species Enzyme__Spliceosome in Compartment__Reactome_7660 = 1;
  species Gene__BAMBI in Compartment__Reactome_7660 = 1;
  species Gene__C9orf97 in Compartment__Reactome_7660 = 1;
  species Gene__CDX2 in Compartment__Reactome_7660 = 1;
  species Gene__DKK1 in Compartment__Reactome_7660 = 1;
  species Gene__EOMES in Compartment__Reactome_7660 = 1;
  species Gene__EPHA1 in Compartment__Reactome_7660 = 1;
  species Gene__EXOSC9 in Compartment__Reactome_7660 = 1;
  species Gene__FGF2 in Compartment__Reactome_7660 = 1;
  species Gene__FOXD3 in Compartment__Reactome_7660 = 1;
  species Gene__FRAT2 in Compartment__Reactome_7660 = 1;
  species Gene__GAP43 in Compartment__Reactome_7660 = 1;
  species Gene__GATA6 in Compartment__Reactome_7660 = 1;
  species Gene__GNG10 in Compartment__Reactome_7660 = 1;
  species Gene__GSC in Compartment__Reactome_7660 = 1;
  species Gene__KDR in Compartment__Reactome_7660 = 1;
  species Gene__LEFTY2 in Compartment__Reactome_7660 = 1;
  species Gene__MAGED2 in Compartment__Reactome_7660 = 1;
  species Gene__NAALAD2 in Compartment__Reactome_7660 = 1;
  species Gene__NANOG in Compartment__Reactome_7660 = 1;
  species Gene__ORC1L in Compartment__Reactome_7660 = 1;
  species Gene__PAX6 in Compartment__Reactome_7660 = 1;
  species Gene__PHF17 in Compartment__Reactome_7660 = 1;
  species Gene__PIP5K1C in Compartment__Reactome_7660 = 1;
  species Gene__POU5F1 in Compartment__Reactome_7660 = 1;
  species Gene__RAB5A in Compartment__Reactome_7660 = 1;
  species Gene__SFRP2 in Compartment__Reactome_7660 = 1;
  species Gene__SOX2 in Compartment__Reactome_7660 = 1;
  species Gene__SSBP2 in Compartment__Reactome_7660 = 1;
  species Gene__TCF4 in Compartment__Reactome_7660 = 1;
  species Gene__TDGF1 in Compartment__Reactome_7660 = 1;
  species Gene__TGIF2 in Compartment__Reactome_7660 = 1;
  species Gene__TNC in Compartment__Reactome_7660 = 1;
  species Gene__TSC22D1 in Compartment__Reactome_7660 = 1;
  species Protein__BAMBI in Compartment__Reactome_7660 = 1;
  species Protein__C9orf97 in Compartment__Reactome_7660 = 1;
  species Protein__CDX2 in Compartment__Reactome_7660 = 1;
  species Protein__DKK1 in Compartment__Reactome_7660 = 1;
  species Protein__EOMES in Compartment__Reactome_7660 = 1;
  species Protein__EPHA1 in Compartment__Reactome_7660 = 1;
  species Protein__EXOSC9 in Compartment__Reactome_7660 = 1;
  species Protein__FGF2 in Compartment__Reactome_7660 = 1;
  species Protein__FOXD3 in Compartment__Reactome_7660 = 1;
  species Protein__FRAT2 in Compartment__Reactome_7660 = 1;
  species Protein__GAP43 in Compartment__Reactome_7660 = 1;
  species Protein__GATA6 in Compartment__Reactome_7660 = 1;
  species Protein__GNG10 in Compartment__Reactome_7660 = 1;
  species Protein__GSC in Compartment__Reactome_7660 = 1;
  species Protein__KDR in Compartment__Reactome_7660 = 1;
  species Protein__LEFTY2 in Compartment__Reactome_7660 = 1;
  species Protein__MAGED2 in Compartment__Reactome_7660 = 1;
  species Protein__NAALAD2 in Compartment__Reactome_7660 = 1;
  species Protein__NANOG in Compartment__Reactome_7660 = 1;
  species Protein__ORC1L in Compartment__Reactome_7660 = 1;
  species Protein__PAX6 in Compartment__Reactome_7660 = 1;
  species Protein__PHF17 in Compartment__Reactome_7660 = 1;
  species Protein__PIP5K1C in Compartment__Reactome_7660 = 1;
  species $Protein__POU5F1 in Compartment__Reactome_7660 = 100;
  species Protein__RAB5A in Compartment__Reactome_7660 = 1;
  species Protein__SFRP2 in Compartment__Reactome_7660 = 1;
  species Protein__SOX2 in Compartment__Reactome_7660 = 1;
  species Protein__SSBP2 in Compartment__Reactome_7660 = 1;
  species Protein__TCF4 in Compartment__Reactome_7660 = 1;
  species Protein__TDGF1 in Compartment__Reactome_7660 = 1;
  species Protein__TGIF2 in Compartment__Reactome_7660 = 1;
  species Protein__TNC in Compartment__Reactome_7660 = 1;
  species Protein__TSC22D1 in Compartment__Reactome_7660 = 1;
  species $Enzyme__Proteasome in Compartment__Reactome_70101 = 100;
  species Enzyme__RNase in Compartment__Reactome_70101 = 1;
  species Enzyme__Ribosome in Compartment__Reactome_70101 = 1;

  // Reactions:
  Enzyme__RNAPolymerase_0: => Protein__NAALAD2; Enzyme__RNAPolymerase_0_P_echino1_k*Protein__NANOG*(1/(1 + 1*Protein__POU5F1))*Enzyme__RNAPolymerase;  // modifiers: Protein__NANOG, Protein__POU5F1, Enzyme__RNAPolymerase
    Enzyme__RNAPolymerase_0_P_echino1_k = 1;
  Enzyme__RNAPolymerase_1: => Protein__BAMBI; Enzyme__RNAPolymerase_1_P_echino1_k*Protein__NANOG*Protein__SOX2*(1/(1 + 1*Protein__POU5F1))*Enzyme__RNAPolymerase;  // modifiers: Protein__NANOG, Protein__SOX2, Protein__POU5F1, Enzyme__RNAPolymerase
    Enzyme__RNAPolymerase_1_P_echino1_k = 1;
  Enzyme__RNAPolymerase_2: => Protein__TDGF1; Enzyme__RNAPolymerase_2_P_echino1_k*Protein__NANOG*Protein__POU5F1*Protein__SOX2*(1/(1 + 1))*Enzyme__RNAPolymerase;  // modifiers: Protein__NANOG, Protein__POU5F1, Protein__SOX2, Enzyme__RNAPolymerase
    Enzyme__RNAPolymerase_2_P_echino1_k = 1;
  Enzyme__RNAPolymerase_3: => Protein__GSC; Enzyme__RNAPolymerase_3_P_echino1_k*Protein__NANOG*(1/(1 + 1*Protein__POU5F1))*Enzyme__RNAPolymerase;  // modifiers: Protein__NANOG, Protein__POU5F1, Enzyme__RNAPolymerase
    Enzyme__RNAPolymerase_3_P_echino1_k = 1;
  Enzyme__RNAPolymerase_4: => Protein__MAGED2; Enzyme__RNAPolymerase_4_P_echino1_k*Protein__NANOG*(1/(1 + 1*Protein__POU5F1))*Enzyme__RNAPolymerase;  // modifiers: Protein__NANOG, Protein__POU5F1, Enzyme__RNAPolymerase
    Enzyme__RNAPolymerase_4_P_echino1_k = 1;
  Enzyme__RNAPolymerase_5: => Protein__FRAT2; Enzyme__RNAPolymerase_5_P_echino1_k*Protein__NANOG*Protein__POU5F1*Protein__SOX2*(1/(1 + 1))*Enzyme__RNAPolymerase;  // modifiers: Protein__NANOG, Protein__POU5F1, Protein__SOX2, Enzyme__RNAPolymerase
    Enzyme__RNAPolymerase_5_P_echino1_k = 1;
  Enzyme__RNAPolymerase_6: => Protein__KDR; Enzyme__RNAPolymerase_6_P_echino1_k*Protein__NANOG*Protein__POU5F1*Protein__SOX2*(1/(1 + 1))*Enzyme__RNAPolymerase;  // modifiers: Protein__NANOG, Protein__POU5F1, Protein__SOX2, Enzyme__RNAPolymerase
    Enzyme__RNAPolymerase_6_P_echino1_k = 1;
  Enzyme__RNAPolymerase_7: => Protein__TGIF2; Enzyme__RNAPolymerase_7_P_echino1_k*Protein__SOX2*(1/(1 + 1*Protein__POU5F1))*Enzyme__RNAPolymerase;  // modifiers: Protein__SOX2, Protein__POU5F1, Enzyme__RNAPolymerase
    Enzyme__RNAPolymerase_7_P_echino1_k = 1;
  Enzyme__RNAPolymerase_8: => Protein__GAP43; Enzyme__RNAPolymerase_8_P_echino1_k*Protein__POU5F1*(1/(1 + 1))*Enzyme__RNAPolymerase;  // modifiers: Protein__POU5F1, Enzyme__RNAPolymerase
    Enzyme__RNAPolymerase_8_P_echino1_k = 1;
  Enzyme__RNAPolymerase_9: => $Protein__POU5F1; Enzyme__RNAPolymerase_9_P_echino1_k*Protein__NANOG*Protein__POU5F1*Protein__SOX2*(1/(1 + 1))*Enzyme__RNAPolymerase;  // modifiers: Protein__NANOG, Protein__SOX2, Enzyme__RNAPolymerase
    Enzyme__RNAPolymerase_9_P_echino1_k = 1;
  Enzyme__RNAPolymerase_10: => Protein__GNG10; Enzyme__RNAPolymerase_10_P_echino1_k*Protein__NANOG*Protein__SOX2*(1/(1 + 1*Protein__POU5F1))*Enzyme__RNAPolymerase;  // modifiers: Protein__NANOG, Protein__SOX2, Protein__POU5F1, Enzyme__RNAPolymerase
    Enzyme__RNAPolymerase_10_P_echino1_k = 1;
  Enzyme__RNAPolymerase_11: => Protein__ORC1L; Enzyme__RNAPolymerase_11_P_echino1_k*Protein__NANOG*Protein__POU5F1*(1/(1 + 1))*Enzyme__RNAPolymerase;  // modifiers: Protein__NANOG, Protein__POU5F1, Enzyme__RNAPolymerase
    Enzyme__RNAPolymerase_11_P_echino1_k = 1;
  Enzyme__RNAPolymerase_12: => Protein__EXOSC9; Enzyme__RNAPolymerase_12_P_echino1_k*Protein__POU5F1*(1/(1 + 1))*Enzyme__RNAPolymerase;  // modifiers: Protein__POU5F1, Enzyme__RNAPolymerase
    Enzyme__RNAPolymerase_12_P_echino1_k = 1;
  Enzyme__RNAPolymerase_13: => Protein__LEFTY2; Enzyme__RNAPolymerase_13_P_echino1_k*Protein__NANOG*Protein__POU5F1*(1/(1 + 1))*Enzyme__RNAPolymerase;  // modifiers: Protein__NANOG, Protein__POU5F1, Enzyme__RNAPolymerase
    Enzyme__RNAPolymerase_13_P_echino1_k = 1;
  Enzyme__RNAPolymerase_14: => Protein__SFRP2; Enzyme__RNAPolymerase_14_P_echino1_k*Protein__NANOG*Protein__POU5F1*Protein__SOX2*(1/(1 + 1))*Enzyme__RNAPolymerase;  // modifiers: Protein__NANOG, Protein__POU5F1, Protein__SOX2, Enzyme__RNAPolymerase
    Enzyme__RNAPolymerase_14_P_echino1_k = 1;
  Enzyme__RNAPolymerase_15: => Protein__C9orf97; Enzyme__RNAPolymerase_15_P_echino1_k*(1/(1 + 1*Protein__POU5F1))*Enzyme__RNAPolymerase;  // modifiers: Protein__POU5F1, Enzyme__RNAPolymerase
    Enzyme__RNAPolymerase_15_P_echino1_k = 1;
  Enzyme__RNAPolymerase_16: => Protein__PHF17; Enzyme__RNAPolymerase_16_P_echino1_k*Protein__NANOG*Protein__POU5F1*Protein__SOX2*(1/(1 + 1))*Enzyme__RNAPolymerase;  // modifiers: Protein__NANOG, Protein__POU5F1, Protein__SOX2, Enzyme__RNAPolymerase
    Enzyme__RNAPolymerase_16_P_echino1_k = 1;
  Enzyme__RNAPolymerase_17: => Protein__EPHA1; Enzyme__RNAPolymerase_17_P_echino1_k*Protein__NANOG*Protein__POU5F1*Protein__SOX2*(1/(1 + 1))*Enzyme__RNAPolymerase;  // modifiers: Protein__NANOG, Protein__POU5F1, Protein__SOX2, Enzyme__RNAPolymerase
    Enzyme__RNAPolymerase_17_P_echino1_k = 1;
  Enzyme__RNAPolymerase_18: => Protein__SOX2; Enzyme__RNAPolymerase_18_P_echino1_k*Protein__NANOG*Protein__POU5F1*Protein__SOX2*(1/(1 + 1))*Enzyme__RNAPolymerase;  // modifiers: Protein__NANOG, Protein__POU5F1, Enzyme__RNAPolymerase
    Enzyme__RNAPolymerase_18_P_echino1_k = 100;
  Enzyme__RNAPolymerase_19: => Protein__FOXD3; Enzyme__RNAPolymerase_19_P_echino1_k*Protein__NANOG*Protein__POU5F1*(1/(1 + 1))*Enzyme__RNAPolymerase;  // modifiers: Protein__NANOG, Protein__POU5F1, Enzyme__RNAPolymerase
    Enzyme__RNAPolymerase_19_P_echino1_k = 1;
  Enzyme__RNAPolymerase_20: => Protein__GATA6; Enzyme__RNAPolymerase_20_P_echino1_k*Protein__NANOG*Protein__SOX2*(1/(1 + 1*Protein__POU5F1))*Enzyme__RNAPolymerase;  // modifiers: Protein__NANOG, Protein__SOX2, Protein__POU5F1, Enzyme__RNAPolymerase
    Enzyme__RNAPolymerase_20_P_echino1_k = 1;
  Enzyme__RNAPolymerase_21: => Protein__PIP5K1C; Enzyme__RNAPolymerase_21_P_echino1_k*Protein__SOX2*(1/(1 + 1*Protein__POU5F1))*Enzyme__RNAPolymerase;  // modifiers: Protein__SOX2, Protein__POU5F1, Enzyme__RNAPolymerase
    Enzyme__RNAPolymerase_21_P_echino1_k = 1;
  Enzyme__RNAPolymerase_22: => Protein__TCF4; Enzyme__RNAPolymerase_22_P_echino1_k*Protein__POU5F1*(1/(1 + 1))*Enzyme__RNAPolymerase;  // modifiers: Protein__POU5F1, Enzyme__RNAPolymerase
    Enzyme__RNAPolymerase_22_P_echino1_k = 1;
  Enzyme__RNAPolymerase_23: => Protein__NANOG; Enzyme__RNAPolymerase_23_P_echino1_k*Protein__NANOG*Protein__POU5F1*Protein__SOX2*(1/(1 + 1))*Enzyme__RNAPolymerase;  // modifiers: Protein__POU5F1, Protein__SOX2, Enzyme__RNAPolymerase
    Enzyme__RNAPolymerase_23_P_echino1_k = 1;
  Enzyme__RNAPolymerase_24: => Protein__SSBP2; Enzyme__RNAPolymerase_24_P_echino1_k*(1/(1 + 1*Protein__POU5F1))*Enzyme__RNAPolymerase;  // modifiers: Protein__POU5F1, Enzyme__RNAPolymerase
    Enzyme__RNAPolymerase_24_P_echino1_k = 1;
  Enzyme__RNAPolymerase_25: => Protein__TSC22D1; Enzyme__RNAPolymerase_25_P_echino1_k*Protein__NANOG*Protein__SOX2*(1/(1 + 1*Protein__POU5F1))*Enzyme__RNAPolymerase;  // modifiers: Protein__NANOG, Protein__SOX2, Protein__POU5F1, Enzyme__RNAPolymerase
    Enzyme__RNAPolymerase_25_P_echino1_k = 1;
  Enzyme__RNAPolymerase_26: => Protein__PAX6; Enzyme__RNAPolymerase_26_P_echino1_k*Protein__NANOG*Protein__SOX2*(1/(1 + 1*Protein__POU5F1))*Enzyme__RNAPolymerase;  // modifiers: Protein__NANOG, Protein__SOX2, Protein__POU5F1, Enzyme__RNAPolymerase
    Enzyme__RNAPolymerase_26_P_echino1_k = 1;
  Enzyme__RNAPolymerase_27: => Protein__TNC; Enzyme__RNAPolymerase_27_P_echino1_k*Protein__NANOG*Protein__SOX2*(1/(1 + 1*Protein__POU5F1))*Enzyme__RNAPolymerase;  // modifiers: Protein__NANOG, Protein__SOX2, Protein__POU5F1, Enzyme__RNAPolymerase
    Enzyme__RNAPolymerase_27_P_echino1_k = 1;
  Enzyme__RNAPolymerase_28: => Protein__RAB5A; Enzyme__RNAPolymerase_28_P_echino1_k*Protein__NANOG*Protein__POU5F1*(1/(1 + 1))*Enzyme__RNAPolymerase;  // modifiers: Protein__NANOG, Protein__POU5F1, Enzyme__RNAPolymerase
    Enzyme__RNAPolymerase_28_P_echino1_k = 1;
  Enzyme__RNAPolymerase_29: => Protein__CDX2; Enzyme__RNAPolymerase_29_P_echino1_k*Protein__NANOG*(1/(1 + 1*Protein__POU5F1))*Enzyme__RNAPolymerase;  // modifiers: Protein__NANOG, Protein__POU5F1, Enzyme__RNAPolymerase
    Enzyme__RNAPolymerase_29_P_echino1_k = 1;
  Enzyme__RNAPolymerase_30: => Protein__EOMES; Enzyme__RNAPolymerase_30_P_echino1_k*Protein__NANOG*Protein__SOX2*(1/(1 + 1*Protein__POU5F1))*Enzyme__RNAPolymerase;  // modifiers: Protein__NANOG, Protein__SOX2, Protein__POU5F1, Enzyme__RNAPolymerase
    Enzyme__RNAPolymerase_30_P_echino1_k = 1;
  Enzyme__RNAPolymerase_31: => Protein__FGF2; Enzyme__RNAPolymerase_31_P_echino1_k*Protein__NANOG*Protein__POU5F1*Protein__SOX2*(1/(1 + 1))*Enzyme__RNAPolymerase;  // modifiers: Protein__NANOG, Protein__POU5F1, Protein__SOX2, Enzyme__RNAPolymerase
    Enzyme__RNAPolymerase_31_P_echino1_k = 1;
  Enzyme__RNAPolymerase_32: => Protein__DKK1; Enzyme__RNAPolymerase_32_P_echino1_k*Protein__NANOG*(1/(1 + 1*Protein__POU5F1))*Enzyme__RNAPolymerase;  // modifiers: Protein__NANOG, Protein__POU5F1, Enzyme__RNAPolymerase
    Enzyme__RNAPolymerase_32_P_echino1_k = 1;
  Enzyme__Proteasome_0: Protein__TCF4 => ; Enzyme__Proteasome_0_P_massi_k*Protein__TCF4*Enzyme__Proteasome;  // modifiers: Enzyme__Proteasome
    Enzyme__Proteasome_0_P_massi_k = 1;
  Enzyme__Proteasome_1: Protein__BAMBI => ; Enzyme__Proteasome_1_P_massi_k*Protein__BAMBI*Enzyme__Proteasome;  // modifiers: Enzyme__Proteasome
    Enzyme__Proteasome_1_P_massi_k = 1;
  Enzyme__Proteasome_2: Protein__RAB5A => ; Enzyme__Proteasome_2_P_massi_k*Protein__RAB5A*Enzyme__Proteasome;  // modifiers: Enzyme__Proteasome
    Enzyme__Proteasome_2_P_massi_k = 1;
  Enzyme__Proteasome_3: Protein__GNG10 => ; Enzyme__Proteasome_3_P_massi_k*Protein__GNG10*Enzyme__Proteasome;  // modifiers: Enzyme__Proteasome
    Enzyme__Proteasome_3_P_massi_k = 1;
  Enzyme__Proteasome_4: Protein__FGF2 => ; Enzyme__Proteasome_4_P_massi_k*Protein__FGF2*Enzyme__Proteasome;  // modifiers: Enzyme__Proteasome
    Enzyme__Proteasome_4_P_massi_k = 1;
  Enzyme__Proteasome_5: Protein__TDGF1 => ; Enzyme__Proteasome_5_P_massi_k*Protein__TDGF1*Enzyme__Proteasome;  // modifiers: Enzyme__Proteasome
    Enzyme__Proteasome_5_P_massi_k = 1;
  Enzyme__Proteasome_6: Protein__PIP5K1C => ; Enzyme__Proteasome_6_P_massi_k*Protein__PIP5K1C*Enzyme__Proteasome;  // modifiers: Enzyme__Proteasome
    Enzyme__Proteasome_6_P_massi_k = 1;
  Enzyme__Proteasome_7: Protein__CDX2 => ; Enzyme__Proteasome_7_P_massi_k*Protein__CDX2*Enzyme__Proteasome;  // modifiers: Enzyme__Proteasome
    Enzyme__Proteasome_7_P_massi_k = 1;
  Enzyme__Proteasome_8: Protein__SFRP2 => ; Enzyme__Proteasome_8_P_massi_k*Protein__SFRP2*Enzyme__Proteasome;  // modifiers: Enzyme__Proteasome
    Enzyme__Proteasome_8_P_massi_k = 1;
  Enzyme__Proteasome_9: Protein__FOXD3 => ; Enzyme__Proteasome_9_P_massi_k*Protein__FOXD3*Enzyme__Proteasome;  // modifiers: Enzyme__Proteasome
    Enzyme__Proteasome_9_P_massi_k = 1;
  Enzyme__Proteasome_10: Protein__KDR => ; Enzyme__Proteasome_10_P_massi_k*Protein__KDR*Enzyme__Proteasome;  // modifiers: Enzyme__Proteasome
    Enzyme__Proteasome_10_P_massi_k = 1;
  Enzyme__Proteasome_11: Protein__TSC22D1 => ; Enzyme__Proteasome_11_P_massi_k*Protein__TSC22D1*Enzyme__Proteasome;  // modifiers: Enzyme__Proteasome
    Enzyme__Proteasome_11_P_massi_k = 1;
  Enzyme__Proteasome_12: Protein__SOX2 => ; Enzyme__Proteasome_12_P_massi_k*Protein__SOX2*Enzyme__Proteasome;  // modifiers: Enzyme__Proteasome
    Enzyme__Proteasome_12_P_massi_k = 1;
  Enzyme__Proteasome_13: Protein__GAP43 => ; Enzyme__Proteasome_13_P_massi_k*Protein__GAP43*Enzyme__Proteasome;  // modifiers: Enzyme__Proteasome
    Enzyme__Proteasome_13_P_massi_k = 1;
  Enzyme__Proteasome_14: Protein__PHF17 => ; Enzyme__Proteasome_14_P_massi_k*Protein__PHF17*Enzyme__Proteasome;  // modifiers: Enzyme__Proteasome
    Enzyme__Proteasome_14_P_massi_k = 1;
  Enzyme__Proteasome_15: $Protein__POU5F1 => ; Enzyme__Proteasome_15_P_massi_k*Protein__POU5F1*Enzyme__Proteasome;  // modifiers: Enzyme__Proteasome
    Enzyme__Proteasome_15_P_massi_k = 1;
  Enzyme__Proteasome_16: Protein__TNC => ; Enzyme__Proteasome_16_P_massi_k*Protein__TNC*Enzyme__Proteasome;  // modifiers: Enzyme__Proteasome
    Enzyme__Proteasome_16_P_massi_k = 1;
  Enzyme__Proteasome_17: Protein__EPHA1 => ; Enzyme__Proteasome_17_P_massi_k*Protein__EPHA1*Enzyme__Proteasome;  // modifiers: Enzyme__Proteasome
    Enzyme__Proteasome_17_P_massi_k = 1;
  Enzyme__Proteasome_18: Protein__C9orf97 => ; Enzyme__Proteasome_18_P_massi_k*Protein__C9orf97*Enzyme__Proteasome;  // modifiers: Enzyme__Proteasome
    Enzyme__Proteasome_18_P_massi_k = 1;
  Enzyme__Proteasome_19: Protein__DKK1 => ; Enzyme__Proteasome_19_P_massi_k*Protein__DKK1*Enzyme__Proteasome;  // modifiers: Enzyme__Proteasome
    Enzyme__Proteasome_19_P_massi_k = 1;
  Enzyme__Proteasome_20: Protein__MAGED2 => ; Enzyme__Proteasome_20_P_massi_k*Protein__MAGED2*Enzyme__Proteasome;  // modifiers: Enzyme__Proteasome
    Enzyme__Proteasome_20_P_massi_k = 1;
  Enzyme__Proteasome_21: Protein__ORC1L => ; Enzyme__Proteasome_21_P_massi_k*Protein__ORC1L*Enzyme__Proteasome;  // modifiers: Enzyme__Proteasome
    Enzyme__Proteasome_21_P_massi_k = 1;
  Enzyme__Proteasome_22: Protein__NAALAD2 => ; Enzyme__Proteasome_22_P_massi_k*Protein__NAALAD2*Enzyme__Proteasome;  // modifiers: Enzyme__Proteasome
    Enzyme__Proteasome_22_P_massi_k = 1;
  Enzyme__Proteasome_23: Protein__SSBP2 => ; Enzyme__Proteasome_23_P_massi_k*Protein__SSBP2*Enzyme__Proteasome;  // modifiers: Enzyme__Proteasome
    Enzyme__Proteasome_23_P_massi_k = 1;
  Enzyme__Proteasome_24: Protein__LEFTY2 => ; Enzyme__Proteasome_24_P_massi_k*Protein__LEFTY2*Enzyme__Proteasome;  // modifiers: Enzyme__Proteasome
    Enzyme__Proteasome_24_P_massi_k = 1;
  Enzyme__Proteasome_25: Protein__GSC => ; Enzyme__Proteasome_25_P_massi_k*Protein__GSC*Enzyme__Proteasome;  // modifiers: Enzyme__Proteasome
    Enzyme__Proteasome_25_P_massi_k = 1;
  Enzyme__Proteasome_26: Protein__FRAT2 => ; Enzyme__Proteasome_26_P_massi_k*Protein__FRAT2*Enzyme__Proteasome;  // modifiers: Enzyme__Proteasome
    Enzyme__Proteasome_26_P_massi_k = 1;
  Enzyme__Proteasome_27: Protein__TGIF2 => ; Enzyme__Proteasome_27_P_massi_k*Protein__TGIF2*Enzyme__Proteasome;  // modifiers: Enzyme__Proteasome
    Enzyme__Proteasome_27_P_massi_k = 1;
  Enzyme__Proteasome_28: Protein__PAX6 => ; Enzyme__Proteasome_28_P_massi_k*Protein__PAX6*Enzyme__Proteasome;  // modifiers: Enzyme__Proteasome
    Enzyme__Proteasome_28_P_massi_k = 1;
  Enzyme__Proteasome_29: Protein__EOMES => ; Enzyme__Proteasome_29_P_massi_k*Protein__EOMES*Enzyme__Proteasome;  // modifiers: Enzyme__Proteasome
    Enzyme__Proteasome_29_P_massi_k = 1;
  Enzyme__Proteasome_30: Protein__NANOG => ; Enzyme__Proteasome_30_P_massi_k*Protein__NANOG*Enzyme__Proteasome;  // modifiers: Enzyme__Proteasome
    Enzyme__Proteasome_30_P_massi_k = 1;
  Enzyme__Proteasome_31: Protein__GATA6 => ; Enzyme__Proteasome_31_P_massi_k*Protein__GATA6*Enzyme__Proteasome;  // modifiers: Enzyme__Proteasome
    Enzyme__Proteasome_31_P_massi_k = 1;
  Enzyme__Proteasome_32: Protein__EXOSC9 => ; Enzyme__Proteasome_32_P_massi_k*Protein__EXOSC9*Enzyme__Proteasome;  // modifiers: Enzyme__Proteasome
    Enzyme__Proteasome_32_P_massi_k = 1;
end
