// SBML level 2 version 4

function Constant_flux_irreversible(v)
  v;
end
Constant_flux_irreversible is "Constant flux (irreversible)";

function GLT(Vmax_glt, Glco, Km_glt_glco, Glci, Keq_glt, Km_glt_glci, Ki)
  Vmax_glt*(Glco/Km_glt_glco - Glci/(Km_glt_glco*Keq_glt))/(1 + Glco/Km_glt_glco + Glci/Km_glt_glci + Ki*Glco*Glci/(Km_glt_glco*Km_glt_glci));
end

function HK(Vmax_hk, Glci, ATP, Km_hk_glci, Km_hk_atp, G6P, ADP, Keq_hk, Km_hk_g6p, T6P, Ki_hk_t6p, Km_hk_adp)
  Vmax_hk*(Glci*ATP/(Km_hk_glci*Km_hk_atp) - G6P*ADP/(Km_hk_glci*Km_hk_atp*Keq_hk))/((1 + Glci/Km_hk_glci + G6P/Km_hk_g6p + T6P/Ki_hk_t6p)*(1 + ATP/Km_hk_atp + ADP/Km_hk_adp));
end

function PGI(Vmax_pgi, G6P, Km_pgi_g6p, F6P, Keq_pgi, Km_pgi_f6p)
  Vmax_pgi*(G6P/Km_pgi_g6p - F6P/(Km_pgi_g6p*Keq_pgi))/(1 + G6P/Km_pgi_g6p + F6P/Km_pgi_f6p);
end

function PFK(Vmax_pfk, gR_pfk, F6P, ATP, Km_pfk_f6p, Km_pfk_atp, L0_pfk, Ci_pfk_atp, Kpfk_atp, Ci_pfk_amp, AMP, Kpfk_amp, Ci_pfk_f26p, F26P, Kpfk_f26p, Ci_pfk_f16p, F16P, Kpfk_f16p, C_atp)
  Vmax_pfk*gR_pfk*F6P*ATP*(1 + F6P*ATP/(Km_pfk_f6p*Km_pfk_atp) + gR_pfk*F6P*ATP/(Km_pfk_f6p*Km_pfk_atp))/(Km_pfk_f6p*Km_pfk_atp*((1 + F6P*ATP/(Km_pfk_f6p*Km_pfk_atp) + gR_pfk*F6P*ATP/(Km_pfk_f6p*Km_pfk_atp))^2 + L0_pfk*((1 + Ci_pfk_atp*ATP/Kpfk_atp)/(1 + ATP/Kpfk_atp))^2*((1 + Ci_pfk_amp*AMP/Kpfk_amp)/(1 + AMP/Kpfk_amp))^2*((1 + Ci_pfk_f26p*F26P/Kpfk_f26p + Ci_pfk_f16p*F16P/Kpfk_f16p)/(1 + F26P/Kpfk_f26p + F16P/Kpfk_f16p))^2*(1 + C_atp*ATP/Km_pfk_atp)^2));
end

function ALD(Vmax_ald, F16P, Km_ald_f16p, Keq_tpi, TRIO, Keq_ald, Km_ald_gap, Km_ald_dhap)
  Vmax_ald*(F16P/Km_ald_f16p - Keq_tpi*(TRIO/(1 + Keq_tpi))^2/(Km_ald_f16p*Keq_ald))/(1 + F16P/Km_ald_f16p + Keq_tpi*TRIO/(1 + Keq_tpi)/Km_ald_gap + TRIO/((1 + Keq_tpi)*Km_ald_dhap) + Keq_tpi*(TRIO/(1 + Keq_tpi))^2/(Km_ald_gap*Km_ald_dhap) + F16P*Keq_tpi*(TRIO/(1 + Keq_tpi))/(Km_ald_gap*Km_ald_f16p));
end

function GAPDH(Vmax_gapdh_f, Keq_tpi, TRIO, NAD, Km_gapdh_gap, Km_gapdh_nad, Vmax_gapdh_r, BPG, NADH, Km_gapdh_bpg, Km_gapdh_nadh)
  (Vmax_gapdh_f*Keq_tpi*TRIO*NAD/(1 + Keq_tpi)/(Km_gapdh_gap*Km_gapdh_nad) - Vmax_gapdh_r*BPG*NADH/(Km_gapdh_bpg*Km_gapdh_nadh))/((1 + Keq_tpi*TRIO/((1 + Keq_tpi)*Km_gapdh_gap) + BPG/Km_gapdh_bpg)*(1 + NAD/Km_gapdh_nad + NADH/Km_gapdh_nadh));
end

function PGK(Vmax_pgk_r, Keq_pgk, BPG, ADP, Km_pgk_p3g, Km_pgk_atp, P3G, ATP, Km_pgk_bpg, Km_pgk_adp)
  Vmax_pgk_r*(Keq_pgk*BPG*ADP/(Km_pgk_p3g*Km_pgk_atp) - P3G*ATP/(Km_pgk_p3g*Km_pgk_atp))/((1 + BPG/Km_pgk_bpg + P3G/Km_pgk_p3g)*(1 + ATP/Km_pgk_atp + ADP/Km_pgk_adp));
end

function GPM(Vmax_gpm, P3G, Km_gpm_p3g, P2G, Keq_gpm, Km_gpm_p2g)
  Vmax_gpm*(P3G/Km_gpm_p3g - P2G/(Km_gpm_p3g*Keq_gpm))/(1 + P3G/Km_gpm_p3g + P2G/Km_gpm_p2g);
end

function ENO(Vmax_eno, P2G, Km_eno_p2g, PEP, Keq_eno, Km_eno_pep)
  Vmax_eno*(P2G/Km_eno_p2g - PEP/(Km_eno_p2g*Keq_eno))/(1 + P2G/Km_eno_p2g + PEP/Km_eno_pep);
end

function PYK(Vmax_pyk, PEP, Km_pyk_pep, n_pyk, L0_pyk, ATP, Km_pyk_atp, F16P, Km_pyk_f16p, ADP, Km_pyk_adp)
  Vmax_pyk*(PEP/Km_pyk_pep)*(PEP/Km_pyk_pep + 1)^(n_pyk - 1)/(L0_pyk*((ATP/Km_pyk_atp + 1)/(F16P/Km_pyk_f16p + 1))^n_pyk + (1 + PEP/Km_pyk_pep)^n_pyk)*(ADP/(ADP + Km_pyk_adp));
end

function PDC(Vmax_pdc, PYR, NH_pdc, Km_pdc_pyr)
  Vmax_pdc*PYR^NH_pdc/(Km_pdc_pyr*(1 + PYR^NH_pdc/Km_pdc_pyr^NH_pdc));
end

function ADH(Vmax_adh_r, NADH, ACALD, Ki_adh_nad, Km_adh_etoh, Keq_adh, NAD, ETOH, Km_adh_nad, Km_adh_nadh, Km_adh_acald, Ki_adh_nadh, Ki_adh_acald, Ki_adh_etoh)
  Vmax_adh_r*(NADH*ACALD/(Ki_adh_nad*Km_adh_etoh*Keq_adh) - NAD*ETOH/(Ki_adh_nad*Km_adh_etoh))/(1 + NAD/Ki_adh_nad + Km_adh_nad*ETOH/(Ki_adh_nad*Km_adh_etoh) + Km_adh_nadh*ACALD/(Ki_adh_nad*Km_adh_acald) + NADH/Ki_adh_nadh + NAD*ETOH/(Ki_adh_nad*Km_adh_etoh) + Km_adh_nadh*NAD*ACALD/(Ki_adh_nad*Ki_adh_nadh*Km_adh_acald) + Km_adh_nad*NADH*ETOH/(Ki_adh_nad*Ki_adh_nadh*Km_adh_etoh) + NADH*ACALD/(Ki_adh_nadh*Km_adh_acald) + NAD*ETOH*ACALD/(Ki_adh_nad*Km_adh_etoh*Ki_adh_acald) + NADH*ETOH*ACALD/(Ki_adh_etoh*Ki_adh_nadh*Km_adh_acald));
end

function ACE(K_ace, AcAlad)
  K_ace*AcAlad;
end

model MODEL1403250001()
  // vanEunen2012 - Yeast Glycolysis (glucose upshift)
  // This is corresponding to the model of yeast glycolysis "glucose upshift" condition described in the paper "Testing Biochemistry Revisited: How In Vivo Metabolism Can Be Understood from In Vitro Enzyme Kinetics" by van Eunen et al published in Plos Comput Biol, 2012.
  // biomodels.db:MODEL1403250001
  // hasTaxon taxonomy:4932

  // Compartments:
  compartment C = 1;

  // Species:
  species Glci in C = 0.0576023;
  species G6P in C = 0.121566;
  species F6P in C = 0.0263653;
  species F16P in C = 0.0928847;
  species TRIO in C = 0.336706;
  species BPG in C = 0.000904902;
  species NAD in C = 1.58969;
  species NADH in C = 0.00030978;
  species P3G in C = 0.945967;
  species P2G in C = 0.161018;
  species PEP in C = 0.981828;
  species PYR in C = 0.502831;
  species AcAld in C = 13;

  // Parameters:
  ETOH = 25;
  Keq_glt = 1;
  Km_hk_glci = 0.08;
  Km_hk_g6p = 30;
  Km_hk_atp = 0.15;
  Km_hk_adp = 0.23;
  Ki_hk_t6p = 0.04;
  Keq_hk = 3800;
  Km_pgi_g6p = 1.4;
  Km_pgi_f6p = 0.3;
  Keq_pgi = 0.314;
  gR_pfk = 5.12;
  L0_pfk = 0.66;
  Km_pfk_f6p = 0.1;
  Km_pfk_atp = 0.71;
  C_atp = 3;
  Ci_pfk_atp = 100;
  Ci_pfk_amp = 0.0845;
  Ci_pfk_f16p = 0.397;
  Ci_pfk_f26p = 0.0174;
  Kpfk_atp = 0.65;
  Kpfk_amp = 0.0995;
  Kpfk_f16p = 0.111;
  Kpfk_f26p = 0.000682;
  Km_ald_f16p = 0.3;
  Km_ald_dhap = 2.4;
  Km_ald_gap = 10;
  Keq_ald = 0.069;
  Keq_tpi = 0.045;
  Km_pgk_bpg = 0.003;
  Km_pgk_p3g = 0.53;
  Km_pgk_adp = 0.2;
  Km_pgk_atp = 0.3;
  Keq_pgk = 3200;
  Km_gpm_p3g = 1.2;
  Km_gpm_p2g = 0.08;
  Keq_gpm = 0.19;
  Km_eno_p2g = 0.04;
  Km_eno_pep = 0.5;
  Keq_eno = 6.7;
  Km_pyk_adp = 0.3;
  Km_pyk_pep = 0.19;
  Km_pyk_atp = 9.3;
  n_pyk = 4;
  L0_pyk = 60000;
  Km_pyk_f16p = 0.2;
  NH_pdc = 1.9;
  Km_pdc_pyr = 6.36;
  Km_adh_acald = 1.11;
  Km_adh_etoh = 17;
  Km_adh_nadh = 0.11;
  Km_adh_nad = 0.17;
  Ki_adh_acald = 1.1;
  Ki_adh_etoh = 90;
  Ki_adh_nadh = 0.031;
  Ki_adh_nad = 0.92;
  Keq_adh = 6.9e-5;
  Vmax_glt = 160;
  Km_glt_glco = 1;
  Km_glt_glci = 1;
  Ki = 0.75;
  Vmax_hk = 213;
  Vmax_pgi = 787;
  Vmax_pfk = 213;
  Vmax_ald = 310;
  Vmax_gapdh_f = 1487;
  Vmax_gapdh_r = 853;
  Km_gapdh_gap = 0.39;
  Km_gapdh_nad = 2.85;
  Km_gapdh_nadh = 0.007;
  Km_gapdh_bpg = 0.51;
  Vmax_pgk_r = 2512;
  Vmax_gpm = 856;
  Vmax_eno = 357;
  Vmax_pyk = 820;
  Vmax_pdc = 395;
  Vmax_adh_r = 932;
  ADP = 1;
  AMP = 0.3;
  T6P = 0.2;
  F26P = 0.014;
  Glco = 5;
  ATP = 1.5;
  K_tre1 = 0;
  K_tre2 = 0;
  K_gly = 17.5;
  K_suc = 0.9;
  K_ace = 0.5;

  // Reactions:
  Glt: -> Glci; C*GLT(Vmax_glt, Glco, Km_glt_glco, Glci, Keq_glt, Km_glt_glci, Ki);
  Hk: Glci -> G6P; C*HK(Vmax_hk, Glci, ATP, Km_hk_glci, Km_hk_atp, G6P, ADP, Keq_hk, Km_hk_g6p, T6P, Ki_hk_t6p, Km_hk_adp);
  Tre1: => 2 Glci; C*Constant_flux_irreversible(K_tre1);
  Tre2: 2 G6P => ; C*Constant_flux_irreversible(K_tre2);
  reaction_5: G6P -> F6P; C*PGI(Vmax_pgi, G6P, Km_pgi_g6p, F6P, Keq_pgi, Km_pgi_f6p); reaction_5 is "PGI";
  Pfk: F6P => F16P; C*PFK(Vmax_pfk, gR_pfk, F6P, ATP, Km_pfk_f6p, Km_pfk_atp, L0_pfk, Ci_pfk_atp, Kpfk_atp, Ci_pfk_amp, AMP, Kpfk_amp, Ci_pfk_f26p, F26P, Kpfk_f26p, Ci_pfk_f16p, F16P, Kpfk_f16p, C_atp);
  Ald: F16P -> 2 TRIO; C*ALD(Vmax_ald, F16P, Km_ald_f16p, Keq_tpi, TRIO, Keq_ald, Km_ald_gap, Km_ald_dhap);
  Gapdh: TRIO + NAD -> BPG + NADH; C*GAPDH(Vmax_gapdh_f, Keq_tpi, TRIO, NAD, Km_gapdh_gap, Km_gapdh_nad, Vmax_gapdh_r, BPG, NADH, Km_gapdh_bpg, Km_gapdh_nadh);
  Gly: TRIO + NADH => NAD; C*Constant_flux_irreversible(K_gly);
  Pgk: BPG -> P3G; C*PGK(Vmax_pgk_r, Keq_pgk, BPG, ADP, Km_pgk_p3g, Km_pgk_atp, P3G, ATP, Km_pgk_bpg, Km_pgk_adp);
  Gpm: P3G -> P2G; C*GPM(Vmax_gpm, P3G, Km_gpm_p3g, P2G, Keq_gpm, Km_gpm_p2g);
  Eno: P2G -> PEP; C*ENO(Vmax_eno, P2G, Km_eno_p2g, PEP, Keq_eno, Km_eno_pep);
  Pyk: PEP => PYR; C*PYK(Vmax_pyk, PEP, Km_pyk_pep, n_pyk, L0_pyk, ATP, Km_pyk_atp, F16P, Km_pyk_f16p, ADP, Km_pyk_adp);  // modifiers: F16P
  Pdc: PYR => AcAld; C*PDC(Vmax_pdc, PYR, NH_pdc, Km_pdc_pyr);
  Suc: 2 PYR + 3 NAD => 3 NADH; C*Constant_flux_irreversible(K_suc);
  Ace: AcAld + NAD => NADH; C*ACE(K_ace, AcAld);
  Adh: NADH + AcAld -> NAD; C*ADH(Vmax_adh_r, NADH, AcAld, Ki_adh_nad, Km_adh_etoh, Keq_adh, NAD, ETOH, Km_adh_nad, Km_adh_nadh, Km_adh_acald, Ki_adh_nadh, Ki_adh_acald, Ki_adh_etoh);

  // Unit definitions:
  unit time = 60 second;
  unit substance = 1e-6 mole;
end
