// SBML level 2 version 4

function Constant_flux_irreversible(v)
  v;
end
Constant_flux_irreversible is "Constant flux (irreversible)";

function GLT(Vmax_glt, Glco, Km_glt_glco, Glci, Keq_glt, Km_glt_glci, Ki)
  Vmax_glt*(Glco/Km_glt_glco - Glci/(Km_glt_glco*Keq_glt))/(1 + Glco/Km_glt_glco + Glci/Km_glt_glci + Ki*Glco*Glci/(Km_glt_glco*Km_glt_glci));
end

function ALD(Vmax_ald, F16P, Km_ald_f16p, Keq_tpi, TRIO, Keq_ald, Km_ald_gap, Km_ald_dhap)
  Vmax_ald*(F16P/Km_ald_f16p - Keq_tpi*(TRIO/(1 + Keq_tpi))^2/(Km_ald_f16p*Keq_ald))/(1 + F16P/Km_ald_f16p + Keq_tpi*TRIO/(1 + Keq_tpi)/Km_ald_gap + TRIO/((1 + Keq_tpi)*Km_ald_dhap) + Keq_tpi*(TRIO/(1 + Keq_tpi))^2/(Km_ald_gap*Km_ald_dhap) + F16P*Keq_tpi*(TRIO/(1 + Keq_tpi))/(Km_ald_gap*Km_ald_f16p));
end

function GAPDH(Vmax_gapdh_f, Keq_tpi, TRIO, NAD, Km_gapdh_gap, Km_gapdh_nad, Vmax_gapdh_r, BPG, NADH, Km_gapdh_bpg, Km_gapdh_nadh)
  (Vmax_gapdh_f*Keq_tpi*TRIO*NAD/(1 + Keq_tpi)/(Km_gapdh_gap*Km_gapdh_nad) - Vmax_gapdh_r*BPG*NADH/(Km_gapdh_bpg*Km_gapdh_nadh))/((1 + Keq_tpi*TRIO/((1 + Keq_tpi)*Km_gapdh_gap) + BPG/Km_gapdh_bpg)*(1 + NAD/Km_gapdh_nad + NADH/Km_gapdh_nadh));
end

function PDC(Vmax_pdc, PYR, NH_pdc, Km_pdc_pyr)
  Vmax_pdc*PYR^NH_pdc/(Km_pdc_pyr*(1 + PYR^NH_pdc/Km_pdc_pyr^NH_pdc));
end

function ADH(Vmax_adh_r, NADH, ACALD, Ki_adh_nad, Km_adh_etoh, Keq_adh, NAD, ETOH, Km_adh_nad, Km_adh_nadh, Km_adh_acald, Ki_adh_nadh, Ki_adh_acald, Ki_adh_etoh)
  Vmax_adh_r*(NADH*ACALD/(Ki_adh_nad*Km_adh_etoh*Keq_adh) - NAD*ETOH/(Ki_adh_nad*Km_adh_etoh))/(1 + NAD/Ki_adh_nad + Km_adh_nad*ETOH/(Ki_adh_nad*Km_adh_etoh) + Km_adh_nadh*ACALD/(Ki_adh_nad*Km_adh_acald) + NADH/Ki_adh_nadh + NAD*ETOH/(Ki_adh_nad*Km_adh_etoh) + Km_adh_nadh*NAD*ACALD/(Ki_adh_nad*Ki_adh_nadh*Km_adh_acald) + Km_adh_nad*NADH*ETOH/(Ki_adh_nad*Ki_adh_nadh*Km_adh_etoh) + NADH*ACALD/(Ki_adh_nadh*Km_adh_acald) + NAD*ETOH*ACALD/(Ki_adh_nad*Km_adh_etoh*Ki_adh_acald) + NADH*ETOH*ACALD/(Ki_adh_etoh*Ki_adh_nadh*Km_adh_acald));
end

function ACE(K_ace, AcAlad)
  K_ace*AcAlad;
end

function EN1(Vmax_en1, BPG, Km_en1_bpg, p_pyk, F16P, Km_pyk_f16p, n_pyk)
  Vmax_en1*BPG/Km_en1_bpg/(1 + BPG/Km_en1_bpg + p_pyk/(F16P/Km_pyk_f16p + 1)^n_pyk);
end

function EN2(Vmax_en2, Glci, Km_en2_glci, k1_en2, k2_en2, F16P, k3_en2, Kpfk_f16p)
  Vmax_en2*Glci/Km_en2_glci/(1 + Glci/Km_en2_glci + k1_en2*((1 + k2_en2*F16P)/(k3_en2 + F16P/Kpfk_f16p))^2);
end

model MODEL1403250002()
  // Rao2014 - Yeast glycolysis (reduced model)
  // This is the reduced model corresponding to "glucose upshift" condition described in the paper "Testing Biochemistry Revisited: How In Vivo Metabolism Can Be Understood from In Vitro Enzyme Kinetics" by van Eunen et al published in Plos Comput Biol, 2012.
  // biomodels.db:MODEL1403250002
  // hasTaxon taxonomy:4932

  // Compartments:
  compartment C = 1;

  // Species:
  species Glci in C = 0.0576023;
  species F16P in C = 0.0928847;
  species TRIO in C = 0.336706;
  species BPG in C = 0.000904902;
  species NAD in C = 1.58969;
  species NADH in C = 0.00030978;
  species PYR in C = 0.502831;
  species AcAld in C = 13;

  // Parameters:
  ETOH = 25;
  Keq_glt = 1;
  Kpfk_f16p = 0.111;
  Km_ald_f16p = 0.3;
  Km_ald_dhap = 2.4;
  Km_ald_gap = 10;
  Keq_ald = 0.069;
  Keq_tpi = 0.045;
  n_pyk = 4;
  Km_pyk_f16p = 0.2;
  NH_pdc = 1.9;
  Km_pdc_pyr = 6.36;
  Km_adh_acald = 1.11;
  Km_adh_etoh = 17;
  Km_adh_nadh = 0.11;
  Km_adh_nad = 0.17;
  Ki_adh_acald = 1.1;
  Ki_adh_etoh = 90;
  Ki_adh_nadh = 0.031;
  Ki_adh_nad = 0.92;
  Keq_adh = 6.9e-5;
  Vmax_glt = 160;
  Km_glt_glco = 1;
  Km_glt_glci = 1;
  Ki = 0.75;
  Vmax_hk = 213;
  Vmax_pgi = 787;
  Vmax_ald = 310;
  Vmax_gapdh_f = 1487;
  Vmax_gapdh_r = 853;
  Km_gapdh_gap = 0.39;
  Km_gapdh_nad = 2.85;
  Km_gapdh_nadh = 0.007;
  Km_gapdh_bpg = 0.51;
  Vmax_pdc = 395;
  Vmax_adh_r = 932;
  Glco = 5;
  K_tre1 = 0;
  K_tre2 = 0;
  K_gly = 17.5;
  K_suc = 0.9;
  K_ace = 0.5;
  Vmax_en1 = 13786.233;
  Km_en1_bpg = 0.03493;
  p_pyk = 2261.421;
  Vmax_en2 = 138.788;
  Km_en2_glci = 0.48398;
  k1_en2 = 0.0054196;
  k2_en2 = 2.63529;
  k3_en2 = 21.528;

  // Reactions:
  Glt: -> Glci; C*GLT(Vmax_glt, Glco, Km_glt_glco, Glci, Keq_glt, Km_glt_glci, Ki);
  Tre1: => 2 Glci; C*Constant_flux_irreversible(K_tre1);
  Tre2: 2 F16P => ; C*Constant_flux_irreversible(K_tre2);
  Ald: F16P => 2 TRIO; C*ALD(Vmax_ald, F16P, Km_ald_f16p, Keq_tpi, TRIO, Keq_ald, Km_ald_gap, Km_ald_dhap);
  Gapdh: TRIO + NAD -> BPG + NADH; C*GAPDH(Vmax_gapdh_f, Keq_tpi, TRIO, NAD, Km_gapdh_gap, Km_gapdh_nad, Vmax_gapdh_r, BPG, NADH, Km_gapdh_bpg, Km_gapdh_nadh);
  Gly: TRIO + NADH => NAD; C*Constant_flux_irreversible(K_gly);
  Pdc: PYR => AcAld; C*PDC(Vmax_pdc, PYR, NH_pdc, Km_pdc_pyr);
  Suc: 2 PYR + 3 NAD => 3 NADH; C*Constant_flux_irreversible(K_suc);
  Ace: AcAld + NAD => NADH; C*ACE(K_ace, AcAld);
  Adh: NADH + AcAld -> NAD; C*ADH(Vmax_adh_r, NADH, AcAld, Ki_adh_nad, Km_adh_etoh, Keq_adh, NAD, ETOH, Km_adh_nad, Km_adh_nadh, Km_adh_acald, Ki_adh_nadh, Ki_adh_acald, Ki_adh_etoh);
  En2: Glci => F16P; C*EN2(Vmax_en2, Glci, Km_en2_glci, k1_en2, k2_en2, F16P, k3_en2, Kpfk_f16p);
  En1: BPG => PYR; C*EN1(Vmax_en1, BPG, Km_en1_bpg, p_pyk, F16P, Km_pyk_f16p, n_pyk);  // modifiers: F16P

  // Unit definitions:
  unit time = 60 second;
  unit substance = 1e-6 mole;
end
