// SBML level 2 version 1

model MODEL1405070000()
  // Dolan2014 - calcium homeostasis (SOCE)
  // biomodels.db:MODEL1405070000
  // hasTaxon taxonomy:9606
  // isVersionOf GO:0055074
  // occursIn BTO:0000132

  // Compartments:
  compartment cytosol in PM = 6e-15;
  compartment DTS in IM = 2.4e-16;
  compartment IM in cytosol = 1.5e-11;
  compartment PM in PRP = 2.101127e-10;
  compartment PRP in dummy = 0.01;
  // dummy compartment to contain membrane potentials for SBML export
  compartment dummy = 1;

  // Species:
  // (-IP3R_rxn_03+IP3R_rxn_04)/cytosol
  species $Ins145P3_dummy in cytosol = 2.748325e-8;
  species $Orai_puncta in PM = 7.320706e-12;
  species Ca_cyt in cytosol = 2.615776e-8;
  species IP3Rn in IM = 1.265799e-10;
  species IP3Ri1 in IM = 2.577635e-11;
  species IP3Ri2 in IM = 3.760493e-12;
  species IP3Ro in IM = 4.135717e-11;
  species IP3Ra in IM = 9.932805e-12;
  species IP3Rs in IM = 1.525876e-13;
  species SERCA_E1 in IM = 1.262786e-9;
  species SERCA_E2 in IM = 1.264205e-9;
  species SERCA_E2P in IM = 5.74897e-12;
  species SERCA_E1Ca2 in IM = 1.227755e-12;
  species SERCA_E1PCa2 in IM = 1.53454e-12;
  species SERCA_E2PCa2 in IM = 1.379352e-12;
  species Ca_dts in DTS = 0.0003386965;
  species Ca_ex in PRP = 0.0012;
  species STIM1 in IM = 2.26025e-10;
  species STIM1_Ca_dts in IM = 3.827694e-10;
  species STIM1_2 in IM = 1.313648e-12;
  species STIM_puncta in IM = 1.313648e-12;
  species PMCA in PM = 7.24968e-12;
  species CaM in cytosol = 6.618772e-6;
  species Ca_PMCA in PM = 3.416856e-14;
  species Ca2_CaM in cytosol = 4.500777e-9;
  species Ca4_CaM in cytosol = 3.276487e-10;
  species PMCA_Ca4_CaM in PM = 4.750442e-17;
  species PMCA_Ca4_CaM_Ca in PM = 1.553271e-17;
  species PMCA_CaM in PM = 1.412769e-14;
  // TG acts to inhibit SERCA_E2; not used in publication
  species TG in cytosol = 1;
  species E2_TG in cytosol = 1;
  species E2i_TG in cytosol = 1;

  // Parameters:
  k_IP3R_k1 = 640000;
  k_IP3R_k1b = 0.04;
  k_IP3R_k2 = 37400000;
  k_IP3R_k2b = 1.4;
  k_IP3R_k3 = 0.11;
  k_IP3R_k3b = 29.8;
  k_IP3R_k4 = 4000000;
  k_IP3R_k4b = 0.54;
  k_IP3R_L1 = 1.2e-7;
  k_IP3R_L3 = 2.5e-8;
  k_IP3R_L5 = 5.47e-5;
  k_IP3R_l2 = 1.7;
  k_IP3R_l4 = 1700000;
  k_IP3R_l6 = 4707;
  k_IP3R_l2b = 0.8;
  k_IP3R_l4b = 2500000;
  k_IP3R_l6b = 11.4;
  k_SERCA_1f = 600;
  k_SERCA_1r = 600;
  k_SERCA_2f = 1e15;
  k_SERCA_2r = 10;
  k_SERCA_3f = 700;
  k_SERCA_3r = 5;
  k_SERCA_4f = 600;
  k_SERCA_4r = 50;
  k_SERCA_5f = 1000;
  k_SERCA_5r = 800000000;
  k_SERCA_6f = 500;
  k_SERCA_6r = 1.6;
  // S/channel
  G_IP3R = 1e-11;
  // S/m2
  G_PM = 7e-11;
  // Faraday constant
  F = 96485.3415;
  // elementary charge
  e_charge = 1.602e-19;
  // Avogadro/F (Faraday's constant)
  Ampere = 6.24e18;
  Avogadro = 6.02e23;
  k_off_STIM1_Ca_dts = 6666;
  // mol/(m2*s)
  k_on_STIM1_STIM1 = 900000000;
  k_off_STIM1_STIM1 = 35;
  // mol/(m2*s)
  k_on_STIM1_2_Orai1 = 845800.1;
  k_off_STIM1_2_Orai1 = 15.259;
  k_in = 8000;
  k_out = 8000;
  P_crac = 0.8;
  // rate const for leak FROM DTS into cytosol; lumped parameter which contains permeability and conc scaling
  k_leak_im = 0.000208;
  // dissoc const for STIM1_binding_Ca_dts
  K_d = 0.0002;
  k_PMCA_4f = 10000000;
  k_PMCA_4r = 50;
  k_PMCA_5f = 5.5;
  k_PMCA_6f = 2669000000000;
  k_PMCA_6r = 2.682;
  k_PMCA_7f = 170400000000000;
  k_PMCA_7r = 1.551;
  // 200000
  k_PMCA_8f = 200000;
  k_PMCA_8r = 0.0008;
  k_PMCA_9f = 500000000;
  k_PMCA_9r = 10;
  k_PMCA_10f = 30;
  k_PMCA_11f = 10;
  k_PMCA_11r = 7.332e20;
  // 0.33
  k_PMCA_12f = 0.033;
  // Farad/m2
  C = 0.02;
  k_TG_1f = 5000000000;
  k_TG_1r = 55;
  k_TG_2f = 25;
  k_TG_2r = 0.005;
  f = 1420;
  L = 0.0001;
  K_a = 100;
  a = 0.5;
  KM_p = 1.969624e-7;
  alpha = 0.2;
  beta = 0.01;
  n_p = 1.903369;
  // use these to turn respective functionality on or off
  switchPMCA = 1;
  switchSOCE = 1;
  switchIMleak = 1;
  switchPMleak = 1;
  switchIP3R = 1;
  switchSERCA = 1;
  switchTG = 0;
  // starting IP3 level for forcing function
  IP30 = 2.748325e-8;
  // forcing fcn parameter "a" - initial linear growth rate constant
  Fa = 1.75;
  // forcing fcn parameter "b"- exp decay time constant
  Fb = 0.08;
  // forcing fcn parameter "c"- establishes offset from IP30 at long times
  Fc = 0.4;
  // start time for IP3 stimulus (seconds)
  start = 10;
  // currents and rates are in mol/s, the factor "charge" converts to amps
  V_PM = -0.06;
  V_IM = -0.06075999;

  // Assignment rules:
  // switch to activate forcing fcn
  switchDeg := piecewise(1, time >= start, 0);
  // IP3 forcing function definition
  Ins145P3 := switchDeg*IP30*(2.5*Fa*(time - start)^0.6*exp(-Fb*(time - start)) + 2.5*Fc*(time - start)/(time - start + 1)) + IP30;
  Ca_total := Avogadro*(cytosol*(Ca_cyt + 2*Ca2_CaM + 4*Ca4_CaM) + IM*(IP3Ri1 + 2*IP3Ri2 + IP3Ra + 2*SERCA_E1Ca2 + 2*SERCA_E1PCa2 + 2*SERCA_E2PCa2 + STIM1_Ca_dts) + PM*(4*PMCA_Ca4_CaM + 5*PMCA_Ca4_CaM_Ca + Ca_PMCA) + DTS*Ca_dts + PRP*Ca_ex);
  IP3_total := Avogadro*(cytosol*Ins145P3 + IM*(IP3Ro + IP3Ra + IP3Ri2 + IP3Rs));
  IP3R_total := Avogadro*IM*(IP3Rn + IP3Ri1 + IP3Ro + IP3Ra + IP3Ri2 + IP3Rs);
  SERCA_total := Avogadro*IM*(SERCA_E1 + SERCA_E1Ca2 + SERCA_E1PCa2 + SERCA_E2PCa2 + SERCA_E2P + SERCA_E2);
  Orai_total := Avogadro*PM*Orai_puncta;
  STIM1_total := Avogadro*IM*(STIM1 + STIM1_Ca_dts + 2*STIM1_2 + 2*STIM_puncta);
  CaM_total := Avogadro*(cytosol*(CaM + Ca2_CaM + Ca4_CaM) + PM*(PMCA_Ca4_CaM + PMCA_Ca4_CaM_Ca + PMCA_CaM));
  PMCA_total := Avogadro*PM*(PMCA + PMCA_Ca4_CaM + PMCA_Ca4_CaM_Ca + PMCA_CaM + Ca_PMCA);
  TG_total := Avogadro*(cytosol*TG + IM*(E2_TG + E2i_TG));
  total_mass := Ca_total + IP3_total + IP3R_total + SERCA_total + STIM1_total + Orai_total + CaM_total + PMCA_total + TG_total;
  // instantaneous puncta entry
  theta_puncta := alpha*(Ca_cyt^n_p/(KM_p^n_p + Ca_cyt^n_p)) + beta;
  Orai_puncta_total := Orai_total*0.01;
  STIM2au := STIM_puncta*Avogadro*IM*2*theta_puncta;
  // (MWC(Orai_puncta_total/4,STIM2au)) %look up free stim value using function generated from griddedInterpolant, LUT disabled for SBML export
  Sfree := 0.001;
  R := STIM2au/(Orai_puncta_total/4);
  Denom := 1 + L + 4*K_a*Sfree + 4*L*f*Sfree + 6*a*K_a^2*Sfree^2 + 6*a*L*f^2*Sfree^2 + 4*a^3*K_a^3*Sfree^3 + 4*a^3*L*f^3*Sfree^3 + a^6*K_a^4*Sfree^4 + a^6*L*f^4*Sfree^4;
  o := L*Orai_puncta_total/Denom/4;
  os := 4*L*f*Sfree*Orai_puncta_total/Denom/4;
  os2 := 6*a*L*f^2*Sfree^2*Orai_puncta_total/Denom/4;
  os3 := 4*a^3*L*f^3*Sfree^3*Orai_puncta_total/Denom/4;
  os4 := a^6*L*f^4*Sfree^4*Orai_puncta_total/Denom/4;
  // o + c, ie Orai in the puncta that is not bound to STIM; Orai_free can escape the puncta
  Orai_free := o + Orai_puncta_total/Denom/4;
  pIP3Ro := IM*Avogadro*IP3Ro/IP3R_total;
  pIP3Ra := IM*Avogadro*IP3Ra/IP3R_total;
  P_IP3R := (0.9*pIP3Ra + 0.1*pIP3Ro)*(0.9*pIP3Ra + 0.1*pIP3Ro)*(0.9*pIP3Ra + 0.1*pIP3Ro)*(0.9*pIP3Ra + 0.1*pIP3Ro);
  IP3R_open := P_IP3R*IP3R_total/Avogadro/4;
  // Volts, 0.01348 is RT/2F
  psi_IM := 0.01348*ln(Ca_cyt/Ca_dts);
  psi_PM := 0.01348*ln(Ca_ex/Ca_cyt);
  k_on_STIM1_Ca_dts := k_off_STIM1_Ca_dts/K_d;
  CRAC_open := os + os2 + os3 + os4;
  G_CRAC := piecewise(0, V_PM >= psi_PM, 2e-14);

  // Rate rules:
  // currents and rates are in mol/s, the factor "charge" converts to amps
  V_PM' = 1/C*e_charge*Avogadro*(-2)*(-Calcium_Entry - PM_leak + PMCA_rxn10 + PMCA_rxn5);
  V_IM' = 1/C*e_charge*Avogadro*2*(-Calcium_Release + 2*SERCA_Rxn2 - IM_leak + IP3R_rxn_07 - IP3R_rxn_08 + IP3R_rxn_01 - IP3R_rxn_02);
  // (-IP3R_rxn_03+IP3R_rxn_04)/cytosol
  Ins145P3_dummy' = 0;
  Orai_puncta' = 0;

  // Reactions:
  SERCA_Rxn1: SERCA_E2 => SERCA_E1; switchSERCA*IM*k_SERCA_1f*SERCA_E2 - switchSERCA*IM*k_SERCA_1r*SERCA_E1;
  SERCA_Rxn2: 2 Ca_cyt + SERCA_E1 => SERCA_E1Ca2; switchSERCA*cytosol*k_SERCA_2f*(IM/cytosol)*SERCA_E1*Ca_cyt*Ca_cyt - switchSERCA*IM*k_SERCA_2r*SERCA_E1Ca2;
  SERCA_Rxn3: SERCA_E1Ca2 => SERCA_E1PCa2; switchSERCA*IM*k_SERCA_3f*SERCA_E1Ca2 - switchSERCA*IM*k_SERCA_3r*SERCA_E1PCa2;
  SERCA_Rxn4: SERCA_E1PCa2 => SERCA_E2PCa2; switchSERCA*IM*k_SERCA_4f*SERCA_E1PCa2 - switchSERCA*IM*k_SERCA_4r*SERCA_E2PCa2;
  SERCA_Rxn5: SERCA_E2PCa2 => SERCA_E2P + 2 Ca_dts; switchSERCA*IM*k_SERCA_5f*SERCA_E2PCa2 - switchSERCA*DTS*k_SERCA_5r*(IM/DTS)*SERCA_E2P*Ca_dts*Ca_dts;
  SERCA_Rxn6: SERCA_E2P => SERCA_E2; switchSERCA*IM*k_SERCA_6f*SERCA_E2P - switchSERCA*IM*k_SERCA_6r*SERCA_E2;
  // TG inhibition rxns
  TG_binding: SERCA_E2 + TG -> E2_TG; switchTG*cytosol*(k_TG_1f*(IM/cytosol)*TG*SERCA_E2 - k_TG_1r*(IM/cytosol)*E2_TG);
  SERCA_inhibition: E2_TG -> E2i_TG; switchTG*cytosol*(k_TG_2f*(IM/cytosol)*E2_TG - k_TG_2r*(IM/cytosol)*E2i_TG);
  IP3R_rxn_01: Ca_cyt + IP3Rn => IP3Ri1; switchIP3R*cytosol*(IM/cytosol)*IP3Rn*((k_IP3R_k1*k_IP3R_L1 + k_IP3R_l2)*Ca_cyt/(k_IP3R_L1 + Ca_cyt*(1 + k_IP3R_L1/k_IP3R_L3)));
  IP3R_rxn_02: IP3Ri1 => Ca_cyt + IP3Rn; switchIP3R*IM*IP3Ri1*(k_IP3R_k1b + k_IP3R_l2b);
  IP3R_rxn_03: IP3Rn => IP3Ro; switchIP3R*cytosol*(IM/cytosol)*IP3Rn*Ins145P3*((k_IP3R_k2*k_IP3R_L3 + k_IP3R_l4*Ca_cyt)/(k_IP3R_L3 + Ca_cyt*(1 + k_IP3R_L3/k_IP3R_L1)));  // modifiers: Ca_cyt
  IP3R_rxn_04: IP3Ro => IP3Rn; switchIP3R*cytosol*(IM/cytosol)*IP3Ro*((k_IP3R_k2b + k_IP3R_l4b*Ca_cyt)/(1 + Ca_cyt/k_IP3R_L5));  // modifiers: Ca_cyt
  IP3R_rxn_05: Ca_cyt + IP3Ro => IP3Ra; switchIP3R*cytosol*(IM/cytosol)*IP3Ro*((k_IP3R_k4*k_IP3R_L5 + k_IP3R_l6)*Ca_cyt/(k_IP3R_L5 + Ca_cyt));
  IP3R_rxn_06: IP3Ra => Ca_cyt + IP3Ro; switchIP3R*cytosol*(IM/cytosol)*IP3Ra*(k_IP3R_L1*(k_IP3R_k4b + k_IP3R_l6b)/(k_IP3R_L1 + Ca_cyt));
  IP3R_rxn_07: Ca_cyt + IP3Ra => IP3Ri2; switchIP3R*cytosol*(IM/cytosol*IP3Ra*(k_IP3R_k1*k_IP3R_L1 + k_IP3R_l2)*Ca_cyt/(k_IP3R_L1 + Ca_cyt));
  IP3R_rxn_08: IP3Ri2 => Ca_cyt + IP3Ra; switchIP3R*IM*IP3Ri2*(k_IP3R_k1b + k_IP3R_l2b);
  // possible error in Sneyd paper, units don't work out
  IP3R_rxn_09: IP3Ro => IP3Rs; switchIP3R*cytosol*(IM/cytosol)*IP3Ro*(k_IP3R_k3*k_IP3R_L5/(k_IP3R_L5 + Ca_cyt));  // modifiers: Ca_cyt
  IP3R_rxn_10: IP3Rs => IP3Ro; switchIP3R*IM*k_IP3R_k3b*IP3Rs;
  STIM1_binding_Ca_dts: 2 Ca_dts + STIM1 -> STIM1_Ca_dts; switchSOCE*DTS*(k_on_STIM1_Ca_dts*(IM/DTS)*STIM1*Ca_dts - k_off_STIM1_Ca_dts*(IM/DTS)*STIM1_Ca_dts);
  STIM1_dimerization: 2 STIM1 -> STIM1_2; switchSOCE*IM*(k_on_STIM1_STIM1*STIM1*STIM1 - k_off_STIM1_STIM1*STIM1_2);
  STIM_puncta_entry: STIM1_2 -> STIM_puncta; switchSOCE*IM*(k_in*STIM1_2 - k_out*STIM_puncta);
  PMCA_rxn4: Ca_cyt + PMCA -> Ca_PMCA; switchPMCA*cytosol*(k_PMCA_4f*(PM/cytosol)*PMCA*Ca_cyt - k_PMCA_4r*(PM/cytosol)*Ca_PMCA);
  PMCA_rxn5: Ca_PMCA => Ca_ex + PMCA; switchPMCA*PRP*k_PMCA_5f*(PM/PRP)*Ca_PMCA;
  PMCA_rxn6: 2 Ca_cyt + CaM -> Ca2_CaM; switchPMCA*cytosol*(k_PMCA_6f*CaM*Ca_cyt*Ca_cyt - k_PMCA_6r*Ca2_CaM);
  PMCA_rxn7: 2 Ca_cyt + Ca2_CaM -> Ca4_CaM; switchPMCA*cytosol*(k_PMCA_7f*Ca2_CaM*Ca_cyt*Ca_cyt - k_PMCA_7r*Ca4_CaM);
  PMCA_rxn8: PMCA + Ca4_CaM -> PMCA_Ca4_CaM; switchPMCA*cytosol*(k_PMCA_8f*Ca4_CaM*(PM/cytosol)*PMCA - k_PMCA_8r*(PM/cytosol)*PMCA_Ca4_CaM);
  PMCA_rxn9: Ca_cyt + PMCA_Ca4_CaM -> PMCA_Ca4_CaM_Ca; switchPMCA*cytosol*(k_PMCA_9f*(PM/cytosol)*PMCA_Ca4_CaM*Ca_cyt - k_PMCA_9r*(PM/cytosol)*PMCA_Ca4_CaM_Ca);
  PMCA_rxn10: PMCA_Ca4_CaM_Ca => Ca_ex + PMCA_Ca4_CaM; switchPMCA*PRP*k_PMCA_10f*(PM/PRP)*PMCA_Ca4_CaM_Ca;
  PMCA_rxn11: PMCA_Ca4_CaM -> 4 Ca_cyt + PMCA_CaM; switchPMCA*cytosol*(k_PMCA_11f*(PM/cytosol)*PMCA_Ca4_CaM - k_PMCA_11r*(PM/cytosol)*PMCA_CaM*Ca_cyt^4);
  PMCA_rxn12: PMCA_CaM => PMCA + CaM; switchPMCA*cytosol*k_PMCA_12f*(PM/cytosol)*PMCA_CaM;
  // k_leak_im*(Ca_dts-Ca_cyt) %mol/s
  IM_leak: Ca_dts => Ca_cyt; switchIMleak*DTS*k_leak_im*(Ca_dts - Ca_cyt);
  // mol Ca/s
  Calcium_Release: Ca_dts => Ca_cyt; switchIP3R*G_IP3R*IP3R_open*(V_IM - psi_IM)*Ampere/2;  // modifiers: IP3Ra, IP3Ri1, IP3Ri2, IP3Rn, IP3Ro, IP3Rs
  // mol Ca/s
  Calcium_Entry: Ca_cyt => Ca_ex; switchSOCE*G_CRAC*CRAC_open*(V_PM - psi_PM)*1/(2*F);
  // /(F*2) don't need Ampere here bc there's no mol of channels to be converted to number of channels
  PM_leak: Ca_ex => Ca_cyt; switchPMleak*PM*G_PM*psi_PM/(F*2);
end
