// SBML level 2 version 4

function Ji__Hi(a, s1, s2, b, s3)
  a*s1*s2 - b*s3;
end
Ji__Hi is "Ji, Hi";

function Ji_1(a, s1, s2, b, s3)
  a*s1*s2 - b*s3;
end
Ji_1 is "Ji*";

function Fi_j_0(r, s1)
  -r*s1;
end
Fi_j_0 is "Fi,j";

model MODEL1409230001()
  // Hingant2014 - Micellar On-Pathway Intermediate in Prion Amyloid Formation
  // Hingant2014 - Micellar On-Pathway Intermediate in Prion Amyloid Formation
  // Encoded non-curated model. Issues:
  // - Missing kinetic parameters
  // This model is described in the article:
  // A micellar on-pathway intermediate step explains the kinetics of prion amyloid formation.
  // Hingant E, Fontes P, Alvarez-Martinez MT, Arnaud JD, Liautard JP, Pujo-Menjouet L.
  // PLoS Comput. Biol. 2014 Aug; 10(8): e1003735
  // Abstract:
  // In a previous work by Alvarez-Martinez et al. (2011), the authors pointed out some fallacies in the mainstream interpretation of the prion amyloid formation. It appeared necessary to propose an original hypothesis able to reconcile the in vitro data with the predictions of a mathematical model describing the problem. Here, a model is developed accordingly with the hypothesis that an intermediate on-pathway leads to the conformation of the prion protein into an amyloid competent isoform thanks to a structure, called micelles, formed from hydrodynamic interaction. The authors also compare data to the prediction of their model and propose a new hypothesis for the formation of infectious prion amyloids.
  // This model is hosted on BioModels Database and identified by: MODEL1409230001.
  // To cite BioModels Database, please use: BioModels Database: An enhanced, curated and annotated resource for published quantitative kinetic models.
  // To the extent possible under law, all copyright and related or neighbouring rights to this encoded model have been dedicated to the public domain worldwide. Please refer to CC0 Public Domain Dedication for more information.
  // isDescribedBy pubmed:25101755
  // biomodels.db:MODEL1409230001
  // isVersionOf GO:1990000 GO:0070841
  // hasProperty DOID:10652
  // hasTaxon taxonomy:9606

  // Compartments:
  compartment Brain = 1;  // BTO:0000142

  // Species:
  // Cellular prion protein
  species M1 in Brain = 0.4;  // isVersionOf uniprot:Q7KYZ4
  // Isoform monomer of prion protein
  species P1 in Brain = 0;  // isVersionOf uniprot:Q7KYZ4
  // Misfolded prion protein
  species Pn in Brain = 0;  // isVersionOf uniprot:Q7KYZ4
  // Micelles formed from hydrodynamic interaction
  species Mi in Brain = 0;  // isVersionOf CHEBI:35195
  // Micelles formed from hydrodynamic interaction (+1 M1)
  species Mi_1 in Brain = 0; Mi_1 is "Mi+1";  // isVersionOf CHEBI:35195
  // Isoform oligomer of prion protein
  species Pi in Brain = 0;  // isVersionOf uniprot:Q7KYZ4
  // Isoform oligomer of prion protein (+1 P1)
  species Pi_1 in Brain = 0; Pi_1 is "Pi+1";  // isVersionOf uniprot:Q7KYZ4
  // Isoform oligomer of prion protein (-1 P1)
  species Pi_j in Brain = 0; Pi_j is "Pi-j";  // isVersionOf uniprot:Q7KYZ4
  // Isoform oligomer of prion protein
  species Pj in Brain = 0;  // isVersionOf uniprot:Q7KYZ4

  // Parameters:
  ai = 0;
  bi_1 = 0; bi_1 is "bi+1";
  a_i = 0; a_i is "a*i";
  b_i_1 = 0; b_i_1 is "b*i+1";
  ki = 0; ki is "ki+";
  ki__1 = 0; ki__1 is "ki-+1";
  rikij = 0;

  // Reactions:
  Ji: M1 + Mi => Mi_1; Brain*Ji__Hi(ai, M1, Mi, bi_1, Mi_1);
  Ji_0: Mi_1 => Mi + P1; Brain*Ji_1(a_i, P1, Mi, b_i_1, Mi_1); Ji_0 is "Ji*";
  Hi: P1 + Pi => Pi_1; Brain*Ji__Hi(ki, P1, Pi, ki__1, Pi_1);
  Fi_j: Pi => Pi_j + Pj; Brain*Fi_j_0(rikij, Pi); Fi_j is "Fi,j";

  // Unit definitions:
  unit volume = 1e-3 litre;
  unit time = 3600 second;
  unit substance = 1e-3 mole;
end
