// SBML level 2 version 4

model Tiveci2005()
  // Tiveci2005 - Calcium dynamics in brain energy metabolism and Alzheimer's disease
  // Encoded non-curated model. Issues:
  // - Missing values: dHb,0 ; α ; V ; γ ; Volume ; rc ; V leak,mem,Ca ; V Ca,Pump,ER ; V ch,ER,Ca ; V Atpase
  // - Missing species: Na + ; Pr ; CaPr ; Ca
  // - Confusing values: n = N ; Sm/Vi = S/V ; gna = g'na ; pscap/Vi = Psc/V
  // - Confusing rate equations: is it 2.38 or equation 16 in Table 2.1 describing Cai? ; circular dependence on 2.26
  // This model is described in the article:
  // Modelling of calcium dynamics in brain energy metabolism and Alzheimer's disease.
  // Tiveci S, Akin A, Cakir T, Saybaşili H, Ulgen K.
  // Comput Biol Chem 2005 Apr; 29(2): 151-162
  // Abstract:
  // Functional imaging techniques play a major role in the study of brain activation by monitoring the changes in blood flow and energy metabolism. In order to interpret functional neuroimaging data better, the existing mathematical models describing the links that may exist between electrical activity, energy metabolism and hemodynamics in literature are thoroughly analyzed for their advantages and disadvantages in terms of their prediction of available experimental data. Then, these models are combined within a single model that includes membrane ionic currents, glycolysis, mitochondrial activity, exchanges through the blood-brain barrier, as well as brain hemodynamics. Particular attention is paid to the transport and storage of calcium ions in neurons since calcium is not only an important molecule for signalling in neurons, but it is also essential for memory storage. Multiple efforts have underlined the importance of calcium dependent cellular processes in the biochemical characterization of Alzheimer's disease (AD), suggesting that abnormalities in calcium homeostasis might be involved in the pathophysiology of the disease. The ultimate goal of this study is to investigate the hypotheses about the physiological or biochemical changes in health and disease and to correlate them to measurable physiological parameters obtained from functional neuroimaging data as in the time course of blood oxygenation level dependent (BOLD) signal. When calcium dynamics are included in the model, both BOLD signal and metabolite concentration profiles are shown to exhibit temporal behaviour consistent with the experimental data found in literature. In the case of Alzheimer's disease, the effect of halved cerebral blood flow increase results in a negative BOLD signal implying suppressed neural activity.
  // This model is hosted on BioModels Database and identified by: MODEL1409240003.
  // To cite BioModels Database, please use: BioModels Database: An enhanced, curated and annotated resource for published quantitative kinetic models.
  // To the extent possible under law, all copyright and related or neighbouring rights to this encoded model have been dedicated to the public domain worldwide. Please refer to CC0 Public Domain Dedication for more information.
  // biomodels.db:MODEL1409240003
  // isDescribedBy pubmed:15833443
  // isVersionOf GO:0071277 GO:0006091
  // hasProperty DOID:10652
  // hasTaxon taxonomy:9606

  // Compartments:
  compartment Capillary = 1;  // isVersionOf BTO:0002045
  compartment Neurons = 1;  // isVersionOf BTO:0000938

  // Species:
  // Capillary oxygen
  species $O2c in Capillary = 7.01;  // isVersionOf CHEBI:26689
  // Capillary glucose
  species $GLCc in Capillary = 4.56;  // isVersionOf CHEBI:17234
  // Capillary lactate
  species $LACc in Capillary = 0.35;  // isVersionOf CHEBI:16004
  // Venous volume
  species $Vv in Capillary = 0.0237;  // isVersionOf PATO:0000918
  // Deoxyhemoglobin (dHb)
  species $dHb in Capillary = 0.063;  // isVersionOf CHEBI:5656
  // Intracellular glucose
  species $GLCi in Neurons = 1.2;  // isVersionOf CHEBI:17234
  // Glyceraldehyde-3-phosphate
  species $GAP in Neurons = 0.0057;  // isVersionOf CHEBI:17138
  // Phosphoenolpyruvate
  species $PEP in Neurons = 0.02;  // isVersionOf CHEBI:18021
  // Pyruvate
  species $PYR in Neurons = 0.16;  // isVersionOf CHEBI:15361
  // Intracellular lactate
  species $LACi in Neurons = 1;  // isVersionOf CHEBI:16004
  // Nicotinamide adenine dinucleotide (reduced form)
  species $NADH in Neurons = 0.026;  // isVersionOf CHEBI:16908
  // Adenosine triphosphate
  species $ATP in Neurons = 2.2;  // isVersionOf CHEBI:15422
  // Phosphocreatine
  species $PCr in Neurons = 5;  // isVersionOf CHEBI:17287
  // Intracellular oxygen
  species $O2i in Neurons = 0.0262;  // isVersionOf CHEBI:26689
  // Intracellular sodium
  species $Nai in Neurons = 15;  // isVersionOf CHEBI:29101
  // Intracellular calcium
  species $Cai in Neurons = 0.0003;  // isVersionOf CHEBI:29108
  // E. reticulum calcium
  species $CaER in Neurons = 0.00073;  // isVersionOf CHEBI:29108
  // Mitochondrial calcium
  species $Camito in Neurons = 0.00036;  // isVersionOf CHEBI:29108
  // Phospholipase C
  species $PLC in Neurons = 0.0001;  // isVersionOf uniprot:P19174
  // G-alpha subunit (G protein)
  species $Galpha in Neurons = 0.0001;  // isVersionOf uniprot:P50148
  // Adenosine diphosphate
  species $ADP in Neurons;  // isVersionOf CHEBI:16761
  species NAD in Neurons = 1; NAD is "NAD+";  // isVersionOf CHEBI:15846
  // Adenosine monophosphate
  species $AMP in Neurons;  // isVersionOf CHEBI:16027

  // Parameters:
  A = 2.212;
  C = 10;
  Caex = 2;
  Catotal = 0.09;
  dNaCa = 1e-16;
  F = 96500;
  F0 = 0.012;
  GLCA = 4.8;
  gCa = 0.02;
  g_Na = 0.00391; g_Na is "g'Na";
  Hb_OP = 8.6; Hb_OP is "Hb.OP";
  k1 = 1e-5;
  k2 = 2.3;
  k3 = 0.00064;
  k4 = 9e-5;
  k5 = 0.00488;
  k6 = 0.00118;
  k7 = 2.08;
  k8 = 0.03224;
  k9 = 0.02909;
  k10 = 0.0005;
  k11 = 0.0003;
  k12 = 2.8;
  k13 = 13.4;
  k14 = 0.153;
  k15 = 0.00016;
  k16 = 0.00537;
  k17 = 5e-5;
  k = 0.1; k is "k+";
  k_CK = 3666; k_CK is "k+CK";
  k_LDH = 2000; k_LDH is "k+LDH";
  k_0 = 0.01;
  k_CK_0 = 20; k_CK_0 is "k-CK";
  k_LDH_0 = 44.8; k_LDH_0 is "k-LDH";
  Kg = 0.05;
  kHK_PFK = 0.12; kHK_PFK is "kHK-PFK";
  KI_ATP = 1; KI_ATP is "KI,ATP";
  KI_mito = 183.3; KI_mito is "KI,mito";
  kin_mito = 0.08; kin_mito is "kin,mito";
  Km = 0.0008;
  Km_LAC = 0.5; Km_LAC is "Km,LAC";
  Km_mito = 0.05; Km_mito is "Km,mito";
  Km_pump = 0.5; Km_pump is "Km,pump";
  kNaCa = 1.248e-11;
  KO2 = 0.0361;
  KO2i = 0.001;
  kout_mito = 2.58; kout_mito is "kout,mito";
  k_PGK = 42.6; k_PGK is "k'PGK";
  kPK = 86.7;
  kpump = 2.9e-7;
  kt_GLC = 9; kt_GLC is "kt,GLC";
  LACA = 0.313;
  N = 0.212;
  na = 0.1;
  Nae = 150;
  nAero = 3;
  nh = 2.73;
  nH = 4;
  nOP = 15;
  O2A = 8.34;
  Prtotal = 0.12;
  PSc_V = 1.6; PSc_V is "PSc/V";
  qAK = 0.92;
  R = 8314;
  RT_F = 26.73; RT_F is "RT/F";
  S_V = 90000; S_V is "S/V";
  T = 310;
  t1 = 5;
  tend = 360;
  Tmax_GLC = 0.0476; Tmax_GLC is "Tmax,GLC";
  Tmax_LACm = 0.00628; Tmax_LACm is "Tmax,LACm";
  Vcap = 0.0055;
  Vm = -70;
  Vmax_mito = 0.0262; Vmax_mito is "Vmax,mito";
  Vmito_0 = 0.0192; Vmito_0 is "Vmito,0";
  Vv_0 = 0.0237; Vv_0 is "Vv,0";
  alphaF = 0.5;
  betaER = 0.0025;
  betam = 0.0025;
  rhoER = 0.01;
  rhom = 0.01;
  tauv = 35;
  var vleak_Na; vleak_Na is "vleak-Na";
  var vHK_PFK; vHK_PFK is "vHK-PFK";
  n = 1;
  var O2c_0; O2c_0 is "O2c/";
  var Fin_t; Fin_t is "Fin(t)";
  var y_t; y_t is "y(t)";
  dHb_0 = 0.063; dHb_0 is "dHb,0";
  alpha = 1;
  var vER_ch; vER_ch is "vER,ch";
  var vPLC_act; vPLC_act is "vPLC,act";
  var vPLC_inact; vPLC_inact is "vPLC,inact";
  var vG_act; vG_act is "vG,act";
  var vG_inact; vG_inact is "vG,inact";
  var vch_mem; vch_mem is "vch,mem";
  var vmito_in; vmito_in is "vmito,in";
  var vmito_out; vmito_out is "vmito,out";
  Pr = 1;
  V = 1;
  gamma = 1;
  Volume = 1;
  rc = 1;
  vleak_mem_Ca = 1; vleak_mem_Ca is "vleak,mem,Ca";
  vCa_Pump_ER = 1; vCa_Pump_ER is "vCa,Pump,ER";
  vch_ER_Ca = 1; vch_ER_Ca is "vch,ER,Ca";

  // Assignment rules:
  Fout := F0*((Vv/Vv_0)^(1/alpha) + tauv*(Vv/Vv_0)^(-0.5)*(1/Vv_0)*Vv);
  vER_ch := k10*Cai*PLC*(CaER/(k11 + CaER));
  ADP := ATP/2*(-qAK + (qAK^2 + 4*qAK*(A/(ATP - 1)))^0.5);
  AMP := A - ATP - ADP;
  vleak_Na := S_V*(g_Na/F)*(RT_F*ln(Nae/Nai) - Vm);
  vpump := S_V*kpump*ATP*Nai*(1 + ATP/Km_pump)^(-1);
  vHK_PFK := kHK_PFK*ATP*(1 + (ATP/KI_ATP)^nH)^(-1)*(GLCi/(GLCi + Kg));
  vPGK := k_PGK*GAP*ADP*(NAD/NADH);
  vPK := kPK*PEP*ADP;
  vLDH := k_LDH*PYR*NADH - k_LDH_0*LACi*NAD;
  vCK := k_CK*PCr*ADP - k_CK_0*ATP;
  vmito := Vmax_mito*(PYR/(Km_mito + PYR))*(1/(1 + (ATP/(ADP*KI_mito))^n))*(O2i/(KO2i + O2i));
  O2c_0 := 2*O2c - O2A;
  E := 1 - O2c_0/O2A;
  Fin_t := piecewise((1 + alphaF)*F0, (time >= t1) && (time <= tend), piecewise(F0, (time >= tend + t1) || (time == 0), piecewise(0.0036*time, (time > 0) && (time < t1), piecewise((1 + alphaF)*F0 - 0.0012*(time - tend), (time > tend) && (time < tend + t1), 0))));
  vO2c := 2*Fin_t/Vcap*(O2A - O2c);
  vGLCc := 2*Fin_t/Vcap*(GLCA - GLCc);
  vLACc := 2*Fin_t/Vcap*(LACA - LACc);
  vO2m := PSc_V*(KO2*(Hb_OP/O2c - 1)^(-1/nH) - O2i);
  vGLCm := Tmax_GLC*(GLCc/(GLCc + kt_GLC) - GLCi/(GLCi + kt_GLC));
  vLACm := Tmax_LACm*(LACi/(LACi + Km_LAC) - LACc/(LACc + Km_LAC));
  y_t := Vv_0*(k1*(1 - dHb/dHb_0) + k2*(1 - dHb/dHb_0/(Vv/Vv_0)) + k3*(1 - Vv/Vv_0));
  vPLC_act := k7*Galpha;
  vPLC_inact := k8*(PLC/(k9 + PLC));
  vG_act := k1 + k2*Galpha;
  vG_inact := k3*PLC*(Galpha/(k4 + Galpha)) + k5*Cai*(Galpha/(k6 + Galpha));
  vch_mem := k12*PLC + k13*Galpha;
  CaPr := Prtotal - Pr;
  vmito_in := kin_mito*(Cai^8/(k2^8 + Cai^8));
  vmito_out := kout_mito*Camito;
  vbuffer := -k*Cai*Pr + k_0*CaPr;
  vNaCa := kNaCa*(Nai^3*Caex*exp(V*F*gamma/(R*T*2)) - Nae^3*Cai*exp(V*F*(gamma - 1)/(R*T*2)))/(1 + dNaCa*(Cai*Nae^3 + Caex*Nai^3)*F*Volume);
  vPMCA := k14*Cai/(k15 + Cai);
  vERCA := k16*Cai/(k17 + Cai);
  vstim := piecewise(0.23, (time >= 0) && (time <= 360), 0);

  // Rate rules:
  O2c' = vO2c - 1/rc*vO2m;
  GLCc' = vGLCc - 1/rc*vGLCm;
  LACc' = vLACc + 1/rc*vLACm;
  Vv' = Fin_t - Fout;
  dHb' = Fin_t*(O2A - O2c_0) - Fout*(dHb/Vv);
  GLCi' = vGLCm - vHK_PFK;
  GAP' = 2*vHK_PFK - vPGK;
  PEP' = vPGK - vPK;
  PYR' = vPK - vLDH - vmito;
  LACi' = vLDH - vLACm;
  NADH' = vPGK - vLDH - vmito;
  ATP' = (-2*vHK_PFK + vPGK + vPK - vERCA - vPMCA - vpump + nOP*vmito + vCK)*(1 - AMP/ATP)^(-1);
  PCr' = -vCK;
  O2i' = vO2m - nAero*vmito;
  Nai' = vleak_Na - 3*vpump + vstim;
  Cai' = vmito_out + vch_mem + 1.5*vNaCa + vER_ch - vPMCA + vbuffer - vERCA - vmito_in - vleak_mem_Ca;
  CaER' = betaER/rhoER*(vCa_Pump_ER - vch_ER_Ca);
  Camito' = betam/rhom*(vmito_in - vmito_out);
  PLC' = vPLC_act - vPLC_inact;
  Galpha' = vG_act - vG_inact;

  // Unit definitions:
  unit volume = 1e-3 litre;
  unit substance = 1e-3 mole;
end
