// SBML level 2 version 4

model MODEL1410310000()
  // Masel2000 - Drugs to stop prion aggregates and other amyloids
  // Encoded non-curated model. Issues:
  // - Missing initial concentration for species y, yb and z
  // - Not reproducible figures
  // This model is described in the article:
  // Designing drugs to stop the formation of prion aggregates and other amyloids.
  // Masel J, Jansen VA.
  // Biophys. Chem. 2000 Dec; 88(1-3): 47-59
  // Abstract:
  // Amyloid protein aggregates are implicated in many neurodegenerative diseases, including Alzheimer's disease and the prion diseases. Therapeutics to block amyloid formation are often tested in vitro, but it is not clear how to extrapolate from these experiments to a clinical setting, where the effective drug dose may be much lower. Here we address this question using a theoretical kinetic model to calculate the growth rate of protein aggregates as a function of the dose of each of three categories of drug. We find that therapeutics which block the growing ends of amyloids are the most promising, as alternative strategies may be ineffective or even accelerate amyloid formation at low drug concentrations. Our mathematical model can be used to identify and optimise an end-blocking drug in vitro. Our model also suggests an alternative explanation for data previously thought to prove the existence of an entity known as protein X.
  // This model is hosted on BioModels Database and identified by: MODEL1410310000.
  // To cite BioModels Database, please use: BioModels Database: An enhanced, curated and annotated resource for published quantitative kinetic models.
  // To the extent possible under law, all copyright and related or neighbouring rights to this encoded model have been dedicated to the public domain worldwide. Please refer to CC0 Public Domain Dedication for more information.
  // isDescribedBy pubmed:11152275
  // biomodels.db:MODEL1410310000
  // isVersionOf GO:1990000 GO:0042493
  // hasProperty DOID:10652 DOID:14330 DOID:12858
  // hasTaxon taxonomy:9606

  // Compartments:
  // Brain
  compartment Brain = 1;  // BTO:0000142

  // Species:
  // Monomers
  species $X in Brain = 100;  // isVersionOf CHEBI:60425; unknownQualifier CHEBI:74236
  // Free end-blocking drug or cap
  species $Xb in Brain = 1;  // CHEBI:23888
  // uncapped polymer
  species $y in Brain = 0;  // isVersionOf CHEBI:60425; unknownQualifier CHEBI:60027
  // capped polymer
  species $yb in Brain = 0;  // isVersionOf CHEBI:60425; unknownQualifier CHEBI:60027
  // subunits incorporated into polymers
  species $z in Brain = 100;  // isVersionOf CHEBI:60425

  // Parameters:
  lambda = 0;
  lambdab = 0;
  d = 0;
  db = 0;
  a = 0;
  kb = 0;
  n = 6;
  beta1 = 1;
  beta2 = 0;
  betab = 1;
  b = 0.0001;

  // Assignment rules:
  r := -a - b*(n - 1) - (betab*Xb + b)/2 + (((betab*Xb + b)/2)^2 + beta1*X*b)^0.5;

  // Rate rules:
  X' = lambda - d*X - (beta1 + beta2)*X*y - beta2*X*yb + b*n*(n - 1)*(y + yb);
  Xb' = lambdab - db*Xb - betab*Xb*y + kb*yb + b*(n - 1)*yb;
  y' = -betab*Xb*y + kb*yb - a*y + b*z - (2*n - 1)*b*y - b*n*yb;
  yb' = betab*Xb*y - kb*yb - a*yb - b*(n - 1)*yb;
  z' = (beta1 + beta2)*X*y + beta2*X*yb - a*z - b*n*(n - 1)*(y + yb);

  // Unit definitions:
  unit volume = 1e-3 litre;
  unit substance = 1e-3 mole;
end
