// SBML level 2 version 4

model MODEL1411130000()
  // Miao2014 - Dynamics and migratory pathways of virus-specific antibody-secreting cell populations
  // This model is from the paper available at http://www.ncbi.nlm.nih.gov/pubmed/25171166. The original model contains time-varying parameters which are described by a smoothing spline. In this model parameters S1 and S2 are placeholders for these time-varying parameters. The model can be explored and executed through DEDiscover, with session file available at http://tinyurl.com/mc9cl77.
  // biomodels.db:MODEL1411130000

  // Compartments:
  compartment default = 1 volume;
  compartment Spleen in default = 1 volume;
  compartment MLN in default = 1 volume;
  compartment Lung in default = 1 volume;

  // Species:
  substanceOnly species B_Cell_spleen in Spleen = 3400;
  substanceOnly species B_Cell_MLN in MLN = 1100;
  substanceOnly species B_Cell_Lung in Lung = 18;
  species s4 in default = 0;
  species s5 in default = 0;
  species s6 in default = 0;
  species s7 in default = 0;
  species s8 in default = 0;

  // Parameters:
  // Percentage of plasma cells from MLN to spleen
  alpha = 0 substance;
  // Disappearance rate of plasma cells in lung
  delta_lm = 0.83 substance;
  // Disappearance rate of plasma cells in MLN
  delta_nm = 0.5 substance;
  // Disappearance rate of plasma cells in spleen
  delta_sm = 0.5 substance;
  // Migration rate of plasma cells out of MLN
  gamma_nm = 0 substance;
  // Migration rate of plasma cells from spleen to lung
  gamma_slm = 0.00076 substance;
  // Stimulation strength coefficent in MLN
  rho_nm = 0.00013 substance;
  // Stimulation strength coefficent in spleen
  rho_sm = 9.6e-5 substance;
  // Lag time for B cell activation in MLN. Will be used by the function describing the time-varying parameter S1.
  tau1 = 0 substance;
  // Lag time for B cell activation in spleen. Will be used by the function describing the time-varying parameter S2.
  tau2 = 2.5 substance;
  // B cell activation stimulus (e.g. antigen presenting cells) in cells per spleen. This is in reality a time-varying parameter based on data smoothed with a b-spline. It is a placeholder since this type of function is not supported in MathML or SBML.
  S2 = 0 substance;
  // B cell activation stimulus (e.g. antigen presenting cells) in cells per MLN. This is in reality a time-varying parameter based on data smoothed with a b-spline. It is a placeholder since this type of function is not supported in MathML or SBML
  S1 = 0 substance;

  // Reactions:
  re3: B_Cell_MLN => B_Cell_Lung; (1 - alpha)*gamma_nm*B_Cell_MLN;
  re4: B_Cell_spleen => B_Cell_Lung; gamma_slm*B_Cell_spleen;
  re5: B_Cell_Lung => s4; delta_lm*B_Cell_Lung;
  re6: s5 => B_Cell_spleen; rho_sm*S2*B_Cell_spleen;
  re7: B_Cell_MLN => B_Cell_spleen; alpha*gamma_nm*B_Cell_MLN;
  re8: B_Cell_spleen => s6; delta_sm*B_Cell_spleen;
  re9: B_Cell_MLN => s7; delta_nm*B_Cell_MLN;
  re10: s8 => B_Cell_MLN; rho_nm*S1*B_Cell_MLN;

  // Unit definitions:
  unit substance = mole;
  unit volume = litre;
  unit area = metre^2;
  unit length = metre;
  unit time = second;
end
