// SBML level 2 version 4

model MODEL1502180000()
  // Takahashi2015 - Zinc regulation E.coli
  // This a model from the article:
  // The dynamic balance of import and export of zinc in Escherichia coli suggests a heterogeneous population response to stress
  // Takahashi H, Oshima T, Doherty N, Clayton SR, Iqbal M, Hill PJ, Hobman JL, Tobe T, Ogasawara N, Kanaya S and Stekel DJ journal year id,
  // Abstract:
  // Zinc is essential for life, but toxic in excess. Thus all cells must control their internal zinc concentration. We used a systems approach, alternating rounds of experiments and models, to further elucidate the zinc control systems in Escherichia coli. We measured the response to zinc of the main specific zinc import and export systems in the wild type, and a series of deletion mutant strains. We interpreted these data with a detailed mathematical model and Bayesian model fitting routines. There are three key findings: First, that alternate, non-inducible importers and exporters are important. Second, that an internal zinc reservoir is essential for maintaining the internal zinc concentration. Third, our data fitting led us to propose that the cells mount a heterogeneous response to zinc: some respond effectively, while others die or stop growing. In a further round of experiments we demonstrated lower viable cell counts in the mutant strain tested exposed to excess zinc, consistent with this hypothesis. A stochastic model simulation demonstrated considerable fluctuations in the cellular levels of the ZntA exporter protein, reinforcing this proposal. We hypothesise that maintaining population heterogeneity could be a bet-hedging response allowing a population of cells to survive in varied and fluctuating environments.
  // This model originates from BioModels Database: A Database of Annotated Published Models (http://www.ebi.ac.uk/biomodels/). It is copyright (c) 2005-2011 The BioModels.net Team.
  // For more information see the terms of use.
  // To cite BioModels Database, please use: Li C, Donizelli M, Rodriguez N, Dharuri H, Endler L, Chelliah V, Li L, He E, Henry A, Stefan MI, Snoep JL, Hucka M, Le NovÃ¨re N, Laibe C (2010) BioModels Database: An enhanced, curated and annotated resource for published quantitative kinetic models. BMC Syst Biol., 4:92.
  // biomodels.db:MODEL1502180000

  // Compartments:
  compartment Cell = 1;
  compartment External = 1;

  // Species:
  species $P1 in Cell = 1910.995;
  species $P2 in Cell = 493.1362;
  species $X in Cell = 24.78166;
  species $Y in Cell = 0.09905574;
  species $R in Cell = 196678.3;
  species $Z in Cell = 0.0028596;
  species $Zext in External = 24700;

  // Parameters:
  b1 = 2.151146;
  k1 = 4.714114;
  l1 = 2497.125;
  l2 = 6.010855e-10;
  r2 = 0.006523881;
  b2 = 0.8297886;
  m1 = 0.08751935;
  m2 = 8.820055e-14;
  ap1 = 6.692474e-7;
  ab = 0.001864528;
  bp2 = 1.564578;
  bb = 262.5768;
  kroff = 2.986128e-5;
  kron = 125.3697;
  g = 0.0001799081;
  rt = 1.967934e5;
  xt = 25;
  yt = 25;

  // Rate rules:
  P1' = b1/(1 + X/k1) - g*P1;
  P2' = r2 + b2*Y - g*P2;
  X' = l1*Z^2*(xt - X) - l2*X - g*X;
  Y' = m1*Z^2*(yt - Y) - m2*Y - g*Y;
  R' = kron*Z*(rt - R) - kroff*R - g*R;
  Z' = (ap1*P1 + ab)*Zext - (bp2*P2 + bb)*Z - 2*l1*Z^2*(xt - X) + 2*l2*X - 2*m1*Z^2*(yt - Y) + 2*m2*Y - kron*Z*(rt - R) + kroff*R - g*Z;

  // Unit definitions:
  unit substance = 1e-9 mole;
end
