// SBML level 2 version 4

function Henri_Michaelis_Menten__irreversible(substrate, Km, V)
  V*substrate/(Km + substrate);
end
Henri_Michaelis_Menten__irreversible is "Henri-Michaelis-Menten (irreversible)";

function Two_substrates(Vmax, S1, S2, KS1, KS2)
  Vmax*S1*S2/((KS1 + S1)*(KS2 + S2));
end

function Two_substrates_two_products(Vfmax, S1, S2, KS1, KS2, Vbmax, P1, P2, KP1, KP2)
  Vfmax*S1*S2/((KS1 + S1)*(KS2 + S2)) - Vbmax*P1*P2/((KP1 + P1)*(KP2 + P2));
end

function VTH_0(S1, KiS1, I1, Vmax, S2, KS1, KS2, I2, KiI2)
  0.56/(1 + S1/KiS1)*(4.5/(8*(I1/0.002024)^4 + 1) + 0.5)*(Vmax*S1*S2/(S1*S2 + KS1*S2 + KS1*KS2*(1 + I2/KiI2)));
end

model MODEL1502230000()
  // Best2009 - Homeostatic mechanisms in dopamine synthesis and release
  // Encoded non-curated model. Issues:
  // - Initial concentrations for hva, tyrpool, NADPH and NADP are missing
  // - Reaction VMAT requires two substrates to match the formula proposed in the article
  // This model is described in the article:
  // Homeostatic mechanisms in dopamine synthesis and release: a mathematical model.
  // Best JA, Nijhout HF, Reed MC.
  // Theor Biol Med Model 2009; 6: 21
  // Abstract:
  // BACKGROUND: Dopamine is a catecholamine that is used as a neurotransmitter both in the periphery and in the central nervous system. Dysfunction in various dopaminergic systems is known to be associated with various disorders, including schizophrenia, Parkinson's disease, and Tourette's syndrome. Furthermore, microdialysis studies have shown that addictive drugs increase extracellular dopamine and brain imaging has shown a correlation between euphoria and psycho-stimulant-induced increases in extracellular dopamine 1. These consequences of dopamine dysfunction indicate the importance of maintaining dopamine functionality through homeostatic mechanisms that have been attributed to the delicate balance between synthesis, storage, release, metabolism, and reuptake. METHODS: We construct a mathematical model of dopamine synthesis, release, and reuptake and use it to study homeostasis in single dopaminergic neuron terminals. We investigate the substrate inhibition of tyrosine hydroxylase by tyrosine, the consequences of the rapid uptake of extracellular dopamine by the dopamine transporters, and the effects of the autoreceoptors on dopaminergic function. The main focus is to understand the regulation and control of synthesis and release and to explicate and interpret experimental findings. RESULTS: We show that the substrate inhibition of tyrosine hydroxylase by tyrosine stabilizes cytosolic and vesicular dopamine against changes in tyrosine availability due to meals. We find that the autoreceptors dampen the fluctuations in extracellular dopamine caused by changes in tyrosine hydroxylase expression and changes in the rate of firing. We show that short bursts of action potentials create significant dopamine signals against the background of tonic firing. We explain the observed time courses of extracellular dopamine responses to stimulation in wild type mice and mice that have genetically altered dopamine transporter densities and the observed half-lives of extracellular dopamine under various treatment protocols. CONCLUSION: Dopaminergic systems must respond robustly to important biological signals such as bursts, while at the same time maintaining homeostasis in the face of normal biological fluctuations in inputs, expression levels, and firing rates. This is accomplished through the cooperative effect of many different homeostatic mechanisms including special properties of tyrosine hydroxylase, the dopamine transporters, and the dopamine autoreceptors.
  // This model is hosted on BioModels Database and identified by: MODEL1502230000.
  // To cite BioModels Database, please use: BioModels Database: An enhanced, curated and annotated resource for published quantitative kinetic models.
  // To the extent possible under law, all copyright and related or neighbouring rights to this encoded model have been dedicated to the public domain worldwide. Please refer to CC0 Public Domain Dedication for more information.
  // isDescribedBy pubmed:19740446
  // biomodels.db:MODEL1502230000
  // isVersionOf GO:0042417
  // hasProperty DOID:14330
  // hasTaxon taxonomy:9606

  // Compartments:
  // Extracellular space
  compartment Extrecellular = 1;  // GO:0005615
  // Cytosol
  compartment Cytosol = 1;  // GO:0005829
  // Vesicle
  compartment Vesicle = 1;  // GO:0031982

  // Species:
  // Serum tyrosine
  species btyr in Extrecellular = 97;  // CHEBI:18186
  // Homovanillic acid
  species $hva in Extrecellular = 0;  // CHEBI:545959
  // Extracellular dopamine
  species $eda in Extrecellular = 0.002;  // CHEBI:18243
  // S-adenosylmethionine
  species SAM in Extrecellular = 0;  // CHEBI:15414
  // S-Adenosylhomocysteine
  species SAH in Extrecellular = 0;  // CHEBI:16680
  // Nicotinamide Adenine Dinucleotide phosphate (oxidized)
  species NADP in Cytosol = 0; NADP is "NADP+";  // CHEBI:18009
  // Nicotinamide Adenine Dinucleotide phosphate (reduced)
  species NADPH in Cytosol = 0;  // CHEBI:16474
  // Tetrahydrobiopterin
  species bh4 in Cytosol = 319;  // CHEBI:59560
  // Dihydrobiopterin
  species bh2 in Cytosol = 41;  // CHEBI:64277
  // Tyrosine
  species $tyr in Cytosol = 126;  // CHEBI:18186
  // The tyrosine pool
  species $tyrpool in Cytosol = 1260;  // CHEBI:18186
  // 3,4-dihydroxyphenylalanine (L-DOPA)
  species l_dopa in Cytosol = 0.36; l_dopa is "l-dopa";  // CHEBI:15765
  // Cytosolic dopamine
  species $cda in Cytosol = 2.65;  // CHEBI:18243
  // Vesicular dopamine
  species $vda in Vesicle = 81;  // CHEBI:18243

  // Parameters:
  KmVAADC = 130;
  VmaxVAADC = 10000;
  KmVDAT = 0.2;
  VmaxVDAT = 8000;
  Kbh2VDRR = 100;
  KnadphVDRR = 75;
  VfmaxVDRR = 200;
  Kbh4VDRR = 10;
  KnadpVDRR = 75;
  VbmaxVDRR = 80;
  KmVMAT = 3;
  VmaxVMAT = 7082;
  koutVMAT = 40;
  KtyrVTH = 46;
  Kbh4VTH = 60;
  VmaxVTH = 125;
  Ki_cda_VTH = 110; Ki_cda_VTH is "Ki(cda)VTH";
  ki_tyr_VTH = 160; ki_tyr_VTH is "ki(tyr)VTH";
  ki_autoreceptor_VTH = 0; ki_autoreceptor_VTH is "ki(autoreceptor)VTH";
  KmVTYRin = 64;
  VmaxVTYRin = 400;
  k1tyr = 6;
  k_1tyr = 0.6; k_1tyr is "k-1tyr";
  kcatabtyr = 0.2;
  kcatabcda = 10;
  Vcatab_eda_max = 30; Vcatab_eda_max is "Vcatab(eda)max";
  Kcatab_eda_m = 3; Kcatab_eda_m is "Kcatab(eda)m";
  Kcatabhva = 3.45;
  kcatabtyrpool = 0.2;
  Krem = 400;
  VTYRin = 244;
  fire = 1;

  // Rate rules:
  hva' = kcatabcda*cda + VCATAB - Kcatabhva*hva;
  eda' = fire*vda - VDAT - VCATAB - Krem*eda;
  tyr' = VTYRin*btyr - VTH - k1tyr*tyr + k_1tyr*tyrpool - kcatabtyr*tyr;
  tyrpool' = k1tyr*tyr - k_1tyr*tyrpool - kcatabtyrpool*tyrpool;
  cda' = VAADC - VMAT + VDAT - kcatabcda*cda;
  vda' = VMAT - fire*vda;

  // Reactions:
  // Reaction catalyzed by Tyrosine hydroxylase
  VTH: $tyr + bh4 => l_dopa + bh2; Cytosol*VTH_0(tyr, ki_tyr_VTH, eda, VmaxVTH, bh4, KtyrVTH, Kbh4VTH, cda, Ki_cda_VTH);  // modifiers: eda, cda
  // Reaction catalyzed by Dihydrobiopterin reductase
  VDRR: bh2 + NADPH => bh4 + NADP; Cytosol*Two_substrates_two_products(VfmaxVDRR, bh2, NADPH, Kbh2VDRR, KnadphVDRR, VbmaxVDRR, bh4, NADP, Kbh4VDRR, KnadpVDRR);
  // Reaction catalyzed aromatic amino acid decarboxylase
  VAADC: l_dopa => $cda; Cytosol*Henri_Michaelis_Menten__irreversible(l_dopa, KmVAADC, VmaxVAADC);
  // Reaction catalyzed by Vesicular Dopamine Transporter
  VMAT: $cda + $vda => $vda; Two_substrates(VmaxVMAT, cda, vda, KmVMAT, koutVMAT);
  // Reaction catalyzed by Dopamine Transporter
  VDAT: $eda => $cda; Henri_Michaelis_Menten__irreversible(eda, KmVDAT, VmaxVDAT);
  // Reaction calyzed by Catecholamine O-metyl transferase and Monoamine Oxidase
  VCATAB: $eda => $hva; Extrecellular*Henri_Michaelis_Menten__irreversible(eda, Kcatab_eda_m, Vcatab_eda_max);

  // Unit definitions:
  unit volume = 1e-3 litre;
  unit time = 3600 second;
  unit substance = 1e-6 mole;
end
