// SBML level 2 version 4

model MODEL1503180002()
  // Smallbone2015 - Michaelis Menten
  // biomodels.db:MODEL1503180002

  // Compartments:
  compartment comp = 1;

  // Species:
  species S in comp = 1;
  species E in comp = E0;
  species ES in comp = 0;
  species P in comp = 0;

  // Parameters:
  E0 = 0.001 dimensionless;
  kf = 1 dimensionless;
  kr = 1 dimensionless;
  kcat = 1 dimensionless;
  Vmax = E0*kcat; Vmax has dimensionless;
  Km = (kcat + kr)/kf; Km has dimensionless;
  R has dimensionless;

  // Assignment rules:
  R := Vmax*S/(S + Km);

  // Reactions:
  S_to_ES: S + E -> ES; kf*S*E - kr*ES;
  ES_to_P: ES -> P + E; kcat*ES;

  // Unit definitions:
  unit substance = dimensionless;
  unit time = dimensionless;
  unit volume = dimensionless;
end
