// SBML level 2 version 4

model MODEL1504010000()
  // Shestov2014 - aerobic glycolysis
  // biomodels.db:MODEL1504010000

  // Compartments:
  compartment EXT = 1;
  compartment CYT = 1;

  // Species:
  species GLU in CYT = 2.5909;
  species G6P in CYT = 0.2263;
  species F6P in CYT = 0.0701;
  species FBP in CYT = 0.45;
  species DHAP in CYT = 0.0244;
  species GAP in CYT = 0.00116;
  species BPG in CYT = 0.0686;
  species _3PG in CYT = 0.76;
  species _2PG in CYT = 0.0357;
  species PEP in CYT = 0.18;
  species PYR in CYT = 0.42;
  species LAC in CYT = 1.45;
  species ATP in CYT = 3;
  species ADP in CYT = 0.0182;
  species AMP in CYT = 3.4e-5;
  species P in CYT = 5.11;
  species NADH in CYT = 0.00373;
  species NAD in CYT = 0.546;
  species PCR in CYT = 8.46;
  species CR in CYT = 6.54;
  species O2 in CYT = 0.076;
  species $GLUe in EXT = 5;
  species $LACe in EXT = 0.5;
  species $O2e in EXT = 0.135;
  species $H in CYT = 1e-7;

  // Parameters:
  Vf_GLUT = 100;
  dG0_GLUT = 0;
  KM_GLUT_GLUe = 2.1;
  KM_GLUT_GLU = 2.1;
  KE_GLUT = 1;
  RT = 2.478956;
  KMf_HK = 7.5;
  dG0_HK = -19.22;
  KMb_HK = 2.94e-10;
  KE_HK = 2329.16;
  Vf_HK = 176;
  Vf_HPI = 858;
  KM_HPI_G6P = 0.25;
  dG0_HPI = 2.78;
  KE_HPI = 0.3258104;
  KM_HPI_F6P = 0.0773;
  KMf_PFK = 0.23;
  KMb_PFK = 1.82e-10;
  KE_PFK = 545.138;
  Vf_PFK = 1769;
  dG0_PFK = -15.62;
  KA_PFK_AMP = 0.001;
  KMf_ALD = 0.16;
  dG0_ALD = 24.64;
  KMb_ALD = 8.29e-5;
  KE_ALD = 4.822335e-5;
  Vf_ALD = 321;
  dG0_TPI = 7.57;
  KM_TPI_DHAP = 0.04;
  Vf_TPI = 859;
  KE_TPI = 0.04718381;
  KM_TPI_GAP = 0.002;
  KM_GAPDH_NADH = 0.001;
  KE_GAPDH = 0.3503479;
  KM_GAPDH_NAD = 0.55;
  Vf_GAPDH = 781;
  KM_GAPDH_GAP = 0.002;
  KM_GAPDH_P = 4;
  dG0_GAPDH = 2.6;
  KM_GAPDH_BPG = 0.1;
  KM_GAPDH_H = 1e-7;
  KMf_PGK = 0.00118;
  dG0_PGK = -21.6;
  KMb_PGK = 1.5;
  KE_PGK = 6083.555;
  Vf_PGK = 221;
  dG0_PGM = 6.35;
  KM_PGM__2PG = 0.03;
  Vf_PGM = 528;
  KE_PGM = 0.07718409;
  KM_PGM__3PG = 0.5;
  KM_ENO__2PG = 0.03;
  dG0_ENO = -4.47;
  KM_ENO_PEP = 0.15;
  Vf_ENO = 1340;
  KE_ENO = 6.068905;
  KMf_PK = 0.00177;
  KA_PK_FBP = 0.5;
  KMb_PK = 0.15;
  KE_PK = 57773.87;
  Vf_PK = 212;
  dG0_PK = -27.18;
  KM_LDH_NADH = 0.001;
  Vf_LDH = 434;
  KM_LDH_NAD = 0.549;
  KM_LDH_PYR = 0.5;
  KM_LDH_LAC = 5;
  dG0_LDH = -23.9;
  KE_LDH = 15385.09;
  Vf_LACT = 60;
  dG0_LACT = 0;
  KM_LACT_LACe = 3;
  KE_LACT = 1;
  KM_LACT_LAC = 3;
  KM_OXPHOS_PYR = 0.001;
  nnad = 2.5;
  KM_OXPHOS_O2 = 0.005;
  KM_OXPHOS_ADP = 0.005;
  nox = 3;
  nop = 12.5;
  V_OXPHOS = 4.4;
  KMf_ATPase = 3;
  dG0_ATPase = -32.42;
  KMb_ATPase = 4.71e-9;
  KE_ATPase = 478343.7;
  Vf_ATPase = 390;
  KMf_AK = 5;
  dG0_AK = 0;
  KMb_AK = 2;
  KE_AK = 1;
  Vf_AK = 2000;
  dG0_OXYT = 0;
  KE_OXYT = 1;
  kf_OXYT = 164;

  // Assignment rules:
  dG_GLUT := dG0_GLUT + RT*ln(GLU/GLUe);
  g_GLUT := dG0_GLUT/RT + ln(GLU/GLUe);
  dG_HK := dG0_HK + RT*ln(G6P*ADP*H/(GLU*ATP));
  g_HK := dG0_HK/RT + ln(G6P*ADP*H/(GLU*ATP));
  dG_HPI := dG0_HPI + RT*ln(F6P/G6P);
  g_HPI := dG0_HPI/RT + ln(F6P/G6P);
  dG_PFK := dG0_PFK + RT*ln(FBP*ADP*H/(F6P*ATP));
  g_PFK := dG0_PFK/RT + ln(FBP*ADP*H/(F6P*ATP));
  dG_ALD := dG0_ALD + RT*ln(DHAP*GAP/FBP);
  g_ALD := dG0_ALD/RT + ln(DHAP*GAP/FBP);
  dG_TPI := dG0_TPI + RT*ln(GAP/DHAP);
  g_TPI := dG0_TPI/RT + ln(GAP/DHAP);
  dG_GAPDH := dG0_GAPDH + RT*ln(BPG*NADH*H/(GAP*NAD*P));
  g_GAPDH := dG0_GAPDH/RT + ln(BPG*NADH*H/(GAP*NAD*P));
  dG_PGK := dG0_PGK + RT*ln(_3PG*ATP/(BPG*ADP));
  g_PGK := dG0_PGK/RT + ln(_3PG*ATP/(BPG*ADP));
  dG_PGM := dG0_PGM + RT*ln(_2PG/_3PG);
  g_PGM := dG0_PGM/RT + ln(_2PG/_3PG);
  dG_ENO := dG0_ENO + RT*ln(PEP/_2PG);
  g_ENO := dG0_ENO/RT + ln(PEP/_2PG);
  dG_PK := dG0_PK + RT*ln(PYR*ATP/(PEP*ADP));
  g_PK := dG0_PK/RT + ln(PYR*ATP/(PEP*ADP));
  dG_LDH := dG0_LDH + RT*ln(LAC*NAD/(PYR*NADH));
  g_LDH := dG0_LDH/RT + ln(LAC*NAD/(PYR*NADH));
  dG_LACT := dG0_LACT + RT*ln(LACe/LAC);
  g_LACT := dG0_LACT/RT + ln(LACe/LAC);
  dG_ATPase := dG0_ATPase + RT*ln(ADP*P*H/ATP);
  g_ATPase := dG0_ATPase/RT + ln(ADP*P*H/ATP);
  dG_AK := dG0_AK + RT*ln(ADP*ADP/(ATP*AMP));
  g_AK := dG0_AK/RT + ln(ADP*ADP/(ATP*AMP));
  dG_OXYT := dG0_OXYT + RT*ln(O2/O2e);
  g_OXYT := dG0_OXYT/RT + ln(O2/O2e);
  J_GLUT := Vf_GLUT/KM_GLUT_GLUe*(GLUe - GLU/KE_GLUT)/(1 + GLUe/KM_GLUT_GLUe + GLU/KM_GLUT_GLU);
  J_HK := Vf_HK/KMf_HK*(GLU*ATP - G6P*ADP*H/KE_HK)/(1 + GLU*ATP/KMf_HK + G6P*ADP*H/KMb_HK);
  J_HPI := Vf_HPI/KM_HPI_G6P*(G6P - F6P/KE_HPI)/(1 + G6P/KM_HPI_G6P + F6P/KM_HPI_F6P);
  J_PFK := Vf_PFK/(KMf_PFK*KA_PFK_AMP)*(F6P*ATP*AMP - FBP*ADP*H*AMP/KE_PFK)/(1 + F6P*ATP/KMf_PFK + FBP*ADP*H/KMb_PFK + F6P*ATP*AMP/(KMf_PFK*KA_PFK_AMP) + FBP*ADP*H*AMP/(KMb_PFK*KA_PFK_AMP) + AMP/KA_PFK_AMP);
  J_ALD := Vf_ALD/KMf_ALD*(FBP - DHAP*GAP/KE_ALD)/(1 + FBP/KMf_ALD + DHAP*GAP/KMb_ALD);
  J_TPI := Vf_TPI/KM_TPI_DHAP*(DHAP - GAP/KE_TPI)/(1 + DHAP/KM_TPI_DHAP + GAP/KM_TPI_GAP);
  J_GAPDH := Vf_GAPDH/(KM_GAPDH_GAP*KM_GAPDH_NAD*KM_GAPDH_P)*(GAP*NAD*P - BPG*NADH*H/KE_GAPDH)/(1 + GAP/KM_GAPDH_GAP + NAD/KM_GAPDH_NAD + P/KM_GAPDH_P + BPG/KM_GAPDH_BPG + NADH/KM_GAPDH_NADH + GAP*NAD*P/(KM_GAPDH_GAP*KM_GAPDH_NAD*KM_GAPDH_P) + BPG*NADH*H/(KM_GAPDH_BPG*KM_GAPDH_NADH*KM_GAPDH_H));
  J_PGK := Vf_PGK/KMf_PGK*(BPG*ADP - _3PG*ATP/KE_PGK)/(1 + BPG*ADP/KMf_PGK + _3PG*ATP/KMb_PGK);
  J_PGM := Vf_PGM/KM_PGM__3PG*(_3PG - _2PG/KE_PGM)/(1 + _3PG/KM_PGM__3PG + _2PG/KM_PGM__2PG);
  J_ENO := Vf_ENO/KM_ENO__2PG*(_2PG - PEP/KE_ENO)/(1 + _2PG/KM_ENO__2PG + PEP/KM_ENO_PEP);
  J_PK := Vf_PK/(KMf_PK*KA_PK_FBP)*(PEP*ADP*FBP - PYR*ATP*FBP/KE_PK)/(1 + PEP*ADP/KMf_PK + PYR*ATP/KMb_PK + PEP*ADP*FBP/(KMf_PK*KA_PK_FBP) + PYR*ATP*FBP/(KMb_PK*KA_PK_FBP) + FBP/KA_PK_FBP);
  J_LDH := Vf_LDH/(KM_LDH_PYR*KM_LDH_NADH)*(PYR*NADH - LAC*NAD/KE_LDH)/(1 + PYR/KM_LDH_PYR + NADH/KM_LDH_NADH + PYR*NADH/(KM_LDH_PYR*KM_LDH_NADH) + LAC/KM_LDH_LAC + NAD/KM_LDH_NAD + LAC*NAD/(KM_LDH_LAC*KM_LDH_NAD));
  J_LACT := Vf_LACT/KM_LACT_LAC*(LAC - LACe/KE_LACT)/(1 + LAC/KM_LACT_LAC + LACe/KM_LACT_LACe);
  J_OXPHOS := V_OXPHOS*(PYR/(PYR + KM_OXPHOS_PYR))*(O2/(O2 + KM_OXPHOS_O2))*(ADP/(ADP + KM_OXPHOS_ADP));
  J_MAS := V_OXPHOS*(PYR/(PYR + KM_OXPHOS_PYR))*(O2/(O2 + KM_OXPHOS_O2))*(ADP/(ADP + KM_OXPHOS_ADP));
  J_ATPase := Vf_ATPase/KMf_ATPase*(ATP - ADP*P*H/KE_ATPase)/(1 + ATP/KMf_ATPase + ADP*P*H/KMb_ATPase);
  J_AK := Vf_AK/KMf_AK*(ATP*AMP - ADP*ADP/KE_AK)/(1 + ATP*AMP/KMf_AK + ADP*ADP/KMb_AK);
  J_OXYT := kf_OXYT*O2e - kf_OXYT/KE_OXYT*O2;

  // Reactions:
  GLUT: $GLUe -> GLU; Vf_GLUT/KM_GLUT_GLUe*(GLUe - GLU/KE_GLUT)/(1 + GLUe/KM_GLUT_GLUe + GLU/KM_GLUT_GLU);
  HK: GLU + ATP -> G6P + ADP + $H; Vf_HK/KMf_HK*(GLU*ATP - G6P*ADP*H/KE_HK)/(1 + GLU*ATP/KMf_HK + G6P*ADP*H/KMb_HK);
  HPI: G6P -> F6P; Vf_HPI/KM_HPI_G6P*(G6P - F6P/KE_HPI)/(1 + G6P/KM_HPI_G6P + F6P/KM_HPI_F6P);
  PFK: F6P + ATP -> FBP + ADP + $H; Vf_PFK/(KMf_PFK*KA_PFK_AMP)*(F6P*ATP*AMP - FBP*ADP*H*AMP/KE_PFK)/(1 + F6P*ATP/KMf_PFK + FBP*ADP*H/KMb_PFK + F6P*ATP*AMP/(KMf_PFK*KA_PFK_AMP) + FBP*ADP*H*AMP/(KMb_PFK*KA_PFK_AMP) + AMP/KA_PFK_AMP);  // modifiers: AMP
  ALD: FBP -> DHAP + GAP; Vf_ALD/KMf_ALD*(FBP - DHAP*GAP/KE_ALD)/(1 + FBP/KMf_ALD + DHAP*GAP/KMb_ALD);
  TPI: DHAP -> GAP; Vf_TPI/KM_TPI_DHAP*(DHAP - GAP/KE_TPI)/(1 + DHAP/KM_TPI_DHAP + GAP/KM_TPI_GAP);
  GAPDH: GAP + NAD + P -> BPG + NADH + $H; Vf_GAPDH/(KM_GAPDH_GAP*KM_GAPDH_NAD*KM_GAPDH_P)*(GAP*NAD*P - BPG*NADH*H/KE_GAPDH)/(1 + GAP/KM_GAPDH_GAP + NAD/KM_GAPDH_NAD + P/KM_GAPDH_P + BPG/KM_GAPDH_BPG + NADH/KM_GAPDH_NADH + GAP*NAD*P/(KM_GAPDH_GAP*KM_GAPDH_NAD*KM_GAPDH_P) + BPG*NADH*H/(KM_GAPDH_BPG*KM_GAPDH_NADH*KM_GAPDH_H));
  PGK: BPG + ADP -> _3PG + ATP; Vf_PGK/KMf_PGK*(BPG*ADP - _3PG*ATP/KE_PGK)/(1 + BPG*ADP/KMf_PGK + _3PG*ATP/KMb_PGK);
  PGM: _3PG -> _2PG; Vf_PGM/KM_PGM__3PG*(_3PG - _2PG/KE_PGM)/(1 + _3PG/KM_PGM__3PG + _2PG/KM_PGM__2PG);
  ENO: _2PG -> PEP; Vf_ENO/KM_ENO__2PG*(_2PG - PEP/KE_ENO)/(1 + _2PG/KM_ENO__2PG + PEP/KM_ENO_PEP);
  PK: PEP + ADP -> PYR + ATP; Vf_PK/(KMf_PK*KA_PK_FBP)*(PEP*ADP*FBP - PYR*ATP*FBP/KE_PK)/(1 + PEP*ADP/KMf_PK + PYR*ATP/KMb_PK + PEP*ADP*FBP/(KMf_PK*KA_PK_FBP) + PYR*ATP*FBP/(KMb_PK*KA_PK_FBP) + FBP/KA_PK_FBP);  // modifiers: FBP
  LDH: PYR + NADH -> LAC + NAD; Vf_LDH/(KM_LDH_PYR*KM_LDH_NADH)*(PYR*NADH - LAC*NAD/KE_LDH)/(1 + PYR/KM_LDH_PYR + NADH/KM_LDH_NADH + PYR*NADH/(KM_LDH_PYR*KM_LDH_NADH) + LAC/KM_LDH_LAC + NAD/KM_LDH_NAD + LAC*NAD/(KM_LDH_LAC*KM_LDH_NAD));
  LACT: LAC -> $LACe; Vf_LACT/KM_LACT_LAC*(LAC - LACe/KE_LACT)/(1 + LAC/KM_LACT_LAC + LACe/KM_LACT_LACe);
  OXPHOS: PYR -> (-nop) ADP + (-nop) P + (-nox) O2 + nop ATP; V_OXPHOS*(PYR/(PYR + KM_OXPHOS_PYR))*(O2/(O2 + KM_OXPHOS_O2))*(ADP/(ADP + KM_OXPHOS_ADP));
  MAS: NADH -> (-nnad) ADP + (-nnad) P + NAD + nnad ATP; V_OXPHOS*(PYR/(PYR + KM_OXPHOS_PYR))*(O2/(O2 + KM_OXPHOS_O2))*(ADP/(ADP + KM_OXPHOS_ADP));  // modifiers: PYR, O2
  ATPase: ATP -> ADP + P + $H; Vf_ATPase/KMf_ATPase*(ATP - ADP*P*H/KE_ATPase)/(1 + ATP/KMf_ATPase + ADP*P*H/KMb_ATPase);
  AK: ATP + AMP -> 2 ADP; Vf_AK/KMf_AK*(ATP*AMP - ADP*ADP/KE_AK)/(1 + ATP*AMP/KMf_AK + ADP*ADP/KMb_AK);
  OXYT: $O2e -> O2; kf_OXYT*O2e - kf_OXYT/KE_OXYT*O2;
end
