// SBML level 2 version 4

model MODEL1504080006()
  // Costa2015 - Central metabolism of E. coli, extended regulated linlog model ( with additional allosteric regulations than the Model1)
  // biomodels.db:MODEL1504080006

  // Compartments:
  compartment default = 1 volume;
  compartment extracellular in default = 65 volume;
  compartment cytosol in extracellular = 1 volume;

  // Species:
  species cpep in cytosol = 2.67; cpep is "Phosphoenol pyruvate";
  species cglcex in extracellular = 0.0556; cglcex is "Extracellular Glucose";
  species cg6p in cytosol = 3.48; cg6p is "Glucose-6-Phosphate";
  species cpyr in cytosol = 2.67; cpyr is "Pyruvate";
  species cf6p in cytosol = 0.6; cf6p is "Fructose-6-Phosphate";
  species cg1p in cytosol = 0.653; cg1p is "Glucose-1-Phosphate";
  species cpg in cytosol = 0.808; cpg is "6-Phosphogluconate";
  species cfdp in cytosol = 0.272; cfdp is "Fructose-1,6-bisphosphate";
  species csed7p in cytosol = 0.276; csed7p is "sedoheptulose-7-phosphate";
  species cgap in cytosol = 0.218; cgap is "Glyceraldehyde-3-Phosphate";
  species ce4p in cytosol = 0.098; ce4p is "Erythrose-4-phosphate";
  species cxyl5p in cytosol = 0.138; cxyl5p is "Xylulose-5-phosphate";
  species crib5p in cytosol = 0.398; crib5p is "Ribose-5-phosphate";
  species cdhap in cytosol = 0.167; cdhap is "Dihydroxyacetonephosphate";
  species cpgp in cytosol = 0.008; cpgp is "1,3-diphosphosphoglycerate";
  species cpg3 in cytosol = 2.13; cpg3 is "3-Phosphoglycerate";
  species cpg2 in cytosol = 0.399; cpg2 is "2-Phosphoglycerate";
  species cribu5p in cytosol = 0.111; cribu5p is "Ribulose-5-phosphate";
  species $s1 in default = 1/default;
  species $s2 in default = 1/default;
  species $s3 in default = 1/default;
  species $s4 in default = 1/default;
  species $s5 in default = 1/default;
  species $s6 in default = 1/default;
  species $s7 in default = 1/default;
  species $s8 in default = 1/default;
  species $s9 in default = 1/default;
  species $s10 in default = 1/default;
  species $s11 in default = 1/default;
  species $s12 in default = 1/default;
  species $s13 in default = 1/default;
  species $s14 in default = 1/default;
  species $s15 in default = 1/default;
  species $s16 in default = 1/default;
  species $s17 in default = 1/default;
  species $s18 in default = 1/default;
  species $s19 in default = 1/default;
  species $s20 in default = 1/default;
  species $s21 in default = 1/default;
  species $s22 in default = 1/default;
  species $s23 in default = 1/default;
  species $s24 in default = 1/default;
  species $s25 in default = 1/default;
  species $s26 in default = 1/default;
  species $s27 in default = 1/default;
  species $s28 in default = 1/default;
  species $s29 in default = 1/default;
  species $s30 in default = 1/default;

  // Parameters:
  catp = 4.27;
  cadp = 0.595;
  camp = 0.955;
  cnadp = 0.195;
  cnadph = 0.062;
  cnad = 1.47;
  cnadh = 0.1;
  c0_pep = 2.67 mM;
  c0_glcex = 0.0556 mM;
  c0_g6p = 3.48 mM;
  c0_pyr = 2.67 substance;
  c0_f6p = 0.6 substance;
  c0_g1p = 0.653 substance;
  c0_pg = 0.808 substance;
  c0_fdp = 0.272 substance;
  c0_sed7p = 0.276 mM;
  c0_gap = 0.218 mM;
  c0_e4p = 0.098 mM;
  c0_xyl5p = 0.138 mM;
  c0_dhap = 0.167 mM;
  c0_rib5p = 0.398 substance;
  c0_pgp = 0.008 mM;
  c0_pg3 = 2.13 substance;
  c0_pg2 = 0.399 substance;
  c0_ribu5p = 0.111 mM;

  // Reactions:
  vPTS: cglcex + cpep => cg6p + cpyr; extracellular*0.0031*(1 + a_PTS*ln(cg6p/c0_g6p) + b_PTS*ln(cglcex/c0_glcex) + c_PTS*ln(cpyr/c0_pyr) + d_PTS*ln(cpep/c0_pep)); vPTS is "Phosphotransferase system";
    a_PTS = -3.6 dimensionless; b_PTS = 1 dimensionless; c_PTS = -1 dimensionless; d_PTS = 1 dimensionless;
  vPGI: cg6p -> cf6p; cytosol*r0_PGI*(1 + a_PGI*ln(cg6p/c0_g6p) + b_PGI*ln(cf6p/c0_f6p) + inh_c_PGI*ln(cpg/c0_pg)); vPGI is "Glucose-6-phosphate isomerase";  // modifiers: cpg
    a_PGI = 1998.3 dimensionless; b_PGI = -1997.5 dimensionless; inh_c_PGI = -0.55 dimensionless; r0_PGI = 0.0585 mM_per_second;
  vPGM: cg6p -> cg1p; cytosol*r0_PGM*(1 + a_PGM*ln(cg6p/c0_g6p) + b_PGM*ln(cg1p/c0_g1p)); vPGM is "Phosphoglucomutase";
    a_PGM = 22.92 dimensionless; b_PGM = -22.9 dimensionless; r0_PGM = 0.00234 mM_per_second;
  vG6PDH: cg6p => cpg; cytosol*r0_G6PDH*(1 + a_G6PDH*ln(cg6p/c0_g6p) + b_G6PDH*ln(cnadp/0.195) + inh_c_G6PDH*ln(cnadph/0.062)); vG6PDH is "Glucose-6-phosphate dehydrogenase";
    a_G6PDH = 0.81 dimensionless; b_G6PDH = 0.48 dimensionless; inh_c_G6PDH = -0.42 dimensionless; r0_G6PDH = 0.139 mM_per_second;
  vPFK: cf6p => cfdp; cytosol*r0_PFK*(1 + a_PFK*ln(cf6p/c0_f6p) + b_PFK*ln(catp/4.27) + inh_c_PFK*ln(cpep/c0_pep) + act_d_PFK*ln(cadp/0.595) + act_e_PFK*ln(camp/0.955) + act_f_PFK*ln(cf6p/c0_f6p) + inh_g_PFK*ln(cfdp/c0_fdp)); vPFK is "Phosphofructokinase";  // modifiers: cpep
    a_PFK = 5.66 dimensionless; b_PFK = 0.032 dimensionless; inh_c_PFK = -2.04 dimensionless; act_d_PFK = -0.36 dimensionless; act_e_PFK = -0.48 dimensionless; act_f_PFK = 1 dimensionless; inh_g_PFK = -1 dimensionless; r0_PFK = 0.141 mM_per_second;
  vTA: cgap + csed7p -> cf6p + ce4p; cytosol*r0_TA*(1 + a_TA*ln(cgap/c0_gap) + b_TA*ln(csed7p/c0_sed7p) + c_TA*ln(cf6p/c0_f6p) + d_TA*ln(ce4p/c0_e4p)); vTA is "Transaldolase";
    a_TA = 14.45 dimensionless; b_TA = 14.45 dimensionless; c_TA = -13.45 dimensionless; d_TA = -13.45 dimensionless; r0_TA = 0.0453 mM_per_second;
  vTKA: crib5p + cxyl5p -> cgap + csed7p; cytosol*r0_TKA*(1 + a_TKA*ln(crib5p/c0_rib5p) + b_TKA*ln(cxyl5p/c0_xyl5p) + c_TKA*ln(csed7p/c0_sed7p) + d_TKA*ln(cgap/c0_gap)); vTKA is "Transketolase a";
    a_TKA = 11.49 dimensionless; b_TKA = 11.49 dimensionless; c_TKA = -10.49 dimensionless; d_TKA = -10.49 dimensionless; r0_TKA = 0.0453 mM_per_second;
  vTKB: ce4p + cxyl5p -> cgap + cf6p; cytosol*r0_TKB*(1 + a_TKB*ln(cxyl5p/c0_xyl5p) + b_TKB*ln(ce4p/c0_e4p) + c_TKB*ln(cf6p/c0_f6p) + d_TKB*ln(cgap/c0_gap)); vTKB is "Transketolase b";
    a_TKB = 30.53 dimensionless; b_TKB = 30.53 dimensionless; c_TKB = -29.53 dimensionless; d_TKB = -29.53 dimensionless; r0_TKB = 0.0384 mM_per_second;
  vMURSyNTH: 2 cf6p => $s1; cytosol*rmaxMurSynth; vMURSyNTH is "Mureine synthesis";
    rmaxMurSynth = 0.00043711 mM_per_second;
  vALDO: cfdp -> cdhap + cgap; cytosol*r0_ALDO*(1 + a_ALDO*ln(cfdp/c0_fdp) + b_ALDO*ln(cgap/c0_gap) + c_ALDO*ln(cdhap/c0_dhap)); vALDO is "Aldolase";
    a_ALDO = 14.05 dimensionless; b_ALDO = -13.3 dimensionless; c_ALDO = -13.28 dimensionless; r0_ALDO = 0.141 mM_per_second;
  vGAPDH: cgap -> cpgp; cytosol*r0_GAPDH*(1 + a_GAPDH*ln(cgap/c0_gap) + b_GAPDH*ln(cnad/1.47) + c_GAPDH*ln(cpgp/c0_pgp) + d_GAPDH*ln(cnadh/0.1)); vGAPDH is "Glyceraldehyde-3-phosphate dehydrogenase";
    a_GAPDH = 1 dimensionless; b_GAPDH = 0.16 dimensionless; c_GAPDH = -1 dimensionless; d_GAPDH = -0.017 dimensionless; r0_GAPDH = 0.321 mM_per_second;
  vTIS: cdhap -> cgap; cytosol*r0_TIS*(1 + a_TIS*ln(cdhap/c0_dhap) + b_TIS*ln(cgap/c0_gap)); vTIS is "Triosephosphate isomerase";
    a_TIS = 16.4 dimensionless; b_TIS = -15.84 dimensionless; r0_TIS = 0.14 mM_per_second;
  vTRPSYNTH: $s2 => cpyr + cgap; cytosol*rmaxTrpSynth; vTRPSYNTH is "Tryptophan synthesis";
    rmaxTrpSynth = 0.001037 mM_per_second;
  vG3PDH: cdhap => $s3; cytosol*r0_G3PDH*(1 + a_G3PDH*ln(cdhap/c0_dhap)); vG3PDH is "Glycerol-3-phosphate dehydrogenase";
    a_G3PDH = 0.86 dimensionless; r0_G3PDH = 0.00167 mM_per_second;
  vPGK: cpgp -> cpg3; cytosol*r0_PGK*(1 + a_PGK*ln(cpgp/c0_pgp) + b_PGK*ln(cadp/0.595) + c_PGK*ln(cpg3/c0_pg3) + d_PGK*ln(catp/4.27)); vPGK is "Phosphoglycerate kinase";
    a_PGK = 84.89 dimensionless; b_PGK = 81.44 dimensionless; c_PGK = -81.54 dimensionless; d_PGK = -84.71 dimensionless; r0_PGK = 0.321 mM_per_second;
  vsersynth: cpg3 => $s4; cytosol*r0_SerSynth*(1 + a_SerSynth*ln(cpg3/c0_pg3)); vsersynth is "Serine synthesis";
    a_SerSynth = 0.32 dimensionless; r0_SerSynth = 0.0175 mM_per_second;
  vrpGluMu: cpg3 -> cpg2; cytosol*r0_PgluMu*(1 + a_PgluMu*ln(cpg3/c0_pg3) + b_PGlMu*ln(cpg2/c0_pg2)); vrpGluMu is "Phosphoglycerate mutase";
    a_PgluMu = 245.09 dimensionless; b_PGlMu = -245.01 dimensionless; r0_PgluMu = 0.303 mM_per_second;
  vENO: cpg2 -> cpep; cytosol*r0_ENO*(1 + a_ENO*ln(cpg2/c0_pg2) + b_ENO*ln(cpep/c0_pep)); vENO is "Enolase";
    a_ENO = 175.57 dimensionless; b_ENO = -175.53 dimensionless; r0_ENO = 0.303 mM_per_second;
  vPK: cpep => cpyr; cytosol*r0_PK*(1 + a_PK*ln(cpep/c0_pep) + act_b_PK*ln(cfdp/c0_fdp) + c_PK*ln(cadp/0.595) + act_d_PK*ln(camp/0.955) + inh_e_PK*ln(catp/4.27) + act_g_PK*ln(cpep/c0_pep)); vPK is "Pyruvate kinase";  // modifiers: cfdp
    a_PK = 0.1 dimensionless; c_PK = 0.3 dimensionless; act_b_PK = 6.91e-5 dimensionless; act_d_PK = 0.00023 dimensionless; inh_e_PK = -5.56e-5 dimensionless; act_g_PK = 1 dimensionless; r0_PK = 0.0381 mM_per_second;
  vpepCxylase: cpep => $s5; cytosol*r0_PEPCxylase*(1 + a_PEPCxylase*ln(cpep/c0_pep) + act_b_PEPCxylase*ln(cfdp/c0_fdp)); vpepCxylase is "PEP carboxylase";  // modifiers: cfdp
    a_PEPCxylase = 0.6 dimensionless; act_b_PEPCxylase = 0.078 dimensionless; r0_PEPCxylase = 0.0432 mM_per_second;
  vSynth1: cpep => $s6; cytosol*r0_Synth1*(1 + a_Synth1*ln(cpep/c0_pep)); vSynth1 is "Synthesis 1";
    a_Synth1 = 0.27 dimensionless; r0_Synth1 = 0.0142 mM_per_second;
  vSynth2: cpyr => $s7; cytosol*r0_Synth2*(1 + a_Synth2*ln(cpyr/c0_pyr)); vSynth2 is "Synthesis 2";
    a_Synth2 = 0.27 dimensionless; r0_Synth2 = 0.0536 mM_per_second;
  vDAHPS: ce4p + cpep => $s8; cytosol*r0_DAHPS*(1 + a_DAHPS*ln(ce4p/c0_e4p) + b_DAHPS*ln(cpep/c0_pep)); vDAHPS is "DAHP synthesis";
    a_DAHPS = 2.43 dimensionless; b_DAHPS = 0.0013 dimensionless; r0_DAHPS = 0.0069 mM_per_second;
  vPDH: cpyr => $s9; cytosol*r0_PDH*(1 + a_PDH*ln(cpyr/c0_pyr)); vPDH is "Pyruvate dehydrogenase";
    a_PDH = 3.56 dimensionless; r0_PDH = 0.188 mM_per_second;
  vMethSynth: $s10 => cpyr; cytosol*rmaxMetSynth; vMethSynth is "Methionine synthesis";
    rmaxMetSynth = 0.0022627 mM_per_second;
  vPGDH: cpg => cribu5p; cytosol*r0_PGDH*(1 + a_PGDH*ln(cpg/c0_pg) + b_PGDH*ln(cnadp/0.195) + inh_c_PGDH*ln(catp/4.27) + inh_d_PGDH*ln(cnadph/0.062) + inh_f_PGDH*ln(cfdp/c0_fdp)); vPGDH is "6-Phosphogluconate dehydrogenase";  // modifiers: cfdp
    a_PGDH = 0.98 dimensionless; b_PGDH = 0.59 dimensionless; inh_c_PGDH = -0.012 dimensionless; inh_d_PGDH = -0.48 dimensionless; inh_f_PGDH = -1 dimensionless; r0_PGDH = 0.14 mM_per_second;
  vR5PI: cribu5p -> crib5p; cytosol*r0_R5PI*(1 + a_R5PI*ln(cribu5p/c0_ribu5p) + b_R5PI*ln(crib5p/c0_rib5p)); vR5PI is "Ribose-phosphate isomerase";
    a_R5PI = 9.66 dimensionless; b_R5PI = -8.66 dimensionless; r0_R5PI = 0.0557 mM_per_second;
  vRu5P: cribu5p -> cxyl5p; cytosol*r0_Ru5P*(1 + a_Ru5P*ln(cribu5p/c0_ribu5p) + b_Ru5P*ln(cxyl5p/c0_xyl5p)); vRu5P is "Ribulose-phosphate epimerase";
    a_Ru5P = 8.94 dimensionless; b_Ru5P = -7.94 dimensionless; r0_Ru5P = 0.0838 mM_per_second;
  vPPK: crib5p => $s11; cytosol*r0_PPK*(1 + a_PPK*ln(crib5p/c0_rib5p)); vPPK is "Ribose phosphate pyrophosphokinase";
    a_PPK = 0.2 dimensionless; r0_PPK = 0.0103 mM_per_second;
  vG1PAT: cg1p => $s12; cytosol*r0_G1PAT*(1 + a_G1PAT*ln(cg1p/c0_g1p) + b_G1PAT*ln(catp/4.27) + act_c_G1PAT*ln(cfdp/c0_fdp)); vG1PAT is "Glucose-1-phosphate adenyltransferase";  // modifiers: cfdp
    a_G1PAT = 0.83 dimensionless; b_G1PAT = 0.88 dimensionless; act_c_G1PAT = 0.51 dimensionless; r0_G1PAT = 0.00232 mM_per_second;
  vG6P: cg6p => $s13; cytosol*vG6P_mu*cg6p; vG6P is "G6P degradation";
    vG6P_mu = 2.78e-5 second_inverse;
  vf6P: cf6p => $s14; cytosol*vf6P_mu*cf6p; vf6P is "F6P degradation";
    vf6P_mu = 2.78e-5 second_inverse;
  vfdP: cfdp => $s15; cytosol*vfdP_mu*cfdp; vfdP is "FDP degradation";
    vfdP_mu = 2.78e-5 second_inverse;
  vGAP: cgap => $s16; cytosol*vGAP_mu*cgap; vGAP is "GAP degradation";
    vGAP_mu = 2.78e-5 second_inverse;
  vDHAP: cdhap => $s17; cytosol*vDHAP_mu*cdhap; vDHAP is "DHAP degradation";
    vDHAP_mu = 2.78e-5 second_inverse;
  vPGP: cpgp => $s18; cytosol*vPGP_mu*cpgp; vPGP is "PGP degradation";
    vPGP_mu = 2.78e-5 second_inverse;
  vPG3: cpg3 => $s19; cytosol*vPG3_mu*cpg3; vPG3 is "PG3 degradation";
    vPG3_mu = 2.78e-5 second_inverse;
  vpg2: cpg2 => $s20; cytosol*vpg2_mu*cpg2; vpg2 is "PG2 degradation";
    vpg2_mu = 2.78e-5 second_inverse;
  vPEP: cpep => $s21; cytosol*vPEP_mu*cpep; vPEP is "PEP degradation";
    vPEP_mu = 2.78e-5 second_inverse;
  vRibu5p: cribu5p => $s22; cytosol*vRibu5p_mu*cribu5p; vRibu5p is "Ribu5P dilution";
    vRibu5p_mu = 2.78e-5 second_inverse;
  vRIB5P: crib5p => $s23; cytosol*vRIB5P_mu*crib5p; vRIB5P is "Rib5P dilution";
    vRIB5P_mu = 2.78e-5 second_inverse;
  vXYL5P: cxyl5p => $s24; cytosol*vXYL5P_mu*cxyl5p; vXYL5P is "XYL5P dilution";
    vXYL5P_mu = 2.78e-5 second_inverse;
  vSED7P: csed7p => $s25; cytosol*vSED7P_mu*csed7p; vSED7P is "SED7P dilution";
    vSED7P_mu = 2.78e-5 second_inverse;
  vpyr: cpyr => $s26; cytosol*vpyr_mu*cpyr; vpyr is "Pyruvate dilution";
    vpyr_mu = 2.78e-5 second_inverse;
  vPG: cpg => $s27; cytosol*vPG_mu*cpg; vPG is "PG dilution";
    vPG_mu = 2.78e-5 second_inverse;
  vE4P: ce4p => $s28; cytosol*vE4P_mu*ce4p; vE4P is "E4P dilution";
    vE4P_mu = 2.78e-5 second_inverse;
  vGLP: cg1p => $s29; cytosol*vGLP_mu*cg1p; vGLP is "GLP dilution";
    vGLP_mu = 2.78e-5 second_inverse;
  vEXTER: $s30 => cglcex; extracellular*Dil*(cfeed - cglcex); vEXTER is "Extracellular glucose kinetics";
    Dil = 2.78e-5 second_inverse; cfeed = 110.96 mM;

  // Unit definitions:
  unit substance = 1e-3 mole; substance is "millimole";
  unit mM = 1e-3 mole / litre; mM is "milli Molar";
  unit second_inverse = 1 / second;
  unit mM_per_second = 1e-3 mole / (litre * second);
  unit per_mM_per_second = litre / (1e-3 mole * second);
  unit volume = litre;
  unit area = metre^2;
  unit length = metre;
  unit time = second;
end
