// SBML level 2 version 4

function Constant_flux__irreversible(v)
  v;
end
Constant_flux__irreversible is "Constant flux (irreversible)";

function _1Product(t, P)
  t*P;
end

function Abeta_binding_and_removal(K, S1, S2)
  K*S1*S2;
end

function ApoE_death(S, M)
  S - M;
end

function ApoE_transport_to_brain_0(K1, K2, M1, K3, M2, P)
  (K1 + K2)/(M1 + (K1 + K2)/K3*M2)*M2*M1*P;
end

function Inhibition_1Mod(K1, K2, M, S)
  K1*(1/(1 + K2*M))*S;
end

model MODEL1504240000()
  // Kyrtsos2011 - A systems biology model for Alzheimer's disease (Cholesterol in AD)
  // Encoded non-curated model. Issues:
  // - Confusing HmgCoA differential equation
  // - Confusing d2 and t1 parameters
  // - Lack of initial values for several key species
  // This model is described in the article:
  // Of Mice and Math: A Systems Biology Model for Alzheimer's disease
  // Kyrtsos, Christina Rose
  // UMD Theses and Dissertations
  // Abstract:
  // Alzheimer's disease (AD) is the most prevalent neurodegenerative disorder in the US, affecting over 1 in 8 people over the age of 65. There are several well-known pathological changes in the brains of AD patients, namely: the presence of diffuse beta amyloid plaques derived from the amyloid precursor protein (APP), hyper-phosphorylated tau protein, neuroinflammation and mitochondrial dysfunction. Recent studies have shown that cholesterol levels in both the plasma and the brain may play a role in disease pathogenesis, however, this exact role is not well understood. Additional proteins of interest have also been identified (ApoE, LRP-1, IL-1) as possible contributors to AD pathogenesis. To help understand these roles better, a systems biology mathematical model was developed. Basic principles from graph theory and control analysis were used to study the effect of altered cholesterol, ApoE, LRP and APP on the system as a whole. Negative feedback regulation and the rate of cholesterol transfer between astrocytes and neurons were identified as key modulators in the level of beta amyloid. Experiments were run concurrently to test whether decreasing plasma and brain cholesterol levels with simvastatin altered the expression levels of beta amyloid, ApoE, and LRP-1, to ascertain the edge directions in the network model and to better understand whether statin treatment served as a viable treatment option for AD patients. The work completed herein represents the first attempt to create a systems-level mathematical model to study AD that looks at intercellular interactions, as well as interactions between metabolic and inflammatory pathways.
  // This model is hosted on BioModels Database and identified by: MODEL1504240000.
  // To cite BioModels Database, please use: BioModels Database: An enhanced, curated and annotated resource for published quantitative kinetic models.
  // To the extent possible under law, all copyright and related or neighbouring rights to this encoded model have been dedicated to the public domain worldwide. Please refer to CC0 Public Domain Dedication for more information.
  // biomodels.db:MODEL1504240000
  // isVersionOf GO:1990000 GO:0070723
  // hasProperty DOID:10652
  // hasTaxon taxonomy:9606 taxonomy:10090

  // Compartments:
  compartment Brain = 1;  // BTO:0000142

  // Species:
  // Pyruvate
  species Pyruvate in Brain = 1;  // CHEBI:15361
  // Pyruvate dehydrogenase
  species PDH in Brain = 1;  // uniprot:O00330
  // Citric Acid Cycle
  species TCA in Brain = 1;  // GO:0006099
  // 3-hydroxy-3-methylglutaryl-coenzyme A
  species HmgCoA in Brain = 500;  // CHEBI:11814
  // MalonylCoA
  species MalonylCoA in Brain = 1;  // CHEBI:15531
  // Mevalonate
  species Mevalonate in Brain = 1;  // CHEBI:25350
  // Neuronal Cholesterol
  species Cholesterol_N in Brain = 500;  // isVersionOf CHEBI:16113
  // Astrocytic cholesterol bound Apolipoprotein E
  species ApoE_A in Brain = 750;  // hasPart CHEBI:16113 uniprot:P02649
  // Low density lipoprotein receptor-related protein
  species $LRP_1 in Brain = 1; LRP_1 is "LRP-1";  // uniprot:Q07954
  // Amyloid precursor protein
  species APP in Brain = 1000;  // isVersionOf uniprot:P05067
  // Beta-secretase 1
  species BACE in Brain = 1;  // uniprot:P56817
  // Soluble Amyloid precursor protein
  species sAPP in Brain = 1;  // isVersionOf uniprot:P05067
  // Gamma secretase
  species gamma_secretase in Brain = 1;  // uniprot:Q9NZ42
  // Beta amyloid
  species Abeta in Brain = 800;  // isVersionOf uniprot:P05067
  // C-terminal fragment
  species CTF in Brain = 1;  // CHEBI:33711
  // APP intracellullar domain
  species AICD in Brain = 1;  // isVersionOf uniprot:P05067
  // AcetylCoA
  species AcetylCoA in Brain = 10000;  // CHEBI:15351
  // Astrocytic Cholesterol
  species Cholesterol_A in Brain = 1500;  // CHEBI:16113
  // Free Apolipoprotein E
  species ApoE in Brain = 2000;  // uniprot:P02649

  // Parameters:
  k1 = 0.9;
  k2 = 0.05;
  k3 = 0.05;
  k4 = 1;
  k5 = 1;
  k6 = 1;
  k7 = 0.8;
  a1 = 0.9;
  b1 = 1;
  bn = 2000;
  ba = 750;
  d1 = 0.8;
  d2 = 0.00055;
  d3 = 0.8336;
  d4 = 8000;
  d5 = 1;
  d6 = 0.9;
  t1 = 0.99945;
  t2 = 0.5;
  kf1 = 0.005;
  kf2 = 0.001;
  kf3 = 0.005;
  alpha = 0.001;
  beta = 0.01;
  gamma = 0.8;
  endo = 0.25;
  kt = 0.00025;

  // Reactions:
  AcetylCoA_synthesis: Pyruvate + PDH => AcetylCoA; Brain*Inhibition_1Mod(k1, alpha, Abeta, Pyruvate);  // modifiers: Abeta
  HmgCoA_synthesis: AcetylCoA => HmgCoA; Brain*k2*AcetylCoA;
  TCA_input: AcetylCoA => TCA; Brain*a1*AcetylCoA;
  Mevalonate_synthesis: HmgCoA => Mevalonate; Brain*Inhibition_1Mod(k4, gamma, Cholesterol_N, HmgCoA);  // modifiers: Cholesterol_N
  HmgCoA_output: HmgCoA => ; Brain*d6*HmgCoA;
  CholesterolA_synthesis: Mevalonate => Cholesterol_A; Brain*k5*Mevalonate;
  CholesterolA_transport: Cholesterol_A + ApoE_A => ApoE + Cholesterol_N; Brain*_1Product(t1, ApoE);
  CholesterolA_degradation: Cholesterol_A => ; Brain*d2*Cholesterol_A;
  ApoE_A_generation: => ApoE_A; Brain*Constant_flux__irreversible(ba);
  ApoE_A_death: ApoE_A => ; Brain*ApoE_death(ApoE_A, Cholesterol_A);  // modifiers: Cholesterol_A
  CholesterolN_degradation: Cholesterol_N => ; Brain*d2*Cholesterol_N;
  ApoE_generation: => ApoE; Brain*Constant_flux__irreversible(bn);
  ApoE_transport_from_brain: Abeta + ApoE => ; Brain*Abeta_binding_and_removal(kf1, Abeta, ApoE);
  ApoE_transport_to_brain: => ApoE; Brain*ApoE_transport_to_brain_0(kf2, kf3, Abeta, kf1, LRP_1, ApoE);  // modifiers: Abeta, LRP_1
  ApoE_degradation: ApoE => ; Brain*d5*ApoE;
  APP_generation: => APP; Brain*_1Product(b1, APP);
  APP_degradation: APP => ; Brain*d3*APP;
  sAPP_generation: APP => sAPP; Brain*Inhibition_1Mod(k6, beta, Cholesterol_N, APP);  // modifiers: Cholesterol_N
  Abeta_generation: sAPP => Abeta; Brain*k7*sAPP;
  Abeta_degadation_by_endocytosis: Abeta => ; Brain*endo*Abeta;
  Abeta_removal: Abeta + $LRP_1 => ; Brain*Abeta_binding_and_removal(kt, Abeta, LRP_1);

  // Unit definitions:
  unit volume = 1e-3 litre;
  unit time = 86400 second;
  unit substance = dimensionless;
end
