// SBML level 2 version 4

function v_3(kcat, Enz, Sub, km1, I, km2, I2, km3)
  kcat*Enz*Sub/km1/(1 + Sub/km1 + I/km2 + I2/km3);
end

function MM(k, Mod, K)
  k*Mod/(Mod + K);
end

function v_5(kcat, Enz, Sub, K)
  kcat*Enz*Sub/(Sub + K);
end

function v_2(kcat, Enz, Sub, km1, I, km2)
  kcat*Enz*Sub/km1/(1 + Sub/km1 + I/km2);
end

function v_4(kcat, Enz, Sub, km1, I, km2, I2, km3)
  kcat*Enz*Sub/km1/(1 + Sub/km1 + I/km2 + I2/km3);
end

function v_1(kcat, Enz, Sub, km1, I, km2)
  kcat*Enz*Sub/km1/(1 + Sub/km1 + I/km2);
end

model MODEL1509050002()
  // Perrett2014 - GnRH pulse, ERK activity
  // biomodels.db:MODEL1509050002

  // Compartments:
  compartment nucleus = C;
  compartment cytoplasm = 1;

  // Species:
  substanceOnly species ERK_n in nucleus = 0;
  substanceOnly species ppERK_n in nucleus = 0;
  substanceOnly species TF1 in nucleus = 0;
  substanceOnly species TF1DT in nucleus = 0;
  substanceOnly species E in cytoplasm = 1;
  substanceOnly species ERK_c in cytoplasm = ERK_tot*cytoplasm;
  substanceOnly species GnRH in cytoplasm = 0;
  substanceOnly species GQ in cytoplasm = 1;
  substanceOnly species E_inact in cytoplasm = 0;
  substanceOnly species ppERK_c in cytoplasm = 0;
  substanceOnly species $HR_inact in cytoplasm;
  // Hormone receptors
  substanceOnly species HR in cytoplasm = R_0*cytoplasm;
  substanceOnly species $pERK_c in cytoplasm;
  substanceOnly species $MEK_act in cytoplasm;

  // Parameters:
  R_0 = 0.1;
  k1 = 500;
  k_1 = 5;
  k2 = 5;
  k_2 = 1;
  k3 = 5.5;
  k_3 = 0.05;
  k_exp_act = 0.75;
  k_exp = 0.75;
  k_imp_act = 0.4;
  k_imp = 0.2;
  k_MEK = 10;
  K_MM_MEK = 0.05;
  ERK_tot = 0.9;
  MEK_tot = 0.6;
  k_MEK_basal = 0;
  kcat_1 = 0.6;
  kcat_2 = 5;
  kcat_3 = 4;
  kcat_4 = 4;
  kcat_5 = 4;
  km_1 = 0.05;
  km_2 = 0.0339;
  km_3 = 0.022;
  km_4 = 0.018;
  km_5 = 0.0782;
  k_d_ppERK_n = 0.01;
  MKP_n = 0.05;
  MKP_c = 0.05;
  C = 3;
  d_TF1 = 0.023;
  K_MM_TF1 = 0.4;
  d_TF1DT = 0.05;
  k_TF1DT = 0.03;
  K_MM_TF1DT = 0.5;
  k_TF1 = 0.03;
  Initial_for_C = C;
  Initial_for_ERK_tot = ERK_tot;
  Initial_for_R_0 = R_0;

  // Assignment rules:
  HR_inact := (Initial_for_R_0 - HR/cytoplasm)*cytoplasm;
  pERK_c := ((1 + 1/Initial_for_C)*Initial_for_ERK_tot - ERK_c/cytoplasm - ppERK_c/cytoplasm - ERK_n/nucleus/Initial_for_C - ppERK_n/nucleus/Initial_for_C)*cytoplasm;
  MEK_act := k_MEK*MEK_tot*(E/cytoplasm)/(E/cytoplasm + K_MM_MEK)*cytoplasm;

  // Reactions:
  HR_activation: $HR_inact + GnRH => HR; k1*HR_inact*(GnRH/cytoplasm);
  HR_deactivation: HR => $HR_inact; k_1*HR;
  reaction_3: HR + GQ => E; k2*HR*(GQ/cytoplasm); reaction_3 is "formation of Effector (binding HR-GQ)";
  unbinding_of_Effector_HR_GQ: E => HR + GQ; k_2*E; unbinding_of_Effector_HR_GQ is "unbinding of Effector (HR-GQ)";
  inactivation_of_effector_neg_FB: E + ppERK_c => E_inact; k3*E*(ppERK_c/cytoplasm); inactivation_of_effector_neg_FB is "inactivation of effector (neg FB)";
  unbinding_of_inactive_effector: E_inact => HR + GQ + ppERK_c; k_3*E_inact;
  TF1_degradation: TF1 => ; d_TF1*TF1;
  TF1DT_degradation: TF1DT => ; d_TF1DT*TF1DT;
  TF1_production: => TF1; nucleus*MM(k_TF1, ppERK_n/nucleus, K_MM_TF1);  // modifiers: ppERK_n
  TF1DT_production: => TF1DT; nucleus*MM(k_TF1DT, TF1/nucleus, K_MM_TF1DT);  // modifiers: TF1
  ppERK_nuclear_import: ppERK_c => ppERK_n; k_imp_act*(ppERK_c/cytoplasm);
  ppERK_nuclear_export: ppERK_n => ppERK_c; k_exp_act*(ppERK_n/nucleus);
  ERK_nuclear_export: ERK_n => ERK_c; k_exp*(ERK_n/nucleus);
  ERK_nuclear_import: ERK_c => ERK_n; k_imp*(ERK_c/cytoplasm);
  ERK_phosphorylation_cytoplasm: ERK_c => ; cytoplasm*v_1(kcat_1, MEK_act/cytoplasm, ERK_c/cytoplasm, km_1, pERK_c/cytoplasm, km_2); ERK_phosphorylation_cytoplasm is "ERK phosphorylation (cytoplasm)";  // modifiers: MEK_act, pERK_c
  reaction_16: => ERK_c; cytoplasm*v_4(kcat_4, MKP_c, pERK_c/cytoplasm, km_4, ERK_c/cytoplasm, km_5, ppERK_c/cytoplasm, km_3); reaction_16 is "pERK de-phosphorylation (cytoplasm)";  // modifiers: pERK_c, ppERK_c
  ppERK_de_phosphorylation_nucleus: ppERK_n => ERK_n; nucleus*v_5(kcat_5, MKP_n, ppERK_n/nucleus, k_d_ppERK_n); ppERK_de_phosphorylation_nucleus is "ppERK de-phosphorylation (nucleus)";
  reaction_18: ppERK_c => ; cytoplasm*v_3(kcat_3, MKP_c, ppERK_c/cytoplasm, km_3, ERK_c/cytoplasm, km_5, pERK_c/cytoplasm, km_4); reaction_18 is "ppERK de-phosphorylation (cytoplasm)";  // modifiers: ERK_c, pERK_c
  pERK_phosphorylation_cytoplasm: => ppERK_c; cytoplasm*v_2(kcat_2, MEK_act/cytoplasm, pERK_c/cytoplasm, km_2, ERK_c/cytoplasm, km_1); pERK_phosphorylation_cytoplasm is "pERK phosphorylation (cytoplasm)";  // modifiers: MEK_act, pERK_c, ERK_c

  // Unit definitions:
  unit time = 60 second;
  unit substance = 1e-6 mole;
end
