// SBML level 2 version 4

function Constant_flux__irreversible(v)
  v;
end
Constant_flux__irreversible is "Constant flux (irreversible)";

model MODEL1511170002()
  // LlorénsRico2016 - Effects of cis-Encoded antisense RNAs (asRNAs) - Case3
  // Three putative effects of the asRNAs were considered in this study: in case 1, the binding of the asRNA to the corresponding mRNA induces degradation of the duplex. In case 2, the binding of the asRNA to the mRNA induces degradation of the mRNA, but not of the asRNA. In case 3 (this model), the mRNA and the asRNA bind reversibly to form a stable duplex, preventing translation of the mRNA. In all the three cases, binding to the ribosome protects the mRNA from the effect of the asRNA.
  // This model is described in the article:
  // Bacterial antisense RNAs are mainly the product of transcriptional noise.
  // Lloréns-Rico V, Cano J, Kamminga T, Gil R, Latorre A, Chen WH, Bork P, Glass JI, Serrano L, Lluch-Senar M.
  // Sci Adv 2016 Mar; 2(3): e1501363
  // Abstract:
  // cis-Encoded antisense RNAs (asRNAs) are widespread along bacterial transcriptomes. However, the role of most of these RNAs remains unknown, and there is an ongoing discussion as to what extent these transcripts are the result of transcriptional noise. We show, by comparative transcriptomics of 20 bacterial species and one chloroplast, that the number of asRNAs is exponentially dependent on the genomic AT content and that expression of asRNA at low levels exerts little impact in terms of energy consumption. A transcription model simulating mRNA and asRNA production indicates that the asRNA regulatory effect is only observed above certain expression thresholds, substantially higher than physiological transcript levels. These predictions were verified experimentally by overexpressing nine different asRNAs in Mycoplasma pneumoniae. Our results suggest that most of the antisense transcripts found in bacteria are the consequence of transcriptional noise, arising at spurious promoters throughout the genome.
  // This model is hosted on BioModels Database and identified by: MODEL1511170002.
  // To cite BioModels Database, please use: BioModels Database: An enhanced, curated and annotated resource for published quantitative kinetic models.
  // To the extent possible under law, all copyright and related or neighbouring rights to this encoded model have been dedicated to the public domain worldwide. Please refer to CC0 Public Domain Dedication for more information.
  // biomodels.db:MODEL1511170002

  // Compartments:
  compartment Myco_cell = 5.5e-17; Myco_cell is "Mycoplasma pneumoniae cell";

  // Species:
  species mrna in Myco_cell = 3.110236e-9;
  species asrna in Myco_cell = 1.70073e-9;
  species protein in Myco_cell = 5.045208e-6;
  species rib in Myco_cell = 6.038112e-6;
  species mrnarib in Myco_cell = 2.110579e-10;
  species duplex in Myco_cell = 0;

  // Reactions:
  transcription_mrna: => mrna; Myco_cell*Constant_flux__irreversible(transcription_mrna_v);
    transcription_mrna_v = 3.95e-10;
  transcription_asrna: => asrna; Myco_cell*Constant_flux__irreversible(transcription_asrna_v);
    transcription_asrna_v = 2.33e-10;
  translation_protein: mrnarib => mrna + protein + rib; Myco_cell*translation_protein_k1*mrnarib;
    translation_protein_k1 = 1.2;
  degradation_mrna: mrna => ; Myco_cell*degradation_mrna_k1*mrna;
    degradation_mrna_k1 = 0.127;
  degradation_asrna: asrna => ; Myco_cell*degradation_asrna_k1*asrna;
    degradation_asrna_k1 = 0.137;
  degradation_protein: protein => ; Myco_cell*degradation_protein_k1*protein;
    degradation_protein_k1 = 5.02e-5;
  mrna_ribosome_binding: mrna + rib => mrnarib; Myco_cell*mrna_ribosome_binding_k1*mrna*rib;
    mrna_ribosome_binding_k1 = 13486.16;
  duplex_formation: asrna + mrna -> duplex; Myco_cell*(duplex_formation_k1*asrna*mrna - k2*duplex);
    duplex_formation_k1 = 60000000; k2 = 0.84;
  duplex_degradation: duplex => ; Myco_cell*duplex_degradation_k1*duplex;
    duplex_degradation_k1 = 0.06;

  // Unit definitions:
  unit time = 60 second;
end
