// SBML level 2 version 4

model MODEL1601140000()
  // Robinson2016 - Nitric Oxide Stress in Enterohemorrhagic Escherichia coli
  // biomodels.db:MODEL1601140000

  // Compartments:
  compartment media = 9.998224 MWBUILTINPREFIX_milli_MWBUILTINUNIT_liter;
  compartment cell = 0.001776 MWBUILTINPREFIX_milli_MWBUILTINUNIT_liter;

  // Species:
  // oxygen (extracellular)
  species o2_media in media = 0.05;  // substance in mole
  // nitric oxide (extracellular)
  species no_media in media = 0;  // substance in mole
  // nitrite (extracellular)
  species no2_media in media = 0;  // substance in mole
  // nitrate (extracellular)
  species no3_media in media = 0;  // substance in mole
  // nitrogen dioxide radical (extracellular)
  species no2r_media in media = 0;  // substance in mole
  // nitrous anhydride (extracellular)
  species n2o3_media in media = 0;  // substance in mole
  // dinitrogen tetroxide (extracellular)
  species n2o4_media in media = 0;  // substance in mole
  species nonoate in media = 0.05;  // substance in mole
  // oxygen (extracellular, in equilibrium with air)
  species $o2_air in media = 0.05;  // substance in mole
  // water (extracellular)
  species $h2o_media in media = 0;  // substance in mole
  // proton (extracellular)
  species $h_media in media = 0;  // substance in mole
  // null species used for balancing reactions (extracellular)
  species $NULL_media in media = 0.001;  // substance in mole
  // adenosine triphosphate
  species $atp in cell = 9.6;  // substance in mole
  // adenosine diphosphate
  species $adp in cell = 0.56;  // substance in mole
  // adenosine monophosphate
  species $amp in cell = 0.28;  // substance in mole
  // L-alanine
  species ala in cell = 2.6;  // substance in mole
  // carbon dioxide
  species co2 in cell = 1.2;  // substance in mole
  // carbonate radical
  species co3r in cell = 0;  // substance in mole
  // carbonate anion
  species co3 in cell = 0.0048;  // substance in mole
  // bicarbonate
  species hco3 in cell = 10;  // substance in mole
  // carbonic acid
  species h2co3 in cell = 0;  // substance in mole
  // cytochrome bd-I
  species cytbd in cell = 0.001037356;  // substance in mole
  species cytbd_no in cell = 0;  // substance in mole
  // cytochrome bo
  species cytbo in cell = 0.001330663;  // substance in mole
  species cytbo_no in cell = 0;  // substance in mole
  // L-cysteine
  species $cys in cell = 0.0985;  // substance in mole
  // L-cysteinyl radical
  species cysr in cell = 0;  // substance in mole
  // S-nitrosocysteine
  species cysno in cell = 0;  // substance in mole
  // deoxyadenosine triphosphate
  species $datp in cell = 0.181;  // substance in mole
  // deoxycytosine triphosphate
  species $dctp in cell = 0.184;  // substance in mole
  // deoxyguanosine triphosphate
  species $dgtp in cell = 0.092;  // substance in mole
  // DNA-bound deoxyadenosine
  species ds_dad_2 in cell = 11.94603;  // substance in mole
  // DNA-bound deoxyguanosine
  species ds_dgsn in cell = 12.32943;  // substance in mole
  // DNA AP site (missing adenine)
  species ds_APa in cell = 0;  // substance in mole
  // DNA AP site (missing cytosine)
  species ds_APc in cell = 0;  // substance in mole
  // DNA AP site (missing guanine)
  species ds_APg in cell = 0;  // substance in mole
  // DNA backbone single nucleoside gap (missing deoxyadenosine)
  species ds_gap_a in cell = 0;  // substance in mole
  // DNA backbone single nucleoside gap (missing deoxycytidine)
  species ds_gap_c in cell = 0;  // substance in mole
  // DNA backbone single nucleoside gap (missing deoxyguanosine)
  species ds_gap_g in cell = 0;  // substance in mole
  // DNA backbone nick (adjacent to deoxyadenosine)
  species ds_dad_2_nick in cell = 0;  // substance in mole
  // DNA backbone nick (adjacent to deoxycytidine)
  species ds_dcyt_nick in cell = 0;  // substance in mole
  // DNA backbone nick (adjacent to deoxyguanosine)
  species ds_dgsn_nick in cell = 0;  // substance in mole
  // DNA-bound deoxyinosine
  species ds_din in cell = 0;  // substance in mole
  // DNA-bound deoxyuridine
  species ds_duri in cell = 0;  // substance in mole
  // DNA-bound deoxyxanthosine
  species ds_dxtsn in cell = 0;  // substance in mole
  // hypoxanthine
  species hxan in cell = 0;  // substance in mole
  // uracil
  species ura in cell = 0;  // substance in mole
  // xanthine
  species xan in cell = 0;  // substance in mole
  // 2-deoxy-D-ribose 5-phosphate
  species dr5p in cell = 0.3;  // substance in mole
  // diphosphate
  species ppi in cell = 0;  // substance in mole
  // DNA glycosylase (inosine, xanthosine)
  species alka in cell = 1.038875e-6;  // substance in mole
  // DNA glycosylase (uridine)
  species ung in cell = 7.517571e-6;  // substance in mole
  // DNA exonuclease III
  species xth in cell = 3.466894e-6;  // substance in mole
  // DNA polymerase I
  species dnapol in cell = 0.00015;  // substance in mole
  // DNA ligase
  species dnalig in cell = 0.00015;  // substance in mole
  // glutathione (anion)
  species gsan in cell = 0.427;  // substance in mole
  // glutathionyl radical
  species gsr in cell = 0;  // substance in mole
  // reduced glutathione
  species gsh in cell = 17;  // substance in mole
  // GSH-HNO adduct
  species gsnhoh in cell = 0;  // substance in mole
  // S-nitrosoglutathione
  species gsno in cell = 0;  // substance in mole
  // S-nitroglutathione
  species gsno2 in cell = 0;  // substance in mole
  // glutathione sulfinyl radical
  species gsor in cell = 0;  // substance in mole
  // glutathione sulfenic acid
  species gsoh in cell = 0;  // substance in mole
  // glutathione peroxysulfenyl radical
  species gsoo in cell = 0;  // substance in mole
  // GSOONO2
  species gsoono2 in cell = 0;  // substance in mole
  // oxidized glutathione (disulfide)
  species gssg in cell = 2.4;  // substance in mole
  // oxidized glutathionyl radical
  species gssgr in cell = 0;  // substance in mole
  // glutathione reductase
  species gor in cell = 0.0012;  // substance in mole
  // glutathione-dependent formaldehyde dehydrogenase
  species gsfdh in cell = 0.003935331;  // substance in mole
  // nitric oxide dioxygenase (FAD, ferrous)
  species hmpFe2 in cell = 0;  // substance in mole
  // nitric oxide dioxygenase (FAD, ferric)
  species hmpFe3 in cell = 0.0008963982;  // substance in mole
  // nitric oxide dioxygenase (FADH, ferrous)
  species hmpFe2h in cell = 0;  // substance in mole
  // nitric oxide dioxygenase (FADH, ferric)
  species hmpFe3h in cell = 0;  // substance in mole
  // nitric oxide dioxygenase (FADH2, ferrous)
  species hmpFe2h2 in cell = 0;  // substance in mole
  // nitric oxide dioxygenase (FADH2, ferric)
  species hmpFe3h2 in cell = 0;  // substance in mole
  // nitric oxide dioxygenase (FAD, ferrous), O2-bound
  species hmpFe2_o2 in cell = 0;  // substance in mole
  species hmpFe2_no in cell = 0;  // substance in mole
  // nitric oxide dioxygenase (FAD, ferric), ONOO-bound
  species hmpFe3_onoo in cell = 0;  // substance in mole
  // nitric oxide dioxygenase (FADH, ferrous), O2-bound
  species hmpFe2h_o2 in cell = 0;  // substance in mole
  species hmpFe2h_no in cell = 0;  // substance in mole
  // nitric oxide dioxygenase (FADH, ferric), ONOO-bound
  species hmpFe3h_onoo in cell = 0;  // substance in mole
  // nitric oxide dioxygenase (FADH2, ferrous), O2-bound
  species hmpFe2h2_o2 in cell = 0;  // substance in mole
  species hmpFe2h2_no in cell = 0;  // substance in mole
  // nitric oxide dioxygenase (FADH2, ferric), ONOO-bound
  species hmpFe3h2_onoo in cell = 0;  // substance in mole
  // nitric oxide reductase (oxidized flavorubredoxin)
  species NorVox in cell = 0;  // substance in mole
  // nitric oxide reductase (reduced flavorubredoxin)
  species NorVred in cell = 0;  // substance in mole
  // cytochrome c nitrite reductase
  species NrfA in cell = 0;  // substance in mole
  // dinitrogen
  species n2 in cell = 0;  // substance in mole
  // nitrous oxide
  species n2o in cell = 0;  // substance in mole
  // hyponitrite radical
  species n2o2r in cell = 0;  // substance in mole
  // nitrous anhydride (intracellular)
  species n2o3_cell in cell = 0;  // substance in mole
  // dinitrogen tetroxide (intracellular)
  species n2o4_cell in cell = 0;  // substance in mole
  // nitrosyl hyponitrite anion
  species n3o3 in cell = 0;  // substance in mole
  // nicotinamide mononucleotide
  species $nmn in cell = 0;  // substance in mole
  // nicotinamide adenine dinucleotide (oxidized)
  species $nad in cell = 2.6;  // substance in mole
  // nicotinamide adenine dinucleotide (reduced)
  species $nadh in cell = 0.083;  // substance in mole
  // NAD phosphate (oxidized)
  species $nadp in cell = 0.0021;  // substance in mole
  // NAD phosphate (reduced)
  species $nadph in cell = 0.12;  // substance in mole
  // hydroxylamine
  species nh2oh in cell = 0;  // substance in mole
  // ammonia
  species nh3 in cell = 0;  // substance in mole
  // ammonium
  species nh4 in cell = 0;  // substance in mole
  // nitroxyl
  species hno in cell = 0;  // substance in mole
  // nitric oxide (intracellular)
  species no_cell in cell = 0;  // substance in mole
  // nitroxyl anion
  species noan in cell = 0;  // substance in mole
  // nitrite (intracellular)
  species no2_cell in cell = 0;  // substance in mole
  // nitrogen dioxide radical (intracellular)
  species no2r_cell in cell = 0;  // substance in mole
  // nitrate (intracellular)
  species no3_cell in cell = 0;  // substance in mole
  // peroxynitrate
  species o2noo in cell = 0;  // substance in mole
  // peroxynitrite
  species onoo in cell = 0;  // substance in mole
  // peroxynitrous acid
  species onooh in cell = 0;  // substance in mole
  // oxygen (intracellular)
  species o2_cell in cell = 0.05;  // substance in mole
  // superoxide
  species o2s in cell = 1e-7;  // substance in mole
  // hydroxyl radical
  species ohr in cell = 0;  // substance in mole
  // hydrogen peroxide
  species h2o2 in cell = 0;  // substance in mole
  // holo [2Fe-2S] protein
  species holo_protein_2fe2s in cell = 0.025;  // substance in mole
  // holo [4Fe-4S] protein
  species holo_protein_4fe4s in cell = 0.225;  // substance in mole
  // protein-bound dinitrosyl iron complex
  species protein_2fe2s_2dnic in cell = 0;  // substance in mole
  // protein-bound Roussin's red ester
  species protein_4fe4s_2rre in cell = 0;  // substance in mole
  // apo [2Fe-2S] protein
  species apo_protein_2fe2s in cell = 0;  // substance in mole
  // apo [4Fe-4S] protein
  species apo_protein_4fe4s in cell = 0;  // substance in mole
  // cysteine-bound dinitrosyl iron complex
  species cys_dnic in cell = 0;  // substance in mole
  // ferrous iron
  species $fe2 in cell = 0.01;  // substance in mole
  // elemental sulfur
  species s in cell = 0;  // substance in mole
  // sulfide
  species s2 in cell = 0;  // substance in mole
  // cysteine desulfurase
  species iscs in cell = 0.00137;  // substance in mole
  // [Fe-S] cluster assembly scaffold protein (dimer)
  species iscu in cell = 0.00077;  // substance in mole
  // 2S-loaded form of IscU
  species iscu_2s in cell = 0;  // substance in mole
  // [2Fe-2S]-loaded form of IscU
  species iscu_2fe2s in cell = 0;  // substance in mole
  // [2Fe-2S]-loaded form of IscU, with 2S on other monomer
  species iscu_2fe2s_2s in cell = 0;  // substance in mole
  // IscU dimer with a [2Fe-2S] loaded on each monomer
  species iscu_2fe2s_2fe2s in cell = 0;  // substance in mole
  // superoxide dismutase
  species $sod in cell = 0.02;  // substance in mole
  // L-tryptophan
  species trp in cell = 0.012;  // substance in mole
  // L-tryptophanyl radical
  species trpr in cell = 0;  // substance in mole
  // 5-hydroxytryptophan
  species trpoh in cell = 0;  // substance in mole
  // thioredoxin (oxidized)
  species trxox in cell = 0;  // substance in mole
  // thioredoxin (reduced)
  species trxrd in cell = 0.01;  // substance in mole
  // thioredoxin reductase
  species trxR in cell = 0.0004192861;  // substance in mole
  // L-tyrosine
  species tyr in cell = 0.029;  // substance in mole
  // L-tyrosyl radical
  species tyrrad in cell = 0;  // substance in mole
  // 3-nitrosotyrosine
  species tyrno in cell = 0;  // substance in mole
  // 3-nitrotyrosine
  species tyrno2 in cell = 0;  // substance in mole
  // 3,3-dityrosine
  species dityr in cell = 0;  // substance in mole
  // ubiquinone-8
  species q8 in cell = 3.710884;  // substance in mole
  // ubiquinol-8
  species q8h2 in cell = 0.271798;  // substance in mole
  // NADH dehydrogenase I
  species NDH1_cell in cell = 0.002211645;  // substance in mole
  // NADH dehydrogenase II
  species NDH2_cell in cell = 0.000118793;  // substance in mole
  // hmp mRNA transcript
  species mRNA_hmp in cell = 0;  // substance in mole
  // norV mRNA transcript
  species mRNA_norV in cell = 0;  // substance in mole
  // nrfA mRNA transcript
  species mRNA_nrfA in cell = 0;  // substance in mole
  // water (intracellular)
  species $h2o_cell in cell = 0;  // substance in mole
  // proton (intracellular)
  species $h_cell in cell = 0;  // substance in mole
  // hydroxide anion
  species $oh in cell = 0;  // substance in mole
  // ferredoxin (reduced)
  species $fdxred in cell = 0;  // substance in mole
  // ferredoxin (oxidized)
  species $fdxox in cell = 0;  // substance in mole
  // DNA-bound deoxycytidine
  species ds_dcyt in cell = 12.32943;  // substance in mole
  // phosphate ion
  species $pi_158 in cell = 0;  // substance in mole
  // null species used for balancing reactions (intracellular)
  species $NULL_cell in cell = 0.001;  // substance in mole

  // Parameters:
  p_k_NO_O2 = 0.008639998 MWDERIVEDUNIT_1__micromolarity___2_hour;
  p_k_NO_NO2r = 3960000 MWDERIVEDUNIT_1__micromolarity_hour;
  p_k_N2O3diss = 291600000 MWDERIVEDUNIT_1__hour;
  p_k_N2O3_H2O = 75600000 MWDERIVEDUNIT_1__hour;
  p_k_NO2r_NO2r = 1620000 MWDERIVEDUNIT_1__micromolarity_hour;
  p_k_N2O4diss = 24840000 MWDERIVEDUNIT_1__hour;
  p_k_N2O4_H2O = 3600000 MWDERIVEDUNIT_1__hour;
  p_k_NO_O2S = 36000000 MWDERIVEDUNIT_1__micromolarity_hour;
  p_k_NO2r_O2S = 16200000 MWDERIVEDUNIT_1__micromolarity_hour;
  p_k_O2NOOdiss = 2520 MWDERIVEDUNIT_1__hour;
  p_k_NO_OHr = 3600000 MWDERIVEDUNIT_1__micromolarity_hour;
  p_k_ONOOprot = 9042791 MWDERIVEDUNIT_1__hour;
  p_k_ONOOHdeprot = 5.705615e7 MWDERIVEDUNIT_1__hour;
  p_k_ONOOHdiss1 = 2520 MWDERIVEDUNIT_1__hour;
  p_k_ONOOHdiss2 = 1080 MWDERIVEDUNIT_1__hour;
  p_k_ONOO_OHr = 17280000 MWDERIVEDUNIT_1__micromolarity_hour;
  p_k_O2S_OHr = 36000000 MWDERIVEDUNIT_1__micromolarity_hour;
  p_k_HNO_prot = 432000 MWDERIVEDUNIT_1__hour;
  p_k_HNO_deprot = 70.2261 MWDERIVEDUNIT_1__hour;
  p_k_HNO_HNO = 28800 MWDERIVEDUNIT_1__micromolarity_hour;
  p_k_HNO_NO = 21600 MWDERIVEDUNIT_1__micromolarity_hour;
  p_k_N2O2rdecomp = 2.88e10 MWDERIVEDUNIT_1__hour;
  p_k_N2O2r_NO = 14400 MWDERIVEDUNIT_1__micromolarity_hour;
  p_k_N3O3decomp = 1188000 MWDERIVEDUNIT_1__hour;
  p_k_HNO_NADH = 39.6 MWDERIVEDUNIT_1__micromolarity_hour;
  p_k_HNO_NADPH = 46.8 MWDERIVEDUNIT_1__micromolarity_hour;
  p_k_HNO_NH2OH = 14.4 MWDERIVEDUNIT_1__micromolarity_hour;
  p_k_CO2hyd = 108 MWDERIVEDUNIT_1__hour;
  p_k_H2CO3dehyd = 72000 MWDERIVEDUNIT_1__hour;
  p_k_H2CO3_OH = 3600000 MWDERIVEDUNIT_1__hour;
  p_k_HCO3hyd = 361.7116 MWDERIVEDUNIT_1__hour;
  p_k_GSan_prot = 9042791 MWDERIVEDUNIT_1__hour;
  p_k_GSH_deprot = 227144.6 MWDERIVEDUNIT_1__hour;
  p_k_GSH_NO2r = 72000 MWDERIVEDUNIT_1__micromolarity_hour;
  p_k_GSan_NO2r = 864000 MWDERIVEDUNIT_1__micromolarity_hour;
  p_k_GSH_N2O3 = 237600 MWDERIVEDUNIT_1__micromolarity_hour;
  p_k_GSHr_NO = 100800 MWDERIVEDUNIT_1__micromolarity_hour;
  p_k_GSHr_GSHr = 2700000 MWDERIVEDUNIT_1__micromolarity_hour;
  p_k_GSHr_O2 = 7200000 MWDERIVEDUNIT_1__micromolarity_hour;
  p_k_GSOOdiss = 2.232e9 MWDERIVEDUNIT_1__hour;
  p_k_GSr_GS = 2160000 MWDERIVEDUNIT_1__micromolarity_hour;
  p_k_GSSGrdiss = 576000000 MWDERIVEDUNIT_1__hour;
  p_k_GSSGr_O2 = 18000000 MWDERIVEDUNIT_1__micromolarity_hour;
  p_k_GSHr_GSNO = 6120000 MWDERIVEDUNIT_1__micromolarity_hour;
  p_k_GSNO_O2S = 2.16 MWDERIVEDUNIT_1__micromolarity___2_hour;
  p_k_GSOO_GSNO = 1368000 MWDERIVEDUNIT_1__micromolarity_hour;
  p_k_GSNO_GSH = 2.52e-5 MWDERIVEDUNIT_1__micromolarity_hour;
  p_k_GSNO_CYS = 0.2574 MWDERIVEDUNIT_1__micromolarity_hour;
  p_k_CYSNO_GSH = 0.3168 MWDERIVEDUNIT_1__micromolarity_hour;
  p_k_GSOO_NO2r = 3600000 MWDERIVEDUNIT_1__micromolarity_hour;
  p_k_GSOONO2diss = 2700 MWDERIVEDUNIT_1__hour;
  p_k_GSOO_GSH = 7200 MWDERIVEDUNIT_1__micromolarity_hour;
  p_k_GSH_HNO = 2160 MWDERIVEDUNIT_1__micromolarity_hour;
  p_k_GSH_GSNHOH = 3600000 MWDERIVEDUNIT_1__micromolarity_hour;
  p_k_ONOO_GSH = 2.376 MWDERIVEDUNIT_1__micromolarity_hour;
  p_k_ONOOH_GSH = 4.86 MWDERIVEDUNIT_1__micromolarity_hour;
  p_k_GSOH_GSH = 2.592 MWDERIVEDUNIT_1__micromolarity_hour;
  p_k_GSH_OHr = 50400000 MWDERIVEDUNIT_1__micromolarity_hour;
  p_k_GSH_CO3r = 19080 MWDERIVEDUNIT_1__micromolarity_hour;
  p_k_GSan_CO3r = 2556000 MWDERIVEDUNIT_1__micromolarity_hour;
  p_k_GSH_O2S = 0.72 MWDERIVEDUNIT_1__micromolarity_hour;
  p_k_TYRr_GSH = 1260 MWDERIVEDUNIT_1__micromolarity_hour;
  p_k_TYR_GSHr = 1260 MWDERIVEDUNIT_1__micromolarity_hour;
  p_k_GSO_GSH = 360 MWDERIVEDUNIT_1__micromolarity_hour;
  p_k_ONOO_CO21 = 36 MWDERIVEDUNIT_1__micromolarity_hour;
  p_k_ONOO_CO22 = 72 MWDERIVEDUNIT_1__micromolarity_hour;
  p_k_CO3r_O2S = 1440000 MWDERIVEDUNIT_1__micromolarity_hour;
  p_k_CO3r_NO = 12600000 MWDERIVEDUNIT_1__micromolarity_hour;
  p_k_TYR_CO3r = 162000 MWDERIVEDUNIT_1__micromolarity_hour;
  p_k_TYR_NO2r = 1152 MWDERIVEDUNIT_1__micromolarity_hour;
  p_k_TYRr_NO = 3600000 MWDERIVEDUNIT_1__micromolarity_hour;
  p_k_TYRNOdiss = 3600000 MWDERIVEDUNIT_1__hour;
  p_k_TYRr_TYRr = 144000 MWDERIVEDUNIT_1__micromolarity_hour;
  p_k_TYRr_NO2r = 4680000 MWDERIVEDUNIT_1__micromolarity_hour;
  p_k_TRP_OHr = 46800000 MWDERIVEDUNIT_1__micromolarity_hour;
  p_k_CYS_OHr = 169200000 MWDERIVEDUNIT_1__micromolarity_hour;
  p_k_NO2_OHr = 19080000 MWDERIVEDUNIT_1__micromolarity_hour;
  p_k_CO3_OHr = 1080000 MWDERIVEDUNIT_1__micromolarity_hour;
  p_k_HCO3_OHr = 30600 MWDERIVEDUNIT_1__micromolarity_hour;
  p_k_TRP_CO3r = 2520000 MWDERIVEDUNIT_1__micromolarity_hour;
  p_k_CYS_CO3r = 165600 MWDERIVEDUNIT_1__micromolarity_hour;
  p_k_TRP_NO2r = 3600 MWDERIVEDUNIT_1__micromolarity_hour;
  p_k_CYS_NO2r = 180000 MWDERIVEDUNIT_1__micromolarity_hour;
  p_k_TRX_GSSG = 0.36 MWDERIVEDUNIT_1__micromolarity_hour;
  p_k_NO_FeS = 0.0252 MWDERIVEDUNIT_1__micromolarity___2_hour;
  p_k_DNICrem = 0.05524904 MWDERIVEDUNIT_1__micromolarity_hour;
  p_k_DNICbind = 0.05524904 MWDERIVEDUNIT_1__micromolarity_hour;
  p_k_DNICdeg = 0.0449609 MWDERIVEDUNIT_1__micromolarity_hour;
  p_k_ISCUloadFe = 7.62 MWDERIVEDUNIT_1__hour;
  p_k_isc4Fe4Srep = 0.66 MWDERIVEDUNIT_1__micromolarity_hour;
  p_k_dNdeam = 432 MWDERIVEDUNIT_1__micromolarity_hour;
  p_HMP_kh = 252000 MWDERIVEDUNIT_1__micromolarity_hour;
  p_HMP_kh_nadph = 6700 MWDERIVEDUNIT_1__micromolarity_hour;
  p_HMP_kET = 540000 MWDERIVEDUNIT_1__hour;
  p_HMP_ko2 = 27000 MWDERIVEDUNIT_1__micromolarity_hour;
  p_HMP_koff_o2 = 1584 MWDERIVEDUNIT_1__hour;
  p_HMP_kox = 7727343 MWDERIVEDUNIT_1__micromolarity_hour;
  p_HMP_kP = 720000 MWDERIVEDUNIT_1__hour;
  p_HMP_kon_no = 29927.75 MWDERIVEDUNIT_1__micromolarity_hour;
  p_HMP_koff_no = 0.72 MWDERIVEDUNIT_1__hour;
  p_HMP_kred_no = 645.1964 MWDERIVEDUNIT_1__hour;
  p_SOD_k = 7200000 MWDERIVEDUNIT_1__micromolarity_hour;
  p_k_nonoate = 0.2783824 MWDERIVEDUNIT_1__hour;
  p_kLa_no = 4.864755 MWDERIVEDUNIT_1__hour;
  p_O2Sgen = 49.71429 MWDERIVEDUNIT_1__hour;
  p_Hmp_kdeg = 2.881048 MWDERIVEDUNIT_1__hour;
  p_norVo2_kox = 650.3467 MWDERIVEDUNIT_1__micromolarity_hour;
  p_NorV_kdeg = 0.5856554 MWDERIVEDUNIT_1__hour;
  p_NrfA_kdeg = 0.1008 MWDERIVEDUNIT_1__hour;
  p_ISCUloadS_kcat = 510 MWDERIVEDUNIT_1__hour;
  p_ISCUloadS_Km_cys = 2.7 MWBUILTINPREFIX_micro_MWBUILTINUNIT_molarity;
  p_ISCUloadS_Km_iscu = 2.589583 MWBUILTINPREFIX_micro_MWBUILTINUNIT_molarity;
  p_isc2Fe2Srep_kcat = 12.6 MWDERIVEDUNIT_1__hour;
  p_isc2Fe2Srep_Km_apo_protein_2fe2s = 27 MWBUILTINPREFIX_micro_MWBUILTINUNIT_molarity;
  p_dXTSNbe_kcat = 1.44 MWDERIVEDUNIT_1__hour;
  p_dXTSNbe_Km_ds_dxtsn = 0.053 MWBUILTINPREFIX_micro_MWBUILTINUNIT_molarity;
  p_dINbe_kcat = 4.5 MWDERIVEDUNIT_1__hour;
  p_dINbe_Km_ds_din = 0.042 MWBUILTINPREFIX_micro_MWBUILTINUNIT_molarity;
  p_dURIbe_kcat = 1800 MWDERIVEDUNIT_1__hour;
  p_dURIbe_Km_ds_duri = 0.278 MWBUILTINPREFIX_micro_MWBUILTINUNIT_molarity;
  p_APrem_kcat = 816 MWDERIVEDUNIT_1__hour;
  p_APrem_Km_ds_AP = 0.016 MWBUILTINPREFIX_micro_MWBUILTINUNIT_molarity;
  p_DNApol_kcat = 50400 MWDERIVEDUNIT_1__hour;
  p_DNApol_KDNA = 0.0054 MWBUILTINPREFIX_micro_MWBUILTINUNIT_molarity;
  p_DNApol_KiDNA = 0.0081 MWBUILTINPREFIX_micro_MWBUILTINUNIT_molarity;
  p_DNApol_KiDNAp = 0.022 MWBUILTINPREFIX_micro_MWBUILTINUNIT_molarity;
  p_dGSNpol_KdGTP = 1.3 MWBUILTINPREFIX_micro_MWBUILTINUNIT_molarity;
  p_dDADpol_KdATP = 3.7 MWBUILTINPREFIX_micro_MWBUILTINUNIT_molarity;
  p_dCYTpol_KdCTP = 2.1 MWBUILTINPREFIX_micro_MWBUILTINUNIT_molarity;
  p_DNAlig_kcat = 84 MWDERIVEDUNIT_1__hour;
  p_DNAlig_Km_nick = 0.05 MWBUILTINPREFIX_micro_MWBUILTINUNIT_molarity;
  p_DNAlig_Km_nad = 7 MWBUILTINPREFIX_micro_MWBUILTINUNIT_molarity;
  p_GSFDH_kcat = 11.304 MWDERIVEDUNIT_1__hour;
  p_GSFDH_Km_gsno = 737 MWBUILTINPREFIX_micro_MWBUILTINUNIT_molarity;
  p_GOR_kcat = 960000 MWDERIVEDUNIT_1__hour;
  p_GOR_Km_nadph = 22 MWBUILTINPREFIX_micro_MWBUILTINUNIT_molarity;
  p_GOR_Km_gssg = 97 MWBUILTINPREFIX_micro_MWBUILTINUNIT_molarity;
  p_GOR_V2 = 2358 MWDERIVEDUNIT_1__micromolarity_hour;
  p_GOR_K3 = 0.022 dimensionless;
  p_GOR_K4 = 0.0039 MWDERIVEDUNIT_1__micromolarity;
  p_TRXR_kcat = 148500 MWDERIVEDUNIT_1__hour;
  p_TRXR_Km_nadph = 4.6 MWBUILTINPREFIX_micro_MWBUILTINUNIT_molarity;
  p_TRXR_Km_trxox = 1.7 MWBUILTINPREFIX_micro_MWBUILTINUNIT_molarity;
  p_TRX_GSNO_kcat = 72 MWDERIVEDUNIT_1__hour;
  p_TRX_GSNO_Km_gsno = 10 MWBUILTINPREFIX_micro_MWBUILTINUNIT_molarity;
  p_CYTbo_kon_no = 24078.79 MWDERIVEDUNIT_1__micromolarity_hour;
  p_CYTbo_koff_no = 108 MWDERIVEDUNIT_1__hour;
  p_CYTbo_Km_o2 = 0.9513972 MWBUILTINPREFIX_micro_MWBUILTINUNIT_molarity;
  p_CYTbd_kon_no = 902513.1 MWDERIVEDUNIT_1__micromolarity_hour;
  p_CYTbd_koff_no = 586.8 MWDERIVEDUNIT_1__hour;
  p_CYTbd_Km_o2 = 0.1294331 MWBUILTINPREFIX_micro_MWBUILTINUNIT_molarity;
  p_NORVred_k = 19800 MWDERIVEDUNIT_1__micromolarity_hour;
  p_NORVred_Ki_no = 13.5 MWBUILTINPREFIX_micro_MWBUILTINUNIT_molarity;
  p_NORVno_kcat = 26820 MWDERIVEDUNIT_1__hour;
  p_NORVno_Km_no = 0.4295661 MWBUILTINPREFIX_micro_MWBUILTINUNIT_molarity;
  p_NRFAno_kcat = 1404000 MWDERIVEDUNIT_1__hour;
  p_NRFAno_Km_no = 300 MWBUILTINPREFIX_micro_MWBUILTINUNIT_molarity;
  p_kLa_o2 = 4.517535 MWDERIVEDUNIT_1__hour;
  p_HMPtranslate_k = 1238.123 MWDERIVEDUNIT_1__hour;
  p_NORVtranslate_k = 2463.251 MWDERIVEDUNIT_1__hour;
  p_NRFAtranslate_k = 0 MWDERIVEDUNIT_1__hour;
  p_CYTbo_kcat_o2 = 449668.5 MWDERIVEDUNIT_1__hour;
  p_CYTbo_Kiq1Kmq2 = 213 MWDERIVEDUNIT_micromolarity___2;
  p_CYTbo_Km_q8h2 = 53 MWBUILTINPREFIX_micro_MWBUILTINUNIT_molarity;
  p_CYTbd_kcat_o2 = 1654324 MWDERIVEDUNIT_1__hour;
  p_CYTbd_Kiq1Kmq2 = 213 MWDERIVEDUNIT_micromolarity___2;
  p_CYTbd_Km_q8h2 = 42 MWBUILTINPREFIX_micro_MWBUILTINUNIT_molarity;
  p_NDH1_kcat = 1793876 MWDERIVEDUNIT_1__hour;
  p_NDH1_Kd_Q = 30 MWBUILTINPREFIX_micro_MWBUILTINUNIT_molarity;
  p_NDH1_Km_nadh = 7.2 MWBUILTINPREFIX_micro_MWBUILTINUNIT_molarity;
  p_NDH1_Km_q8 = 30 MWBUILTINPREFIX_micro_MWBUILTINUNIT_molarity;
  p_NDH2_kcat = 1576329 MWDERIVEDUNIT_1__hour;
  p_NDH2_Kd_Q = 5.9 MWBUILTINPREFIX_micro_MWBUILTINUNIT_molarity;
  p_NDH2_Km_nadh = 57 MWBUILTINPREFIX_micro_MWBUILTINUNIT_molarity;
  p_NDH2_Km_q8 = 5.9 MWBUILTINPREFIX_micro_MWBUILTINUNIT_molarity;
  p_HMPtranscr_kmax = 1.094419 MWDERIVEDUNIT_micromolarity__hour;
  p_HMPtranscr_Kno = 0.03896052 MWBUILTINPREFIX_micro_MWBUILTINUNIT_molarity;
  p_RNA_hmp_kdeg = 19.51304 MWDERIVEDUNIT_1__hour;
  p_NORVtranscr_kmax = 1.520254 MWDERIVEDUNIT_micromolarity__hour;
  p_NORVtranscr_Kno = 0.6251445 MWBUILTINPREFIX_micro_MWBUILTINUNIT_molarity;
  p_RNA_norV_kdeg = 13.94952 MWDERIVEDUNIT_1__hour;
  p_NRFAtranscr_kmax = 1.163776 MWDERIVEDUNIT_micromolarity__hour;
  p_NRFAtranscr_Kno2 = 601.3166 MWBUILTINPREFIX_micro_MWBUILTINUNIT_molarity;
  p_NRFAtranscr_Ko2 = 3.695354e-5 MWBUILTINPREFIX_micro_MWBUILTINUNIT_molarity;
  p_RNA_nrfA_kdeg = 39.13089 MWDERIVEDUNIT_1__hour;
  p_translate_kact_o2 = 2.153954 dimensionless;
  p_translate_Kd_o2 = 208.6988 MWBUILTINPREFIX_micro_MWBUILTINUNIT_molarity;
  p_HMPtranscr_kbasal = 0.003974968 MWDERIVEDUNIT_micromolarity__hour;
  p_NORVtranscr_kbasal = 0 MWDERIVEDUNIT_micromolarity__hour;
  p_k_DIFFUSION_NO = 1000000 MWDERIVEDUNIT_1__hour;
  p_k_DIFFUSION_O2 = 1000000 MWDERIVEDUNIT_1__hour;

  // Reactions:
  NOautox: 2 no_cell + o2_cell => 2 no2r_cell; p_k_NO_O2*no_cell*no_cell*o2_cell;
  EX_NOautox: 2 no_media + o2_media => 2 no2r_media; p_k_NO_O2*no_media*no_media*o2_media;
  NO_NO2r: no_cell + no2r_cell => n2o3_cell; p_k_NO_NO2r*no_cell*no2r_cell;
  EX_NO_NO2r: no_media + no2r_media => n2o3_media; p_k_NO_NO2r*no_media*no2r_media;
  N2O3diss: n2o3_cell => no_cell + no2r_cell; p_k_N2O3diss*n2o3_cell;
  EX_N2O3diss: n2o3_media => no_media + no2r_media; p_k_N2O3diss*n2o3_media;
  N2O3_H2O: n2o3_cell + $h2o_cell => 2 no2_cell + 2 $h_cell; p_k_N2O3_H2O*n2o3_cell;
  EX_N2O3_H2O: n2o3_media + $h2o_media => 2 no2_media + 2 $h_media; p_k_N2O3_H2O*n2o3_media;
  NO2r_NO2r: 2 no2r_cell => n2o4_cell; p_k_NO2r_NO2r*no2r_cell*no2r_cell;
  EX_NO2r_NO2r: 2 no2r_media => n2o4_media; p_k_NO2r_NO2r*no2r_media*no2r_media;
  N2O4diss: n2o4_cell => 2 no2r_cell; p_k_N2O4diss*n2o4_cell;
  EX_N2O4diss: n2o4_media => 2 no2r_media; p_k_N2O4diss*n2o4_media;
  N2O4_H2O: n2o4_cell + $h2o_cell => no2_cell + no3_cell + 2 $h_cell; p_k_N2O4_H2O*n2o4_cell;
  EX_N2O4_H2O: n2o4_media + $h2o_media => no2_media + no3_media + 2 $h_media; p_k_N2O4_H2O*n2o4_media;
  NO_O2S: no_cell + o2s => onoo; p_k_NO_O2S*no_cell*o2s;
  NO2r_O2S: no2r_cell + o2s => o2noo; p_k_NO2r_O2S*no2r_cell*o2s;
  O2NOOdiss: o2noo => o2_cell + no2_cell; p_k_O2NOOdiss*o2noo;
  NO_OHr: ohr + no_cell => $h_cell + no2_cell; p_k_NO_OHr*ohr*no_cell;
  ONOOprot: onoo + $h_cell => onooh; p_k_ONOOprot*onoo;
  ONOOHdeprot: onooh => onoo + $h_cell; p_k_ONOOHdeprot*onooh;
  ONOOHdiss1: onooh => no3_cell + $h_cell; p_k_ONOOHdiss1*onooh;
  ONOOHdiss2: onooh => no2r_cell + ohr; p_k_ONOOHdiss2*onooh;
  ONOO_OHr: ohr + onoo => $h_cell + o2s + no2_cell; p_k_ONOO_OHr*ohr*onoo;
  O2S_OHr: ohr + o2s => o2_cell + $oh; p_k_O2S_OHr*ohr*o2s;
  HNO_prot: noan + $h2o_cell => hno + $oh; p_k_HNO_prot*noan;
  HNO_deprot: hno + $oh => noan + $h2o_cell; p_k_HNO_deprot*hno;
  HNO_HNO: 2 hno => $h2o_cell + n2o; p_k_HNO_HNO*hno*hno;
  HNO_NO: hno + no_cell => n2o2r + $h_cell; p_k_HNO_NO*hno*no_cell;
  N2O2rdecomp: n2o2r + $h_cell => hno + no_cell; p_k_N2O2rdecomp*n2o2r;
  N2O2r_NO: n2o2r + no_cell => n3o3; p_k_N2O2r_NO*n2o2r*no_cell;
  N3O3decomp: n3o3 => no2_cell + n2o; p_k_N3O3decomp*n3o3;
  HNO_NADH: hno + $nadh + $h_cell => nh2oh + $nad; p_k_HNO_NADH*hno*nadh;
  HNO_NADPH: hno + $nadph + $h_cell => nh2oh + $nadp; p_k_HNO_NADPH*hno*nadph;
  HNO_NH2OH: hno + nh2oh => 2 $h2o_cell + n2; p_k_HNO_NH2OH*hno*nh2oh;
  CO2hyd: co2 + $h2o_cell => h2co3; p_k_CO2hyd*co2;
  H2CO3dehyd: h2co3 => co2 + $h2o_cell; p_k_H2CO3dehyd*h2co3;
  H2CO3_OH: h2co3 + $oh => hco3 + $h2o_cell; p_k_H2CO3_OH*h2co3;
  HCO3hyd: hco3 + $h2o_cell => h2co3 + $oh; p_k_HCO3hyd*hco3;
  GSan_prot: gsan + $h_cell => gsh; p_k_GSan_prot*gsan;
  GSH_deprot: gsh => gsan + $h_cell; p_k_GSH_deprot*gsh;
  GSH_NO2r: no2r_cell + gsh => gsr + no2_cell + $h_cell; p_k_GSH_NO2r*no2r_cell*gsh;
  GSan_NO2r: gsan + no2r_cell => gsr + no2_cell; p_k_GSan_NO2r*gsan*no2r_cell;
  GSH_N2O3: n2o3_cell + gsh => gsno + no2_cell + $h_cell; p_k_GSH_N2O3*n2o3_cell*gsh;
  GSHr_NO: gsr + no_cell => gsno; p_k_GSHr_NO*gsr*no_cell;
  GSHr_GSHr: 2 gsr => gssg; p_k_GSHr_GSHr*gsr*gsr;
  GSHr_O2: gsr + o2_cell => gsoo; p_k_GSHr_O2*gsr*o2_cell;
  GSOOdiss: gsoo => gsr + o2_cell; p_k_GSOOdiss*gsoo;
  GSr_GS: gsr + gsan => gssgr; p_k_GSr_GS*gsr*gsan;
  GSSGrdiss: gssgr => gsr + gsan; p_k_GSSGrdiss*gssgr;
  GSSGr_O2: gssgr + o2_cell => gssg + o2s; p_k_GSSGr_O2*gssgr*o2_cell;
  GSHr_GSNO: gsr + gsno => gssg + no_cell; p_k_GSHr_GSNO*gsr*gsno;
  GSNO_O2S: 2 gsno + o2s + $h2o_cell => gssgr + no3_cell + no2_cell + 2 $h_cell; p_k_GSNO_O2S*gsno*gsno*o2s;
  GSOO_GSNO: gsoo + gsno => gssg + o2_cell + no_cell; p_k_GSOO_GSNO*gsoo*gsno;
  GSNO_GSH: gsno + gsh => gssg + hno; p_k_GSNO_GSH*gsno*gsh;
  GSNO_CYS: gsno + $cys => gsh + cysno; p_k_GSNO_CYS*gsno*cys;
  CYSNO_GSH: cysno + gsh => gsno + $cys; p_k_CYSNO_GSH*cysno*gsh;
  GSOO_NO2r: gsoo + no2r_cell => gsoono2; p_k_GSOO_NO2r*gsoo*no2r_cell;
  GSOONO2diss: gsoono2 => gsoo + no2r_cell; p_k_GSOONO2diss*gsoono2;
  GSOO_GSH: gsoo + gsh => gsor + gsoh; p_k_GSOO_GSH*gsoo*gsh;
  GSH_HNO: gsh + hno => gsnhoh; p_k_GSH_HNO*gsh*gsnhoh;
  GSH_GSNHOH: gsnhoh + gsh => gssg + nh2oh; p_k_GSH_GSNHOH*gsnhoh*gsh;
  ONOO_GSH: onoo + gsh => gsoh + no2_cell; p_k_ONOO_GSH*onoo*gsh;
  ONOOH_GSH: onooh + gsh => gsno2 + $h2o_cell; p_k_ONOOH_GSH*onooh*gsh;
  GSOH_GSH: gsoh + gsh => gssg + $h2o_cell; p_k_GSOH_GSH*gsoh*gsh;
  GSH_OHr: ohr + gsh => gsr + $h2o_cell; p_k_GSH_OHr*ohr*gsh;
  GSH_CO3r: co3r + gsh => hco3 + gsr; p_k_GSH_CO3r*co3r*gsh;
  GSan_CO3r: gsan + co3r => gsr + co3; p_k_GSan_CO3r*gsan*co3r;
  GSH_O2S: o2s + gsh + $h_cell => gsr + h2o2; p_k_GSH_O2S*o2s*gsh;
  TYRr_GSH: tyrrad + gsh => gsr + tyr; p_k_TYRr_GSH*tyrrad*gsh;
  TYR_GSHr: gsr + tyr => tyrrad + gsh; p_k_TYR_GSHr*gsr*tyr;
  GSO_GSH: gsor + gsh => gsoh + gsr; p_k_GSO_GSH*gsor*gsh;
  ONOO_CO21: onoo + co2 => no2r_cell + co3r; p_k_ONOO_CO21*onoo*co2;
  ONOO_CO22: onoo + co2 => no3_cell + co2; p_k_ONOO_CO22*onoo*co2;
  CO3r_O2S: co3r + o2s + $h_cell => hco3 + o2_cell; p_k_CO3r_O2S*co3r*o2s;
  CO3r_NO: co3r + no_cell + $oh => hco3 + no2_cell; p_k_CO3r_NO*co3r*no_cell;
  TYR_CO3r: co3r + tyr => hco3 + tyrrad; p_k_TYR_CO3r*co3r*tyr;
  TYR_NO2r: no2r_cell + tyr => no2_cell + tyrrad; p_k_TYR_NO2r*no2r_cell*tyr;
  TYRr_NO: tyrrad + no_cell => tyrno; p_k_TYRr_NO*tyrrad*no_cell;
  TYRNOdiss: tyrno => tyrrad + no_cell; p_k_TYRNOdiss*tyrno;
  TYRr_TYRr: 2 tyrrad => dityr; p_k_TYRr_TYRr*tyrrad*tyrrad;
  TYRr_NO2r: no2r_cell + tyrrad => tyrno2; p_k_TYRr_NO2r*no2r_cell*tyrrad;
  TRP_OHr: trp + ohr => trpoh; p_k_TRP_OHr*trp*ohr;
  CYS_OHr: $cys + ohr => cysr + $h2o_cell; p_k_CYS_OHr*cys*ohr;
  NO2_OHr: ohr + no2_cell => no2r_cell + $oh; p_k_NO2_OHr*ohr*no2_cell;
  CO3_OHr: ohr + co3 => co3r + $oh; p_k_CO3_OHr*ohr*co3;
  HCO3_OHr: ohr + hco3 => $h2o_cell + co3r; p_k_HCO3_OHr*ohr*hco3;
  TRP_CO3r: trp + co3r => hco3 + trpr; p_k_TRP_CO3r*trp*co3r;
  CYS_CO3r: $cys + co3r => cysr + hco3; p_k_CYS_CO3r*cys*co3r;
  TRP_NO2r: trp + no2r_cell => no2_cell + trpr; p_k_TRP_NO2r*trp*no2r_cell;
  CYS_NO2r: $cys + no2r_cell => no2_cell + cysr + $h_cell; p_k_CYS_NO2r*cys*no2r_cell;
  TRX_GSSG: trxrd + gssg => trxox + 2 gsh; p_k_TRX_GSSG*trxrd*gssg;
  _2Fe2S_NO: 0.5 holo_protein_2fe2s + 2 no_cell => 0.5 protein_2fe2s_2dnic + s; p_k_NO_FeS*no_cell*no_cell*holo_protein_2fe2s;
  _4Fe4S_NO: 0.25 holo_protein_4fe4s + 2 no_cell => 0.25 protein_4fe4s_2rre + 0.75 s + 0.25 s2; p_k_NO_FeS*no_cell*no_cell*holo_protein_4fe4s;
  _2Fe2SdnicDiss: protein_2fe2s_2dnic + 4 $cys => apo_protein_2fe2s + 2 cys_dnic; p_k_DNICrem*protein_2fe2s_2dnic*cys;
  _2Fe2SdnicAss: apo_protein_2fe2s + 2 cys_dnic => protein_2fe2s_2dnic + 4 $cys; p_k_DNICbind*apo_protein_2fe2s*cys_dnic;
  _4Fe4SrreDiss: protein_4fe4s_2rre + 8 $cys => apo_protein_4fe4s + 4 cys_dnic + 4 $h_cell; p_k_DNICrem*protein_4fe4s_2rre*cys;
  _4Fe4SrreAss: apo_protein_4fe4s + 4 cys_dnic + 4 $h_cell => protein_4fe4s_2rre + 8 $cys; p_k_DNICbind*apo_protein_4fe4s*cys_dnic;
  DNICdeg: cys_dnic + o2_cell + 2 $h_cell => 2 $cys + $fe2 + 2 no2_cell; p_k_DNICdeg*cys_dnic*o2_cell;
  ISCUloadFe1: 0.5 iscu_2s + 0.5 trxrd + $fe2 => 0.5 iscu_2fe2s + 0.5 trxox + 2 $h_cell; p_k_ISCUloadFe*iscu_2s;
  ISCUloadFe2: 0.5 iscu_2fe2s_2s + 0.5 trxrd + $fe2 => 0.5 iscu_2fe2s_2fe2s + 0.5 trxox + 2 $h_cell; p_k_ISCUloadFe*iscu_2fe2s_2s;
  isc4Fe4Srep: iscu_2fe2s_2fe2s + 2 $fdxred + 4 $h_cell + apo_protein_4fe4s => iscu + holo_protein_4fe4s + 2 $fdxox; p_k_isc4Fe4Srep*iscu_2fe2s_2fe2s*apo_protein_4fe4s;
  dDADdeam: ds_dad_2 + n2o3_cell => ds_din + n2 + no2_cell + $h_cell; p_k_dNdeam*ds_dad_2*n2o3_cell;
  dCYTdeam: ds_dcyt + n2o3_cell => ds_duri + n2 + no2_cell + $h_cell; p_k_dNdeam*ds_dcyt*n2o3_cell;
  dGSNdeam: ds_dgsn + n2o3_cell => ds_dxtsn + n2 + no2_cell + $h_cell; p_k_dNdeam*ds_dgsn*n2o3_cell;
  HMP1: hmpFe3 + $nadh + $h_cell => hmpFe3h2 + $nad; p_HMP_kh*hmpFe3*nadh;
  HMP2: hmpFe3 + $nadph + $h_cell => hmpFe3h2 + $nadp; p_HMP_kh_nadph*hmpFe3*nadph;
  HMP3: hmpFe3h2 => hmpFe2h + $h_cell; p_HMP_kET*hmpFe3h2;
  HMP4: hmpFe2h + o2_cell => hmpFe2h_o2; p_HMP_ko2*hmpFe2h*o2_cell;
  HMP5: hmpFe2h_o2 => hmpFe2h + o2_cell; p_HMP_koff_o2*hmpFe2h_o2;
  HMP6: hmpFe2h_o2 + no_cell => hmpFe3h_onoo; p_HMP_kox*hmpFe2h_o2*no_cell;
  HMP7: hmpFe3h_onoo => hmpFe3h + no3_cell; p_HMP_kP*hmpFe3h_onoo;
  HMP8: hmpFe3h => hmpFe2 + $h_cell; p_HMP_kET*hmpFe3h;
  HMP9: hmpFe2 + o2_cell => hmpFe2_o2; p_HMP_ko2*hmpFe2*o2_cell;
  HMP10: hmpFe2_o2 => hmpFe2 + o2_cell; p_HMP_koff_o2*hmpFe2_o2;
  HMP11: hmpFe2_o2 + no_cell => hmpFe3_onoo; p_HMP_kox*hmpFe2_o2*no_cell;
  HMP12: hmpFe3_onoo => hmpFe3 + no3_cell; p_HMP_kP*hmpFe3_onoo;
  HMP13: hmpFe2h + no_cell => hmpFe2h_no; p_HMP_kon_no*hmpFe2h*no_cell;
  HMP14: hmpFe2h_no => hmpFe2h + no_cell; p_HMP_koff_no*hmpFe2h_no;
  HMP15: hmpFe2h_no => hmpFe3h + noan; p_HMP_kred_no*hmpFe2h_no;
  HMP16: hmpFe2 + no_cell => hmpFe2_no; p_HMP_kon_no*hmpFe2*no_cell;
  HMP17: hmpFe2_no => hmpFe2 + no_cell; p_HMP_koff_no*hmpFe2_no;
  HMP18: hmpFe2_no => hmpFe3 + noan; p_HMP_kred_no*hmpFe2_no;
  HMP19: hmpFe2 + $nadh + $h_cell => hmpFe2h2 + $nad; p_HMP_kh*hmpFe2*nadh;
  HMP20: hmpFe2 + $nadph + $h_cell => hmpFe2h2 + $nadp; p_HMP_kh_nadph*hmpFe2*nadph;
  HMP21: hmpFe2h2 + no_cell => hmpFe2h2_no; p_HMP_kon_no*hmpFe2h2*no_cell;
  HMP22: hmpFe2h2_no => hmpFe2h2 + no_cell; p_HMP_koff_no*hmpFe2h2_no;
  HMP23: hmpFe2h2_no => hmpFe3h2 + noan; p_HMP_kred_no*hmpFe2h2_no;
  HMP24: hmpFe2h2 + o2_cell => hmpFe2h2_o2; p_HMP_ko2*hmpFe2h2*o2_cell;
  HMP25: hmpFe2h2_o2 => hmpFe2h2 + o2_cell; p_HMP_koff_o2*hmpFe2h2_o2;
  HMP26: hmpFe2_o2 + $nadh + $h_cell => hmpFe2h2_o2 + $nad; p_HMP_kh*hmpFe2_o2*nadh;
  HMP27: hmpFe2_o2 + $nadph + $h_cell => hmpFe2h2_o2 + $nadp; p_HMP_kh_nadph*hmpFe2_o2*nadph;
  HMP28: hmpFe2h2_o2 + no_cell => hmpFe3h2_onoo; p_HMP_kox*hmpFe2h2_o2*no_cell;
  HMP29: hmpFe3h2_onoo => hmpFe2h + no3_cell + $h_cell; p_HMP_kP*hmpFe3h2_onoo;
  SOD: 2 $h_cell + 2 o2s => o2_cell + h2o2; p_SOD_k*sod*o2s;  // modifiers: sod
  EX_NOdonor: nonoate => 2 no_media; p_k_nonoate*nonoate;
  EX_NOout: no_media => $NULL_media; p_kLa_no*no_media;
  O2Sgen: $NULL_cell => o2s; p_O2Sgen*o2_cell;  // modifiers: o2_cell
  hmpFe2_deg: hmpFe2 => $NULL_cell; p_Hmp_kdeg*hmpFe2;
  hmpFe2h_deg: hmpFe2h => $NULL_cell; p_Hmp_kdeg*hmpFe2h;
  hmpFe2h2_deg: hmpFe2h2 => $NULL_cell; p_Hmp_kdeg*hmpFe2h2;
  hmpFe3_deg: hmpFe3 => $NULL_cell; p_Hmp_kdeg*hmpFe3;
  hmpFe3h_deg: hmpFe3h => $NULL_cell; p_Hmp_kdeg*hmpFe3h;
  hmpFe3h2_deg: hmpFe3h2 => $NULL_cell; p_Hmp_kdeg*hmpFe3h2;
  hmpFe2_o2_deg: hmpFe2_o2 => o2_cell; p_Hmp_kdeg*hmpFe2_o2;
  hmpFe2h_o2_deg: hmpFe2h_o2 => o2_cell; p_Hmp_kdeg*hmpFe2h_o2;
  hmpFe2h2_o2_deg: hmpFe2h2_o2 => o2_cell; p_Hmp_kdeg*hmpFe2h2_o2;
  hmpFe2_no_deg: hmpFe2_no => no_cell; p_Hmp_kdeg*hmpFe2_no;
  hmpFe2h_no_deg: hmpFe2h_no => no_cell; p_Hmp_kdeg*hmpFe2h_no;
  hmpFe2h2_no_deg: hmpFe2h2_no => no_cell; p_Hmp_kdeg*hmpFe2h2_no;
  hmpFe3_onoo_deg: hmpFe3_onoo => o2_cell + no_cell; p_Hmp_kdeg*hmpFe3_onoo;
  hmpFe3h_onoo_deg: hmpFe3h_onoo => o2_cell + no_cell; p_Hmp_kdeg*hmpFe3h_onoo;
  hmpFe3h2_onoo_deg: hmpFe3h2_onoo => o2_cell + no_cell; p_Hmp_kdeg*hmpFe3h2_onoo;
  norVox_o2: NorVox + o2_cell => $NULL_cell; p_norVo2_kox*NorVox*o2_cell;
  norVred_o2: NorVred + o2_cell => $NULL_cell; p_norVo2_kox*NorVred*o2_cell;
  norVoxdeg: NorVox => $NULL_cell; p_NorV_kdeg*NorVox;
  norVreddeg: NorVred => $NULL_cell; p_NorV_kdeg*NorVred;
  NRFAdeg: NrfA => $NULL_cell; p_NrfA_kdeg*NrfA;
  ISCUloadS1: 0.5 iscu + $cys => 0.5 iscu_2s + ala + $h_cell; iscs*cys*iscu*p_ISCUloadS_kcat/(cys*iscu + p_ISCUloadS_Km_cys*iscu + p_ISCUloadS_Km_iscu*cys);  // modifiers: iscs
  ISCUloadS2: 0.5 iscu_2fe2s + $cys => 0.5 iscu_2fe2s_2s + ala + $h_cell; iscs*cys*iscu_2fe2s*p_ISCUloadS_kcat/(cys*iscu_2fe2s + p_ISCUloadS_Km_cys*iscu_2fe2s + p_ISCUloadS_Km_iscu*cys);  // modifiers: iscs
  isc2Fe2Srep1: iscu_2fe2s + apo_protein_2fe2s + $atp + $h2o_cell => iscu + holo_protein_2fe2s + $adp + $pi_158 + $h_cell; iscu_2fe2s*apo_protein_2fe2s*p_isc2Fe2Srep_kcat/(p_isc2Fe2Srep_Km_apo_protein_2fe2s + apo_protein_2fe2s);
  isc2Fe2Srep2: iscu_2fe2s_2fe2s + apo_protein_2fe2s + $atp + $h2o_cell => iscu_2fe2s + holo_protein_2fe2s + $adp + $pi_158 + $h_cell; iscu_2fe2s_2fe2s*apo_protein_2fe2s*p_isc2Fe2Srep_kcat/(p_isc2Fe2Srep_Km_apo_protein_2fe2s + apo_protein_2fe2s);
  dXTSNbe: ds_dxtsn + $h2o_cell => ds_APg + xan; alka*ds_dxtsn*p_dXTSNbe_kcat/(p_dXTSNbe_Km_ds_dxtsn + ds_dxtsn);  // modifiers: alka
  dINbe: ds_din + $h2o_cell => ds_APa + hxan; alka*ds_din*p_dINbe_kcat/(p_dINbe_Km_ds_din + ds_din);  // modifiers: alka
  dURIbe: ds_duri + $h2o_cell => ds_APc + ura; ung*ds_duri*p_dURIbe_kcat/(p_dURIbe_Km_ds_duri + ds_duri);  // modifiers: ung
  APgrem: ds_APg + 2 $h2o_cell => ds_gap_g + 2 $h_cell + dr5p; xth*ds_APg*p_APrem_kcat/(p_APrem_Km_ds_AP + ds_APg);  // modifiers: xth
  AParem: ds_APa + 2 $h2o_cell => ds_gap_a + 2 $h_cell + dr5p; xth*ds_APa*p_APrem_kcat/(p_APrem_Km_ds_AP + ds_APa);  // modifiers: xth
  APcrem: ds_APc + 2 $h2o_cell => ds_gap_c + 2 $h_cell + dr5p; xth*ds_APc*p_APrem_kcat/(p_APrem_Km_ds_AP + ds_APc);  // modifiers: xth
  dGSNpol: ds_gap_g + $dgtp => ds_dgsn_nick + ppi; p_DNApol_kcat*dnapol*dgtp*ds_gap_g/(p_DNApol_KiDNA*p_dGSNpol_KdGTP + p_DNApol_KDNA*dgtp + p_dGSNpol_KdGTP*ds_gap_g*(1 + p_DNApol_KiDNA/p_DNApol_KiDNAp) + ds_gap_g*dgtp*(1 + p_DNApol_KDNA/p_DNApol_KiDNAp));  // modifiers: dnapol
  dDADpol: ds_gap_a + $datp => ds_dad_2_nick + ppi; p_DNApol_kcat*dnapol*datp*ds_gap_a/(p_DNApol_KiDNA*p_dDADpol_KdATP + p_DNApol_KDNA*datp + p_dDADpol_KdATP*ds_gap_a*(1 + p_DNApol_KiDNA/p_DNApol_KiDNAp) + ds_gap_a*datp*(1 + p_DNApol_KDNA/p_DNApol_KiDNAp));  // modifiers: dnapol
  dCYTpol: ds_gap_c + $dctp => ds_dcyt_nick + ppi; p_DNApol_kcat*dnapol*dctp*ds_gap_c/(p_DNApol_KiDNA*p_dCYTpol_KdCTP + p_DNApol_KDNA*dctp + p_dCYTpol_KdCTP*ds_gap_c*(1 + p_DNApol_KiDNA/p_DNApol_KiDNAp) + ds_gap_c*dctp*(1 + p_DNApol_KDNA/p_DNApol_KiDNAp));  // modifiers: dnapol
  dGSNlig: ds_dgsn_nick + $nad => ds_dgsn + $amp + $nmn + $h_cell; dnalig*ds_dgsn_nick*nad*p_DNAlig_kcat/(ds_dgsn_nick*nad + p_DNAlig_Km_nad*ds_dgsn_nick + p_DNAlig_Km_nick*nad);  // modifiers: dnalig
  dDADlig: ds_dad_2_nick + $nad => ds_dad_2 + $amp + $nmn + $h_cell; dnalig*ds_dad_2_nick*nad*p_DNAlig_kcat/(ds_dad_2_nick*nad + p_DNAlig_Km_nad*ds_dad_2_nick + p_DNAlig_Km_nick*nad);  // modifiers: dnalig
  dCYTlig: ds_dcyt_nick + $nad => ds_dcyt + $amp + $nmn + $h_cell; dnalig*ds_dcyt_nick*nad*p_DNAlig_kcat/(ds_dcyt_nick*nad + p_DNAlig_Km_nad*ds_dcyt_nick + p_DNAlig_Km_nick*nad);  // modifiers: dnalig
  GSFDH: gsno + 2 $nadh + 2 $h_cell + gsh => gssg + nh3 + $h2o_cell + 2 $nad; p_GSFDH_kcat*gsfdh*gsno/(gsno + p_GSFDH_Km_gsno);  // modifiers: gsfdh
  GOR: gssg + $h_cell + $nadph => 2 gsh + $nadp; gor*(p_GOR_kcat*gssg*nadph + p_GOR_V2*gssg*gssg*nadph)/(p_GOR_Km_nadph*gssg + p_GOR_Km_gssg*nadph + gssg*nadph + p_GOR_K3*gssg*gssg + p_GOR_K4*gssg*gssg*nadph);  // modifiers: gor
  TRXR: trxox + $nadph + $h_cell => trxrd + $nadp; p_TRXR_kcat*trxR*trxox*nadph/(trxox*nadph + p_TRXR_Km_nadph*trxox + p_TRXR_Km_trxox*nadph);  // modifiers: trxR
  TRX_GSNO: trxrd + gsno => trxox + hno + gsh; p_TRX_GSNO_kcat*trxrd*gsno/(p_TRX_GSNO_Km_gsno + gsno);
  CYTbo_NO: no_cell + cytbo -> cytbo_no; p_CYTbo_kon_no*no_cell*cytbo/(1 + o2_cell/p_CYTbo_Km_o2) - p_CYTbo_koff_no*cytbo_no;  // modifiers: o2_cell
  CYTbd_NO: no_cell + cytbd -> cytbd_no; p_CYTbd_kon_no*no_cell*cytbd/(1 + o2_cell/p_CYTbd_Km_o2) - p_CYTbd_koff_no*cytbd_no;  // modifiers: o2_cell
  NORVred: NorVox + $nadh => NorVred + $nad + $h_cell; p_NORVred_k*NorVox*nadh/(1 + no_cell/p_NORVred_Ki_no);  // modifiers: no_cell
  NORVno: NorVred + 2 no_cell + 2 $h_cell => NorVox + n2o + $h2o_cell; p_NORVno_kcat*NorVred*no_cell/(p_NORVno_Km_no + no_cell);
  NRFAno: no_cell + 6 $h_cell + 2.5 $nadh => nh4 + $h2o_cell + 2.5 $nad + 2.5 $h_cell; p_NRFAno_kcat*NrfA*no_cell/(no_cell + p_NRFAno_Km_no);  // modifiers: NrfA
  EX_O2air: $o2_air -> o2_media; p_kLa_o2*(o2_air - o2_media);
  HMP_translate: $NULL_cell => hmpFe3; p_HMPtranslate_k*mRNA_hmp*(1 + p_translate_kact_o2*o2_cell/(p_translate_Kd_o2 + o2_cell));  // modifiers: o2_cell, mRNA_hmp
  NORV_translate: $NULL_cell => NorVox; p_NORVtranslate_k*mRNA_norV*(1 + p_translate_kact_o2*o2_cell/(p_translate_Kd_o2 + o2_cell));  // modifiers: mRNA_norV, o2_cell
  NRFA_translate: $NULL_cell => NrfA; p_NRFAtranslate_k*mRNA_nrfA*(1 + p_translate_kact_o2*o2_cell/(p_translate_Kd_o2 + o2_cell));  // modifiers: mRNA_nrfA, o2_cell
  CYTbd_resp: o2_cell + 2 q8h2 => 2 $h2o_cell + 2 q8; p_CYTbd_kcat_o2*cytbd*q8h2*q8h2*o2_cell/(p_CYTbd_Kiq1Kmq2*o2_cell + p_CYTbd_Km_q8h2*q8h2*o2_cell + p_CYTbd_Km_o2*q8h2*q8h2 + q8h2*q8h2*o2_cell);  // modifiers: cytbd
  CYTbo_resp: o2_cell + 2 q8h2 => 2 $h2o_cell + 2 q8; p_CYTbo_kcat_o2*cytbo*q8h2*q8h2*o2_cell/(p_CYTbo_Kiq1Kmq2*o2_cell + p_CYTbo_Km_q8h2*q8h2*o2_cell + p_CYTbo_Km_o2*q8h2*q8h2 + q8h2*q8h2*o2_cell);  // modifiers: cytbo
  NDH2: $nadh + q8 + $h_cell => $nad + q8h2; p_NDH2_kcat*NDH2_cell*q8*nadh/(p_NDH2_Kd_Q*p_NDH2_Km_nadh + q8*nadh + p_NDH2_Km_nadh*q8 + p_NDH2_Km_q8*nadh);  // modifiers: NDH2_cell
  NDH1: $nadh + q8 + $h_cell => $nad + q8h2; (holo_protein_2fe2s + holo_protein_4fe4s)/(holo_protein_2fe2s + holo_protein_4fe4s + protein_2fe2s_2dnic + protein_4fe4s_2rre + apo_protein_2fe2s + apo_protein_4fe4s)*p_NDH1_kcat*NDH1_cell*q8*nadh/(p_NDH1_Kd_Q*p_NDH1_Km_nadh + q8*nadh + p_NDH1_Km_nadh*q8 + p_NDH1_Km_q8*nadh);  // modifiers: holo_protein_2fe2s, holo_protein_4fe4s, protein_2fe2s_2dnic, protein_4fe4s_2rre, apo_protein_2fe2s, apo_protein_4fe4s, NDH1_cell
  HMP_transcr: $NULL_cell => mRNA_hmp; p_HMPtranscr_kbasal + no_cell/(no_cell + p_HMPtranscr_Kno)*(p_HMPtranscr_kmax - p_HMPtranscr_kbasal);  // modifiers: no_cell
  RNA_hmp_deg: mRNA_hmp => $NULL_cell; p_RNA_hmp_kdeg*mRNA_hmp;
  NORV_transcr: $NULL_cell => mRNA_norV; p_NORVtranscr_kbasal + no_cell/(no_cell + p_NORVtranscr_Kno)*(p_NORVtranscr_kmax - p_NORVtranscr_kbasal);  // modifiers: no_cell
  RNA_norV_deg: mRNA_norV => $NULL_cell; p_RNA_norV_kdeg*mRNA_norV;
  NRFA_transcr: $NULL_cell => mRNA_nrfA; p_NRFAtranscr_kmax*p_NRFAtranscr_Ko2*no2_cell/(p_NRFAtranscr_Kno2*p_NRFAtranscr_Ko2 + p_NRFAtranscr_Ko2*no2_cell + p_NRFAtranscr_Kno2*o2_cell + no2_cell*o2_cell);  // modifiers: no2_cell, o2_cell
  RNA_nrfA_deg: mRNA_nrfA => $NULL_cell; p_RNA_nrfA_kdeg*mRNA_nrfA;
  // Reaction was added to permit rapid diffusion of NO across membrane.
  DIFFUSION_NO: no_media -> no_cell; p_k_DIFFUSION_NO*(no_media - no_cell);
  // Reaction was added to permit rapid diffusion of O2 across membrane.
  DIFFUSION_O2: o2_media -> o2_cell; p_k_DIFFUSION_O2*(o2_media - o2_cell);

  // Unit definitions:
  unit MWBUILTINPREFIX_milli_MWBUILTINUNIT_liter = metre^3 * 1e-6 dimensionless; MWBUILTINPREFIX_milli_MWBUILTINUNIT_liter is "milliliter";
  unit MWBUILTINUNIT_liter = metre^3 * 1e-3 dimensionless;
  unit MWDERIVEDUNIT_1__micromolarity___2_hour = metre^6 * 277.7778 dimensionless / (mole^2 * second); MWDERIVEDUNIT_1__micromolarity___2_hour is "1/(micromolarity^2*hour)";
  unit MWDERIVEDUNIT_1__micromolarity_hour = metre^3 * 0.2777778 dimensionless / (mole * second); MWDERIVEDUNIT_1__micromolarity_hour is "1/(micromolarity*hour)";
  unit MWDERIVEDUNIT_1__hour = 2.777778e-4 dimensionless / second; MWDERIVEDUNIT_1__hour is "1/hour";
  unit MWBUILTINPREFIX_micro_MWBUILTINUNIT_molarity = mole * 1e-3 dimensionless / metre^3; MWBUILTINPREFIX_micro_MWBUILTINUNIT_molarity is "micromolarity";
  unit MWDERIVEDUNIT_1__micromolarity = metre^3 * 1000 dimensionless / mole; MWDERIVEDUNIT_1__micromolarity is "1/micromolarity";
  unit MWDERIVEDUNIT_micromolarity___2 = mole^2 * 1e-6 dimensionless / metre^6; MWDERIVEDUNIT_micromolarity___2 is "micromolarity^2";
  unit MWDERIVEDUNIT_micromolarity__hour = mole * 2.777778e-7 dimensionless / (metre^3 * second); MWDERIVEDUNIT_micromolarity__hour is "micromolarity/hour";
end
