// SBML level 2 version 1
// Created by The MathWorks, Inc. SimBiology tool, Version 3.0

model MODEL1601250000()
  // Tortolina2015 - Multiple signalling pathway associated with colorectal cancer
  // biomodels.db:MODEL1601250000

  // Compartments:
  compartment unnamed = 1;

  // Species:
  substanceOnly species R in unnamed = 100;  // substance in MWBUILTINPREFIX_nano_MWBUILTINUNIT_mole
  substanceOnly species $EGF in unnamed = 0.01;  // substance in MWBUILTINPREFIX_nano_MWBUILTINUNIT_mole
  substanceOnly species Rl in unnamed = 0;  // substance in MWBUILTINPREFIX_nano_MWBUILTINUNIT_mole
  substanceOnly species Rl2 in unnamed = 0;  // substance in MWBUILTINPREFIX_nano_MWBUILTINUNIT_mole
  substanceOnly species Rl2P in unnamed = 0;  // substance in MWBUILTINPREFIX_nano_MWBUILTINUNIT_mole
  substanceOnly species PLCy in unnamed = 105;  // substance in MWBUILTINPREFIX_nano_MWBUILTINUNIT_mole
  substanceOnly species RP_PL in unnamed = 0;  // substance in MWBUILTINPREFIX_nano_MWBUILTINUNIT_mole
  substanceOnly species RP_PLP in unnamed = 0;  // substance in MWBUILTINPREFIX_nano_MWBUILTINUNIT_mole
  substanceOnly species PLCyP in unnamed = 0;  // substance in MWBUILTINPREFIX_nano_MWBUILTINUNIT_mole
  substanceOnly species Grb in unnamed = 85;  // substance in MWBUILTINPREFIX_nano_MWBUILTINUNIT_mole
  substanceOnly species RP_G in unnamed = 0;  // substance in MWBUILTINPREFIX_nano_MWBUILTINUNIT_mole
  substanceOnly species SOS in unnamed = 10;  // substance in MWBUILTINPREFIX_nano_MWBUILTINUNIT_mole
  substanceOnly species RP_G_S in unnamed = 0;  // substance in MWBUILTINPREFIX_nano_MWBUILTINUNIT_mole
  substanceOnly species G_S in unnamed = 0;  // substance in MWBUILTINPREFIX_nano_MWBUILTINUNIT_mole
  substanceOnly species Shc in unnamed = 100;  // substance in MWBUILTINPREFIX_nano_MWBUILTINUNIT_mole
  substanceOnly species RP_Sh in unnamed = 0;  // substance in MWBUILTINPREFIX_nano_MWBUILTINUNIT_mole
  substanceOnly species RP_ShP in unnamed = 0;  // substance in MWBUILTINPREFIX_nano_MWBUILTINUNIT_mole
  substanceOnly species ShP in unnamed = 0;  // substance in MWBUILTINPREFIX_nano_MWBUILTINUNIT_mole
  substanceOnly species RP_ShP_G in unnamed = 0;  // substance in MWBUILTINPREFIX_nano_MWBUILTINUNIT_mole
  substanceOnly species ShP_G in unnamed = 0;  // substance in MWBUILTINPREFIX_nano_MWBUILTINUNIT_mole
  substanceOnly species RP_ShP_G_S in unnamed = 0;  // substance in MWBUILTINPREFIX_nano_MWBUILTINUNIT_mole
  substanceOnly species ShP_G_S in unnamed = 0;  // substance in MWBUILTINPREFIX_nano_MWBUILTINUNIT_mole
  substanceOnly species Ras_GDP in unnamed = 0;  // substance in MWBUILTINPREFIX_nano_MWBUILTINUNIT_mole
  substanceOnly species Ras in unnamed = 85;  // substance in MWBUILTINPREFIX_nano_MWBUILTINUNIT_mole
  substanceOnly species $GDP in unnamed = 500;  // substance in MWBUILTINPREFIX_nano_MWBUILTINUNIT_mole
  substanceOnly species $GTP in unnamed = 10000;  // substance in MWBUILTINPREFIX_nano_MWBUILTINUNIT_mole
  substanceOnly species Ras_GTP in unnamed = 0;  // substance in MWBUILTINPREFIX_nano_MWBUILTINUNIT_mole
  substanceOnly species RP_ShP_G_S_Ras_GDP in unnamed = 0;  // substance in MWBUILTINPREFIX_nano_MWBUILTINUNIT_mole
  substanceOnly species RP_ShP_G_S_Ras in unnamed = 0;  // substance in MWBUILTINPREFIX_nano_MWBUILTINUNIT_mole
  substanceOnly species RP_ShP_G_S_Ras_GTP in unnamed = 0;  // substance in MWBUILTINPREFIX_nano_MWBUILTINUNIT_mole
  substanceOnly species RP_G_S_Ras_GDP in unnamed = 0;  // substance in MWBUILTINPREFIX_nano_MWBUILTINUNIT_mole
  substanceOnly species RP_G_S_Ras in unnamed = 0;  // substance in MWBUILTINPREFIX_nano_MWBUILTINUNIT_mole
  substanceOnly species RP_G_S_Ras_GTP in unnamed = 0;  // substance in MWBUILTINPREFIX_nano_MWBUILTINUNIT_mole
  substanceOnly species Raf_unnamed_35 in unnamed = 50;  // substance in MWBUILTINPREFIX_nano_MWBUILTINUNIT_mole
  substanceOnly species Raf_Ras_GTP in unnamed = 0;  // substance in MWBUILTINPREFIX_nano_MWBUILTINUNIT_mole
  substanceOnly species Raf_unnamed_37 in unnamed = 0; Raf_unnamed_37 is "Raf*";  // substance in MWBUILTINPREFIX_nano_MWBUILTINUNIT_mole
  substanceOnly species Pase1 in unnamed = 50;  // substance in MWBUILTINPREFIX_nano_MWBUILTINUNIT_mole
  substanceOnly species Raf__Pase1_unnamed_39 in unnamed = 0; Raf__Pase1_unnamed_39 is "Raf*_Pase1";  // substance in MWBUILTINPREFIX_nano_MWBUILTINUNIT_mole
  substanceOnly species MEK in unnamed = 200;  // substance in MWBUILTINPREFIX_nano_MWBUILTINUNIT_mole
  substanceOnly species MEK_Raf in unnamed = 0; MEK_Raf is "MEK_Raf*";  // substance in MWBUILTINPREFIX_nano_MWBUILTINUNIT_mole
  substanceOnly species MEKP in unnamed = 0;  // substance in MWBUILTINPREFIX_nano_MWBUILTINUNIT_mole
  substanceOnly species MEKP_Raf in unnamed = 0; MEKP_Raf is "MEKP_Raf*";  // substance in MWBUILTINPREFIX_nano_MWBUILTINUNIT_mole
  substanceOnly species MEKPP in unnamed = 0;  // substance in MWBUILTINPREFIX_nano_MWBUILTINUNIT_mole
  substanceOnly species Pase2 in unnamed = 50;  // substance in MWBUILTINPREFIX_nano_MWBUILTINUNIT_mole
  substanceOnly species MEKPP_Pase2 in unnamed = 0;  // substance in MWBUILTINPREFIX_nano_MWBUILTINUNIT_mole
  substanceOnly species MEKP_Pase2 in unnamed = 0;  // substance in MWBUILTINPREFIX_nano_MWBUILTINUNIT_mole
  substanceOnly species ERK in unnamed = 200;  // substance in MWBUILTINPREFIX_nano_MWBUILTINUNIT_mole
  substanceOnly species ERK_MEKPP in unnamed = 0;  // substance in MWBUILTINPREFIX_nano_MWBUILTINUNIT_mole
  substanceOnly species ERKP in unnamed = 0;  // substance in MWBUILTINPREFIX_nano_MWBUILTINUNIT_mole
  substanceOnly species ERKP_MEKPP in unnamed = 0;  // substance in MWBUILTINPREFIX_nano_MWBUILTINUNIT_mole
  substanceOnly species ERKPP in unnamed = 0;  // substance in MWBUILTINPREFIX_nano_MWBUILTINUNIT_mole
  substanceOnly species Pase3 in unnamed = 100;  // substance in MWBUILTINPREFIX_nano_MWBUILTINUNIT_mole
  substanceOnly species ERKPP_Pase3 in unnamed = 0;  // substance in MWBUILTINPREFIX_nano_MWBUILTINUNIT_mole
  substanceOnly species ERKP_Pase3 in unnamed = 0;  // substance in MWBUILTINPREFIX_nano_MWBUILTINUNIT_mole
  substanceOnly species GAP in unnamed = 12;  // substance in MWBUILTINPREFIX_nano_MWBUILTINUNIT_mole
  substanceOnly species RP_GAP in unnamed = 0;  // substance in MWBUILTINPREFIX_nano_MWBUILTINUNIT_mole
  substanceOnly species RP_GAP_Ras_GTP in unnamed = 0;  // substance in MWBUILTINPREFIX_nano_MWBUILTINUNIT_mole
  substanceOnly species RP_ShP_G_S_ERKPP in unnamed = 0;  // substance in MWBUILTINPREFIX_nano_MWBUILTINUNIT_mole
  substanceOnly species SOSP in unnamed = 0;  // substance in MWBUILTINPREFIX_nano_MWBUILTINUNIT_mole
  substanceOnly species RP_G_S_ERKPP in unnamed = 0;  // substance in MWBUILTINPREFIX_nano_MWBUILTINUNIT_mole
  substanceOnly species Pase5 in unnamed = 50;  // substance in MWBUILTINPREFIX_nano_MWBUILTINUNIT_mole
  substanceOnly species SOSP_Pase5 in unnamed = 0;  // substance in MWBUILTINPREFIX_nano_MWBUILTINUNIT_mole
  substanceOnly species RP_G_GAB in unnamed = 0;  // substance in MWBUILTINPREFIX_nano_MWBUILTINUNIT_mole
  substanceOnly species GAB in unnamed = 50;  // substance in MWBUILTINPREFIX_nano_MWBUILTINUNIT_mole
  substanceOnly species RP_ShP_G_GAB in unnamed = 0;  // substance in MWBUILTINPREFIX_nano_MWBUILTINUNIT_mole
  substanceOnly species RP_G_GABP in unnamed = 0;  // substance in MWBUILTINPREFIX_nano_MWBUILTINUNIT_mole
  substanceOnly species RP_ShP_G_GABP in unnamed = 0;  // substance in MWBUILTINPREFIX_nano_MWBUILTINUNIT_mole
  substanceOnly species RP_G_GABP_PK in unnamed = 0;  // substance in MWBUILTINPREFIX_nano_MWBUILTINUNIT_mole
  substanceOnly species RP_ShP_G_GABP_PK in unnamed = 0;  // substance in MWBUILTINPREFIX_nano_MWBUILTINUNIT_mole
  substanceOnly species RP_G_GABP_PKP in unnamed = 0;  // substance in MWBUILTINPREFIX_nano_MWBUILTINUNIT_mole
  substanceOnly species RP_ShP_G_GABP_PKP in unnamed = 0;  // substance in MWBUILTINPREFIX_nano_MWBUILTINUNIT_mole
  substanceOnly species RP_ShP_G_GABP_GAP in unnamed = 0;  // substance in MWBUILTINPREFIX_nano_MWBUILTINUNIT_mole
  substanceOnly species RP_G_GABP_GAP in unnamed = 0;  // substance in MWBUILTINPREFIX_nano_MWBUILTINUNIT_mole
  substanceOnly species RP_G_GABP_GAP_Ras_GTP in unnamed = 0;  // substance in MWBUILTINPREFIX_nano_MWBUILTINUNIT_mole
  substanceOnly species RP_ShP_G_GABP_GAP_Ras_GTP in unnamed = 0;  // substance in MWBUILTINPREFIX_nano_MWBUILTINUNIT_mole
  substanceOnly species RP_PK in unnamed = 0;  // substance in MWBUILTINPREFIX_nano_MWBUILTINUNIT_mole
  substanceOnly species RP_PKP in unnamed = 0;  // substance in MWBUILTINPREFIX_nano_MWBUILTINUNIT_mole
  substanceOnly species PKP in unnamed = 0;  // substance in MWBUILTINPREFIX_nano_MWBUILTINUNIT_mole
  substanceOnly species PIP3 in unnamed = 0;  // substance in MWBUILTINPREFIX_nano_MWBUILTINUNIT_mole
  substanceOnly species PTEN in unnamed = 50;  // substance in MWBUILTINPREFIX_nano_MWBUILTINUNIT_mole
  substanceOnly species PIP2 in unnamed = 0;  // substance in MWBUILTINPREFIX_nano_MWBUILTINUNIT_mole
  substanceOnly species PKP_PIP2 in unnamed = 0;  // substance in MWBUILTINPREFIX_nano_MWBUILTINUNIT_mole
  substanceOnly species PhoA in unnamed = 100;  // substance in MWBUILTINPREFIX_nano_MWBUILTINUNIT_mole
  substanceOnly species RP_ShP_G_GABP_PhoA in unnamed = 0;  // substance in MWBUILTINPREFIX_nano_MWBUILTINUNIT_mole
  substanceOnly species RP_G_GABP_PhoA in unnamed = 0;  // substance in MWBUILTINPREFIX_nano_MWBUILTINUNIT_mole
  substanceOnly species RP_G_GABP_PKP_PIP2 in unnamed = 0;  // substance in MWBUILTINPREFIX_nano_MWBUILTINUNIT_mole
  substanceOnly species RP_ShP_G_GABP_PKP_PIP2 in unnamed = 0;  // substance in MWBUILTINPREFIX_nano_MWBUILTINUNIT_mole
  substanceOnly species GABP in unnamed = 0;  // substance in MWBUILTINPREFIX_nano_MWBUILTINUNIT_mole
  substanceOnly species GABP_PhoA in unnamed = 0;  // substance in MWBUILTINPREFIX_nano_MWBUILTINUNIT_mole
  substanceOnly species AKT in unnamed = 100;  // substance in MWBUILTINPREFIX_nano_MWBUILTINUNIT_mole
  substanceOnly species AKT_PIP3 in unnamed = 0;  // substance in MWBUILTINPREFIX_nano_MWBUILTINUNIT_mole
  substanceOnly species GAB_PIP3 in unnamed = 0;  // substance in MWBUILTINPREFIX_nano_MWBUILTINUNIT_mole
  substanceOnly species GABP_PIP3 in unnamed = 0;  // substance in MWBUILTINPREFIX_nano_MWBUILTINUNIT_mole
  substanceOnly species RP_G_GAB_PIP3 in unnamed = 0;  // substance in MWBUILTINPREFIX_nano_MWBUILTINUNIT_mole
  substanceOnly species RP_ShP_G_GAB_PIP3 in unnamed = 0;  // substance in MWBUILTINPREFIX_nano_MWBUILTINUNIT_mole
  substanceOnly species PDK1 in unnamed = 100;  // substance in MWBUILTINPREFIX_nano_MWBUILTINUNIT_mole
  substanceOnly species AKT_PIP3_PDK1 in unnamed = 0;  // substance in MWBUILTINPREFIX_nano_MWBUILTINUNIT_mole
  substanceOnly species AKTP in unnamed = 0;  // substance in MWBUILTINPREFIX_nano_MWBUILTINUNIT_mole
  substanceOnly species TAKT in unnamed = 50;  // substance in MWBUILTINPREFIX_nano_MWBUILTINUNIT_mole
  substanceOnly species AKTP_TAKT in unnamed = 0;  // substance in MWBUILTINPREFIX_nano_MWBUILTINUNIT_mole
  substanceOnly species GSK in unnamed = 50;  // substance in MWBUILTINPREFIX_nano_MWBUILTINUNIT_mole
  substanceOnly species GSKP in unnamed = 0;  // substance in MWBUILTINPREFIX_nano_MWBUILTINUNIT_mole
  substanceOnly species PhoB in unnamed = 50;  // substance in MWBUILTINPREFIX_nano_MWBUILTINUNIT_mole
  substanceOnly species PKP_PhoB in unnamed = 0;  // substance in MWBUILTINPREFIX_nano_MWBUILTINUNIT_mole
  substanceOnly species RP_G_GABP_PKP_PhoB in unnamed = 0;  // substance in MWBUILTINPREFIX_nano_MWBUILTINUNIT_mole
  substanceOnly species RP_ShP_G_GABP_PKP_PhoB in unnamed = 0;  // substance in MWBUILTINPREFIX_nano_MWBUILTINUNIT_mole
  substanceOnly species RP_PKP_PIP2 in unnamed = 0;  // substance in MWBUILTINPREFIX_nano_MWBUILTINUNIT_mole
  substanceOnly species GSKP_PhoC in unnamed = 0;  // substance in MWBUILTINPREFIX_nano_MWBUILTINUNIT_mole
  substanceOnly species PhoC in unnamed = 20;  // substance in MWBUILTINPREFIX_nano_MWBUILTINUNIT_mole
  substanceOnly species PI3K in unnamed = 200;  // substance in MWBUILTINPREFIX_nano_MWBUILTINUNIT_mole
  substanceOnly species Raf_unnamed_112 in unnamed = 0; Raf_unnamed_112 is "Raf**";  // substance in MWBUILTINPREFIX_nano_MWBUILTINUNIT_mole
  substanceOnly species Raf___AKTP in unnamed = 0; Raf___AKTP is "Raf*_ AKTP";  // substance in MWBUILTINPREFIX_nano_MWBUILTINUNIT_mole
  substanceOnly species Raf__Pase1_unnamed_114 in unnamed = 0; Raf__Pase1_unnamed_114 is "Raf**_Pase1";  // substance in MWBUILTINPREFIX_nano_MWBUILTINUNIT_mole
  substanceOnly species AKTP__GSK in unnamed = 0;  // substance in MWBUILTINPREFIX_nano_MWBUILTINUNIT_mole
  substanceOnly species APC in unnamed = 100;  // substance in MWBUILTINPREFIX_nano_MWBUILTINUNIT_mole
  substanceOnly species BetaCatenin in unnamed = 0;  // substance in MWBUILTINPREFIX_nano_MWBUILTINUNIT_mole
  substanceOnly species PhoE in unnamed = 10;  // substance in MWBUILTINPREFIX_nano_MWBUILTINUNIT_mole
  substanceOnly species R_R in unnamed = 0;  // substance in MWBUILTINPREFIX_nano_MWBUILTINUNIT_mole
  substanceOnly species Rl_R in unnamed = 0;  // substance in MWBUILTINPREFIX_nano_MWBUILTINUNIT_mole
  substanceOnly species RlP_RP in unnamed = 0;  // substance in MWBUILTINPREFIX_nano_MWBUILTINUNIT_mole
  substanceOnly species RP_RP in unnamed = 0;  // substance in MWBUILTINPREFIX_nano_MWBUILTINUNIT_mole
  substanceOnly species RP in unnamed = 0;  // substance in MWBUILTINPREFIX_nano_MWBUILTINUNIT_mole
  substanceOnly species RP_R in unnamed = 0;  // substance in MWBUILTINPREFIX_nano_MWBUILTINUNIT_mole
  substanceOnly species PTP in unnamed = 100;  // substance in MWBUILTINPREFIX_nano_MWBUILTINUNIT_mole
  substanceOnly species ERB in unnamed = 1;  // substance in MWBUILTINPREFIX_nano_MWBUILTINUNIT_mole
  substanceOnly species R_ERB in unnamed = 0;  // substance in MWBUILTINPREFIX_nano_MWBUILTINUNIT_mole
  substanceOnly species Rl_ERB in unnamed = 0;  // substance in MWBUILTINPREFIX_nano_MWBUILTINUNIT_mole
  substanceOnly species RlP_ERBP in unnamed = 0;  // substance in MWBUILTINPREFIX_nano_MWBUILTINUNIT_mole
  substanceOnly species RP_ERBP in unnamed = 0;  // substance in MWBUILTINPREFIX_nano_MWBUILTINUNIT_mole
  substanceOnly species ERBP in unnamed = 0;  // substance in MWBUILTINPREFIX_nano_MWBUILTINUNIT_mole
  substanceOnly species R_ERBP in unnamed = 0;  // substance in MWBUILTINPREFIX_nano_MWBUILTINUNIT_mole
  substanceOnly species RlP in unnamed = 0;  // substance in MWBUILTINPREFIX_nano_MWBUILTINUNIT_mole
  substanceOnly species RP_ERB in unnamed = 0;  // substance in MWBUILTINPREFIX_nano_MWBUILTINUNIT_mole
  substanceOnly species ERBP_ERB in unnamed = 0;  // substance in MWBUILTINPREFIX_nano_MWBUILTINUNIT_mole
  substanceOnly species ERBP_ERBP in unnamed = 0;  // substance in MWBUILTINPREFIX_nano_MWBUILTINUNIT_mole
  substanceOnly species ERB_ERB in unnamed = 0;  // substance in MWBUILTINPREFIX_nano_MWBUILTINUNIT_mole
  substanceOnly species PTP1E in unnamed = 50;  // substance in MWBUILTINPREFIX_nano_MWBUILTINUNIT_mole
  substanceOnly species PTP1E_ShP in unnamed = 0;  // substance in MWBUILTINPREFIX_nano_MWBUILTINUNIT_mole
  substanceOnly species PaseX in unnamed = 50;  // substance in MWBUILTINPREFIX_nano_MWBUILTINUNIT_mole
  substanceOnly species PLCyP_PaseX in unnamed = 0;  // substance in MWBUILTINPREFIX_nano_MWBUILTINUNIT_mole
  substanceOnly species ERBP_PL in unnamed = 0;  // substance in MWBUILTINPREFIX_nano_MWBUILTINUNIT_mole
  substanceOnly species ERBP_PLP in unnamed = 0;  // substance in MWBUILTINPREFIX_nano_MWBUILTINUNIT_mole
  substanceOnly species ERBP_G in unnamed = 0;  // substance in MWBUILTINPREFIX_nano_MWBUILTINUNIT_mole
  substanceOnly species ERBP_G_S in unnamed = 0;  // substance in MWBUILTINPREFIX_nano_MWBUILTINUNIT_mole
  substanceOnly species ERBP_Sh in unnamed = 0;  // substance in MWBUILTINPREFIX_nano_MWBUILTINUNIT_mole
  substanceOnly species ERBP_ShP in unnamed = 0;  // substance in MWBUILTINPREFIX_nano_MWBUILTINUNIT_mole
  substanceOnly species ERBP_ShP_G in unnamed = 0;  // substance in MWBUILTINPREFIX_nano_MWBUILTINUNIT_mole
  substanceOnly species ERBP_ShP_G_S in unnamed = 0;  // substance in MWBUILTINPREFIX_nano_MWBUILTINUNIT_mole
  substanceOnly species ERBP_ShP_G_S_Ras in unnamed = 0;  // substance in MWBUILTINPREFIX_nano_MWBUILTINUNIT_mole
  substanceOnly species ERBP_ShP_G_S_Ras_GTP in unnamed = 0;  // substance in MWBUILTINPREFIX_nano_MWBUILTINUNIT_mole
  substanceOnly species ERBP_G_S_Ras_GDP in unnamed = 0;  // substance in MWBUILTINPREFIX_nano_MWBUILTINUNIT_mole
  substanceOnly species ERBP_G_S_Ras in unnamed = 0;  // substance in MWBUILTINPREFIX_nano_MWBUILTINUNIT_mole
  substanceOnly species ERBP_G_S_Ras_GTP in unnamed = 0;  // substance in MWBUILTINPREFIX_nano_MWBUILTINUNIT_mole
  substanceOnly species ERBP_GAP in unnamed = 0;  // substance in MWBUILTINPREFIX_nano_MWBUILTINUNIT_mole
  substanceOnly species ERBP_GAP_Ras_GTP in unnamed = 0;  // substance in MWBUILTINPREFIX_nano_MWBUILTINUNIT_mole
  substanceOnly species ERBP_ShP_G_S_ERKPP in unnamed = 0;  // substance in MWBUILTINPREFIX_nano_MWBUILTINUNIT_mole
  substanceOnly species ERBP_G_S_ERKPP in unnamed = 0;  // substance in MWBUILTINPREFIX_nano_MWBUILTINUNIT_mole
  substanceOnly species ERBP_G_GAB in unnamed = 0;  // substance in MWBUILTINPREFIX_nano_MWBUILTINUNIT_mole
  substanceOnly species ERBP_ShP_G_GAB in unnamed = 0;  // substance in MWBUILTINPREFIX_nano_MWBUILTINUNIT_mole
  substanceOnly species ERBP_G_GABP in unnamed = 0;  // substance in MWBUILTINPREFIX_nano_MWBUILTINUNIT_mole
  substanceOnly species ERBP_ShP_G_GABP in unnamed = 0;  // substance in MWBUILTINPREFIX_nano_MWBUILTINUNIT_mole
  substanceOnly species ERBP_G_GABP_PK in unnamed = 0;  // substance in MWBUILTINPREFIX_nano_MWBUILTINUNIT_mole
  substanceOnly species ERBP_G_GABP_PKP in unnamed = 0;  // substance in MWBUILTINPREFIX_nano_MWBUILTINUNIT_mole
  substanceOnly species ERBP_ShP_G_GABP_PK in unnamed = 0;  // substance in MWBUILTINPREFIX_nano_MWBUILTINUNIT_mole
  substanceOnly species ERBP_ShP_G_GABP_PKP in unnamed = 0;  // substance in MWBUILTINPREFIX_nano_MWBUILTINUNIT_mole
  substanceOnly species ERBP_ShP_G_GABP_GAP in unnamed = 0;  // substance in MWBUILTINPREFIX_nano_MWBUILTINUNIT_mole
  substanceOnly species ERBP_G_GABP_GAP in unnamed = 0;  // substance in MWBUILTINPREFIX_nano_MWBUILTINUNIT_mole
  substanceOnly species ERBP_G_GABP_GAP_Ras_GTP in unnamed = 0;  // substance in MWBUILTINPREFIX_nano_MWBUILTINUNIT_mole
  substanceOnly species ERBP_ShP_G_GABP_GAP_Ras_GTP in unnamed = 0;  // substance in MWBUILTINPREFIX_nano_MWBUILTINUNIT_mole
  substanceOnly species ERBP_PK in unnamed = 0;  // substance in MWBUILTINPREFIX_nano_MWBUILTINUNIT_mole
  substanceOnly species ERBP_PKP in unnamed = 0;  // substance in MWBUILTINPREFIX_nano_MWBUILTINUNIT_mole
  substanceOnly species ERBP_ShP_G_GABP_PhoA in unnamed = 0;  // substance in MWBUILTINPREFIX_nano_MWBUILTINUNIT_mole
  substanceOnly species ERBP_G_GABP_PhoA in unnamed = 0;  // substance in MWBUILTINPREFIX_nano_MWBUILTINUNIT_mole
  substanceOnly species ERBP_G_GABP_PKP_PIP2 in unnamed = 0;  // substance in MWBUILTINPREFIX_nano_MWBUILTINUNIT_mole
  substanceOnly species ERBP_ShP_G_GABP_PKP_PIP2 in unnamed = 0;  // substance in MWBUILTINPREFIX_nano_MWBUILTINUNIT_mole
  substanceOnly species ERBP_G_GABP_PKP_PIP3 in unnamed = 0;  // substance in MWBUILTINPREFIX_nano_MWBUILTINUNIT_mole
  substanceOnly species ERBP_ShP_G_GABP_PKP_PIP3 in unnamed = 0;  // substance in MWBUILTINPREFIX_nano_MWBUILTINUNIT_mole
  substanceOnly species ERBP_G_GAB_PIP3 in unnamed = 0;  // substance in MWBUILTINPREFIX_nano_MWBUILTINUNIT_mole
  substanceOnly species ERBP_ShP_G_GAB_PIP3 in unnamed = 0;  // substance in MWBUILTINPREFIX_nano_MWBUILTINUNIT_mole
  substanceOnly species ERBP_G_GABP_PKP_PhoB in unnamed = 0;  // substance in MWBUILTINPREFIX_nano_MWBUILTINUNIT_mole
  substanceOnly species ERBP_ShP_G_GABP_PKP_PhoB in unnamed = 0;  // substance in MWBUILTINPREFIX_nano_MWBUILTINUNIT_mole
  substanceOnly species ERBP_PKP_PIP2 in unnamed = 0;  // substance in MWBUILTINPREFIX_nano_MWBUILTINUNIT_mole
  substanceOnly species ERBP_ShP_G_S_Ras_GDP in unnamed = 0;  // substance in MWBUILTINPREFIX_nano_MWBUILTINUNIT_mole
  substanceOnly species ERB3P in unnamed = 0;  // substance in MWBUILTINPREFIX_nano_MWBUILTINUNIT_mole
  substanceOnly species ERB3P_PL in unnamed = 0;  // substance in MWBUILTINPREFIX_nano_MWBUILTINUNIT_mole
  substanceOnly species ERB3P_PLP in unnamed = 0;  // substance in MWBUILTINPREFIX_nano_MWBUILTINUNIT_mole
  substanceOnly species ERB3P_G in unnamed = 0;  // substance in MWBUILTINPREFIX_nano_MWBUILTINUNIT_mole
  substanceOnly species ERB3P_G_S in unnamed = 0;  // substance in MWBUILTINPREFIX_nano_MWBUILTINUNIT_mole
  substanceOnly species ERB3P_Sh in unnamed = 0;  // substance in MWBUILTINPREFIX_nano_MWBUILTINUNIT_mole
  substanceOnly species ERB3P_ShP in unnamed = 0;  // substance in MWBUILTINPREFIX_nano_MWBUILTINUNIT_mole
  substanceOnly species ERB3P_ShP_G in unnamed = 0;  // substance in MWBUILTINPREFIX_nano_MWBUILTINUNIT_mole
  substanceOnly species ERB3P_ShP_G_S in unnamed = 0;  // substance in MWBUILTINPREFIX_nano_MWBUILTINUNIT_mole
  substanceOnly species ERB3P_Sh_G_S_Ras_GDP in unnamed = 0;  // substance in MWBUILTINPREFIX_nano_MWBUILTINUNIT_mole
  substanceOnly species ERB3P_Sh_G_S_Ras in unnamed = 0;  // substance in MWBUILTINPREFIX_nano_MWBUILTINUNIT_mole
  substanceOnly species ERB3P_Sh_G_S_Ras_GTP in unnamed = 0;  // substance in MWBUILTINPREFIX_nano_MWBUILTINUNIT_mole
  substanceOnly species ERB3P_G_S_Ras_GDP in unnamed = 0;  // substance in MWBUILTINPREFIX_nano_MWBUILTINUNIT_mole
  substanceOnly species ERB3P_G_S_Ras in unnamed = 0;  // substance in MWBUILTINPREFIX_nano_MWBUILTINUNIT_mole
  substanceOnly species ERB3P_G_S_Ras_GTP in unnamed = 0;  // substance in MWBUILTINPREFIX_nano_MWBUILTINUNIT_mole
  substanceOnly species ERB3P_GAP in unnamed = 0;  // substance in MWBUILTINPREFIX_nano_MWBUILTINUNIT_mole
  substanceOnly species ERB3P_GAP_Ras_GTP in unnamed = 0;  // substance in MWBUILTINPREFIX_nano_MWBUILTINUNIT_mole
  substanceOnly species ERB3P_Sh_G_S_ERKPP in unnamed = 0;  // substance in MWBUILTINPREFIX_nano_MWBUILTINUNIT_mole
  substanceOnly species ERB3P_G_S_ERKPP in unnamed = 0;  // substance in MWBUILTINPREFIX_nano_MWBUILTINUNIT_mole
  substanceOnly species ERB3P_G_GAB in unnamed = 0;  // substance in MWBUILTINPREFIX_nano_MWBUILTINUNIT_mole
  substanceOnly species ERB3P_ShP_G_GAB in unnamed = 0;  // substance in MWBUILTINPREFIX_nano_MWBUILTINUNIT_mole
  substanceOnly species ERB3P_G_GABP in unnamed = 0;  // substance in MWBUILTINPREFIX_nano_MWBUILTINUNIT_mole
  substanceOnly species ERB3P_ShP_G_GABP in unnamed = 0;  // substance in MWBUILTINPREFIX_nano_MWBUILTINUNIT_mole
  substanceOnly species ERB3P_G_GABP_PK in unnamed = 0;  // substance in MWBUILTINPREFIX_nano_MWBUILTINUNIT_mole
  substanceOnly species ERB3P_G_GABP_PKP in unnamed = 0;  // substance in MWBUILTINPREFIX_nano_MWBUILTINUNIT_mole
  substanceOnly species ERB3P_ShP_G_GABP_PK in unnamed = 0;  // substance in MWBUILTINPREFIX_nano_MWBUILTINUNIT_mole
  substanceOnly species ERB3P_ShP_G_GABP_PKP in unnamed = 0;  // substance in MWBUILTINPREFIX_nano_MWBUILTINUNIT_mole
  substanceOnly species ERB3P_ShP_G_GABP_GAP in unnamed = 0;  // substance in MWBUILTINPREFIX_nano_MWBUILTINUNIT_mole
  substanceOnly species ERB3P_G_GABP_GAP in unnamed = 0;  // substance in MWBUILTINPREFIX_nano_MWBUILTINUNIT_mole
  substanceOnly species ERB3P_G_GABP_GAP_Ras_GTP in unnamed = 0;  // substance in MWBUILTINPREFIX_nano_MWBUILTINUNIT_mole
  substanceOnly species ERB3P_ShP_G_GABP_GAP_Ras_GTP in unnamed = 0;  // substance in MWBUILTINPREFIX_nano_MWBUILTINUNIT_mole
  substanceOnly species ERB3P_PK in unnamed = 0;  // substance in MWBUILTINPREFIX_nano_MWBUILTINUNIT_mole
  substanceOnly species ERB3P_PKP in unnamed = 0;  // substance in MWBUILTINPREFIX_nano_MWBUILTINUNIT_mole
  substanceOnly species ERB3P_ShP_G_GABP_PhoA in unnamed = 0;  // substance in MWBUILTINPREFIX_nano_MWBUILTINUNIT_mole
  substanceOnly species ERB3P_G_GABP_PhoA in unnamed = 0;  // substance in MWBUILTINPREFIX_nano_MWBUILTINUNIT_mole
  substanceOnly species ERB3P_G_GABP_PKP_PIP2 in unnamed = 0;  // substance in MWBUILTINPREFIX_nano_MWBUILTINUNIT_mole
  substanceOnly species ERB3P_ShP_G_GABP_PKP_PIP2 in unnamed = 0;  // substance in MWBUILTINPREFIX_nano_MWBUILTINUNIT_mole
  substanceOnly species ERB3P_G_GAB_PIP3 in unnamed = 0;  // substance in MWBUILTINPREFIX_nano_MWBUILTINUNIT_mole
  substanceOnly species ERB3P_ShP_G_GAB_PIP3 in unnamed = 0;  // substance in MWBUILTINPREFIX_nano_MWBUILTINUNIT_mole
  substanceOnly species ERB3P_G_GABP_PKP_PhoB in unnamed = 0;  // substance in MWBUILTINPREFIX_nano_MWBUILTINUNIT_mole
  substanceOnly species ERB3P_ShP_G_GABP_PKP_PhoB in unnamed = 0;  // substance in MWBUILTINPREFIX_nano_MWBUILTINUNIT_mole
  substanceOnly species ERB3P_PKP_PIP2 in unnamed = 0;  // substance in MWBUILTINPREFIX_nano_MWBUILTINUNIT_mole
  substanceOnly species ERB3 in unnamed = 1;  // substance in MWBUILTINPREFIX_nano_MWBUILTINUNIT_mole
  substanceOnly species R_ERB3 in unnamed = 0;  // substance in MWBUILTINPREFIX_nano_MWBUILTINUNIT_mole
  substanceOnly species Rl_ERB3 in unnamed = 0;  // substance in MWBUILTINPREFIX_nano_MWBUILTINUNIT_mole
  substanceOnly species RlP_ERB3P in unnamed = 0;  // substance in MWBUILTINPREFIX_nano_MWBUILTINUNIT_mole
  substanceOnly species RP_ERB3P in unnamed = 0;  // substance in MWBUILTINPREFIX_nano_MWBUILTINUNIT_mole
  substanceOnly species R_ERB3P in unnamed = 0;  // substance in MWBUILTINPREFIX_nano_MWBUILTINUNIT_mole
  substanceOnly species RP_ERB3 in unnamed = 0;  // substance in MWBUILTINPREFIX_nano_MWBUILTINUNIT_mole
  substanceOnly species ERB3_ERB3 in unnamed = 0;  // substance in MWBUILTINPREFIX_nano_MWBUILTINUNIT_mole
  substanceOnly species ERB3P_ERB in unnamed = 0;  // substance in MWBUILTINPREFIX_nano_MWBUILTINUNIT_mole
  substanceOnly species ERB3P_ERB3P in unnamed = 0;  // substance in MWBUILTINPREFIX_nano_MWBUILTINUNIT_mole
  substanceOnly species ERB3_ERB in unnamed = 0;  // substance in MWBUILTINPREFIX_nano_MWBUILTINUNIT_mole
  substanceOnly species EGF_ERB3_ERB in unnamed = 0;  // substance in MWBUILTINPREFIX_nano_MWBUILTINUNIT_mole
  substanceOnly species ERB3_ERBP in unnamed = 0;  // substance in MWBUILTINPREFIX_nano_MWBUILTINUNIT_mole
  substanceOnly species ERB3P_ERBP in unnamed = 0;  // substance in MWBUILTINPREFIX_nano_MWBUILTINUNIT_mole
  substanceOnly species EGF_ERB3 in unnamed = 0;  // substance in MWBUILTINPREFIX_nano_MWBUILTINUNIT_mole
  substanceOnly species EGF_ERB3_R in unnamed = 0;  // substance in MWBUILTINPREFIX_nano_MWBUILTINUNIT_mole
  substanceOnly species EGF_ERB3_RP in unnamed = 0;  // substance in MWBUILTINPREFIX_nano_MWBUILTINUNIT_mole
  substanceOnly species EGF_ERB3P_RP in unnamed = 0;  // substance in MWBUILTINPREFIX_nano_MWBUILTINUNIT_mole
  substanceOnly species EGF_ERB3P in unnamed = 0;  // substance in MWBUILTINPREFIX_nano_MWBUILTINUNIT_mole
  substanceOnly species EGF_ERB3_ERBP in unnamed = 0;  // substance in MWBUILTINPREFIX_nano_MWBUILTINUNIT_mole
  substanceOnly species EGF_ERB3P_ERBP in unnamed = 0;  // substance in MWBUILTINPREFIX_nano_MWBUILTINUNIT_mole
  substanceOnly species EGF_ERB3_ERB3 in unnamed = 0;  // substance in MWBUILTINPREFIX_nano_MWBUILTINUNIT_mole
  substanceOnly species ERB3P_ERB3 in unnamed = 0;  // substance in MWBUILTINPREFIX_nano_MWBUILTINUNIT_mole
  substanceOnly species Rl_ERB3P in unnamed = 0;  // substance in MWBUILTINPREFIX_nano_MWBUILTINUNIT_mole
  substanceOnly species ERBP_PKP_PhoB in unnamed = 0;  // substance in MWBUILTINPREFIX_nano_MWBUILTINUNIT_mole
  substanceOnly species ERB3P_PKP_PhoB in unnamed = 0;  // substance in MWBUILTINPREFIX_nano_MWBUILTINUNIT_mole
  substanceOnly species RP_PKP_PhoB in unnamed = 0;  // substance in MWBUILTINPREFIX_nano_MWBUILTINUNIT_mole
  substanceOnly species Cadh in unnamed = 50;  // substance in MWBUILTINPREFIX_nano_MWBUILTINUNIT_mole
  substanceOnly species BetaCatenin_Cadh in unnamed = 0;  // substance in MWBUILTINPREFIX_nano_MWBUILTINUNIT_mole
  substanceOnly species BetaCatenin_Cadh_PTP in unnamed = 0;  // substance in MWBUILTINPREFIX_nano_MWBUILTINUNIT_mole
  substanceOnly species Cadh_PTP in unnamed = 0;  // substance in MWBUILTINPREFIX_nano_MWBUILTINUNIT_mole
  substanceOnly species BetaCatenin_Cadh_RP in unnamed = 0;  // substance in MWBUILTINPREFIX_nano_MWBUILTINUNIT_mole
  substanceOnly species BetaCateninY654 in unnamed = 0;  // substance in MWBUILTINPREFIX_nano_MWBUILTINUNIT_mole
  substanceOnly species BetaCateninY654_Cadh_PTP in unnamed = 0;  // substance in MWBUILTINPREFIX_nano_MWBUILTINUNIT_mole
  substanceOnly species BetaCatenin_Cadh_ERBP in unnamed = 0;  // substance in MWBUILTINPREFIX_nano_MWBUILTINUNIT_mole
  substanceOnly species $TGF in unnamed = 0.01;  // substance in MWBUILTINPREFIX_nano_MWBUILTINUNIT_mole
  substanceOnly species DIMTGF in unnamed = 0;  // substance in MWBUILTINPREFIX_nano_MWBUILTINUNIT_mole
  substanceOnly species DIMTBRII in unnamed = 0;  // substance in MWBUILTINPREFIX_nano_MWBUILTINUNIT_mole
  substanceOnly species DIMTGF_DIMTBRII in unnamed = 0;  // substance in MWBUILTINPREFIX_nano_MWBUILTINUNIT_mole
  substanceOnly species DIMTBRI in unnamed = 0;  // substance in MWBUILTINPREFIX_nano_MWBUILTINUNIT_mole
  substanceOnly species DIMTGF_DIMTBRII_DIMTBRI in unnamed = 0;  // substance in MWBUILTINPREFIX_nano_MWBUILTINUNIT_mole
  substanceOnly species DIMTGF_DIMTBRII_DIMTBRIP in unnamed = 0;  // substance in MWBUILTINPREFIX_nano_MWBUILTINUNIT_mole
  substanceOnly species PP1C in unnamed = 10;  // substance in MWBUILTINPREFIX_nano_MWBUILTINUNIT_mole
  substanceOnly species SMADII in unnamed = 25;  // substance in MWBUILTINPREFIX_nano_MWBUILTINUNIT_mole
  substanceOnly species DIMTGF_DIMTBRII_DIMTBRIP_SMADII in unnamed = 0;  // substance in MWBUILTINPREFIX_nano_MWBUILTINUNIT_mole
  substanceOnly species TBRI in unnamed = 100;  // substance in MWBUILTINPREFIX_nano_MWBUILTINUNIT_mole
  substanceOnly species TBRII in unnamed = 100;  // substance in MWBUILTINPREFIX_nano_MWBUILTINUNIT_mole
  substanceOnly species SMADIIP in unnamed = 0;  // substance in MWBUILTINPREFIX_nano_MWBUILTINUNIT_mole
  substanceOnly species SMADIII in unnamed = 5;  // substance in MWBUILTINPREFIX_nano_MWBUILTINUNIT_mole
  substanceOnly species DIMTGF_DIMTBRII_DIMTBRIP_SMADIII in unnamed = 0;  // substance in MWBUILTINPREFIX_nano_MWBUILTINUNIT_mole
  substanceOnly species SMADIIIP in unnamed = 0;  // substance in MWBUILTINPREFIX_nano_MWBUILTINUNIT_mole
  substanceOnly species TAK in unnamed = 25;  // substance in MWBUILTINPREFIX_nano_MWBUILTINUNIT_mole
  substanceOnly species DIMTGF_DIMTBRII_DIMTBRIP_TAK in unnamed = 0;  // substance in MWBUILTINPREFIX_nano_MWBUILTINUNIT_mole
  substanceOnly species TAKP in unnamed = 0;  // substance in MWBUILTINPREFIX_nano_MWBUILTINUNIT_mole
  substanceOnly species NLK in unnamed = 50;  // substance in MWBUILTINPREFIX_nano_MWBUILTINUNIT_mole
  substanceOnly species NLKP in unnamed = 0;  // substance in MWBUILTINPREFIX_nano_MWBUILTINUNIT_mole
  substanceOnly species TCFLEF in unnamed = 15;  // substance in MWBUILTINPREFIX_nano_MWBUILTINUNIT_mole
  substanceOnly species NLKP_TCFLEF in unnamed = 0;  // substance in MWBUILTINPREFIX_nano_MWBUILTINUNIT_mole
  substanceOnly species TCFLEFP in unnamed = 0;  // substance in MWBUILTINPREFIX_nano_MWBUILTINUNIT_mole
  substanceOnly species Pase8 in unnamed = 10;  // substance in MWBUILTINPREFIX_nano_MWBUILTINUNIT_mole
  substanceOnly species TCFLEFP_Pase8 in unnamed = 0;  // substance in MWBUILTINPREFIX_nano_MWBUILTINUNIT_mole
  substanceOnly species Pase9 in unnamed = 10;  // substance in MWBUILTINPREFIX_nano_MWBUILTINUNIT_mole
  substanceOnly species TAKP_Pase9 in unnamed = 0;  // substance in MWBUILTINPREFIX_nano_MWBUILTINUNIT_mole
  substanceOnly species NLKP_Pase10 in unnamed = 0;  // substance in MWBUILTINPREFIX_nano_MWBUILTINUNIT_mole
  substanceOnly species Pase10 in unnamed = 10;  // substance in MWBUILTINPREFIX_nano_MWBUILTINUNIT_mole
  substanceOnly species SMAD4 in unnamed = 25;  // substance in MWBUILTINPREFIX_nano_MWBUILTINUNIT_mole
  substanceOnly species SMADIIP_SMAD4 in unnamed = 0;  // substance in MWBUILTINPREFIX_nano_MWBUILTINUNIT_mole
  substanceOnly species SMADIIIP_SMAD4 in unnamed = 0;  // substance in MWBUILTINPREFIX_nano_MWBUILTINUNIT_mole
  substanceOnly species PP1A in unnamed = 10;  // substance in MWBUILTINPREFIX_nano_MWBUILTINUNIT_mole
  substanceOnly species TCFLEF_BetaCatenin in unnamed = 0;  // substance in MWBUILTINPREFIX_nano_MWBUILTINUNIT_mole
  substanceOnly species TFBS in unnamed = 0.00166;  // substance in MWBUILTINPREFIX_nano_MWBUILTINUNIT_mole
  substanceOnly species SMADIIIP_PP1A in unnamed = 0;  // substance in MWBUILTINPREFIX_nano_MWBUILTINUNIT_mole
  substanceOnly species SMADIIP_PP1A in unnamed = 0;  // substance in MWBUILTINPREFIX_nano_MWBUILTINUNIT_mole
  substanceOnly species TCFLEF_BetaCateninY654 in unnamed = 0;  // substance in MWBUILTINPREFIX_nano_MWBUILTINUNIT_mole
  substanceOnly species TCFLEF_BetaCateninY654_TFBS in unnamed = 0;  // substance in MWBUILTINPREFIX_nano_MWBUILTINUNIT_mole
  substanceOnly species TCFLEF_BetaCatenin_TFBS in unnamed = 0;  // substance in MWBUILTINPREFIX_nano_MWBUILTINUNIT_mole
  substanceOnly species DIMTBRIP in unnamed = 0;  // substance in MWBUILTINPREFIX_nano_MWBUILTINUNIT_mole
  substanceOnly species DIMTBRIP_PP1C in unnamed = 0;  // substance in MWBUILTINPREFIX_nano_MWBUILTINUNIT_mole
  substanceOnly species SMADIIP_SMAD4_TFBSI in unnamed = 0;  // substance in MWBUILTINPREFIX_nano_MWBUILTINUNIT_mole
  substanceOnly species SMADIIIP_SMAD4_TFBSI in unnamed = 0;  // substance in MWBUILTINPREFIX_nano_MWBUILTINUNIT_mole
  substanceOnly species Ras_GTP_PK in unnamed = 0;  // substance in MWBUILTINPREFIX_nano_MWBUILTINUNIT_mole
  substanceOnly species Ras_GTP_PKP in unnamed = 0;  // substance in MWBUILTINPREFIX_nano_MWBUILTINUNIT_mole
  substanceOnly species Ras_GTP_PKP_PIP2 in unnamed = 0;  // substance in MWBUILTINPREFIX_nano_MWBUILTINUNIT_mole
  substanceOnly species Ras_GTP_PKP_PhoB in unnamed = 0;  // substance in MWBUILTINPREFIX_nano_MWBUILTINUNIT_mole
  substanceOnly species AP1 in unnamed = 10;  // substance in MWBUILTINPREFIX_nano_MWBUILTINUNIT_mole
  substanceOnly species ERKPP_AP1 in unnamed = 0;  // substance in MWBUILTINPREFIX_nano_MWBUILTINUNIT_mole
  substanceOnly species AP1P in unnamed = 0;  // substance in MWBUILTINPREFIX_nano_MWBUILTINUNIT_mole
  substanceOnly species Pase12 in unnamed = 20;  // substance in MWBUILTINPREFIX_nano_MWBUILTINUNIT_mole
  substanceOnly species AP1P_Pase12 in unnamed = 0;  // substance in MWBUILTINPREFIX_nano_MWBUILTINUNIT_mole
  substanceOnly species TFBSII in unnamed = 0.00083;  // substance in MWBUILTINPREFIX_nano_MWBUILTINUNIT_mole
  substanceOnly species AP1_TFBSII in unnamed = 0;  // substance in MWBUILTINPREFIX_nano_MWBUILTINUNIT_mole
  substanceOnly species AP1P_TFBSII in unnamed = 0;  // substance in MWBUILTINPREFIX_nano_MWBUILTINUNIT_mole
  substanceOnly species $WNT in unnamed = 0.01;  // substance in MWBUILTINPREFIX_nano_MWBUILTINUNIT_mole
  substanceOnly species FRZ in unnamed = 100;  // substance in MWBUILTINPREFIX_nano_MWBUILTINUNIT_mole
  substanceOnly species WNT_FRZ in unnamed = 0;  // substance in MWBUILTINPREFIX_nano_MWBUILTINUNIT_mole
  substanceOnly species LRP6 in unnamed = 100;  // substance in MWBUILTINPREFIX_nano_MWBUILTINUNIT_mole
  substanceOnly species WNT_FRZ_LRP6 in unnamed = 0;  // substance in MWBUILTINPREFIX_nano_MWBUILTINUNIT_mole
  substanceOnly species DVL in unnamed = 100;  // substance in MWBUILTINPREFIX_nano_MWBUILTINUNIT_mole
  substanceOnly species WNT_FRZ_LRP6_DVL in unnamed = 0;  // substance in MWBUILTINPREFIX_nano_MWBUILTINUNIT_mole
  substanceOnly species AXN in unnamed = 0.02;  // substance in MWBUILTINPREFIX_nano_MWBUILTINUNIT_mole
  substanceOnly species AXN_GSK in unnamed = 0;  // substance in MWBUILTINPREFIX_nano_MWBUILTINUNIT_mole
  substanceOnly species AXNP_GSK in unnamed = 0;  // substance in MWBUILTINPREFIX_nano_MWBUILTINUNIT_mole
  substanceOnly species AXNP_GSK_APC in unnamed = 0;  // substance in MWBUILTINPREFIX_nano_MWBUILTINUNIT_mole
  substanceOnly species AXNP_GSK_APCP in unnamed = 0;  // substance in MWBUILTINPREFIX_nano_MWBUILTINUNIT_mole
  substanceOnly species WNT_FRZ_LRP6_DVL_GSK in unnamed = 0;  // substance in MWBUILTINPREFIX_nano_MWBUILTINUNIT_mole
  substanceOnly species WNT_FRZ_LRP6P_DVL_GSK in unnamed = 0;  // substance in MWBUILTINPREFIX_nano_MWBUILTINUNIT_mole
  substanceOnly species WNT_FRZ_LRP6P_DVL_GSK_AXN in unnamed = 0;  // substance in MWBUILTINPREFIX_nano_MWBUILTINUNIT_mole
  substanceOnly species AXNP_GSK_APCP_BetaCatenin in unnamed = 0;  // substance in MWBUILTINPREFIX_nano_MWBUILTINUNIT_mole
  substanceOnly species BetaCateninP in unnamed = 0;  // substance in MWBUILTINPREFIX_nano_MWBUILTINUNIT_mole
  substanceOnly species BetaCateninU in unnamed = 0;  // substance in MWBUILTINPREFIX_nano_MWBUILTINUNIT_mole
  substanceOnly species $BetaCatenin_generator in unnamed = 0.01;  // substance in MWBUILTINPREFIX_nano_MWBUILTINUNIT_mole
  substanceOnly species WNT_FRZ_LRP6P_DVL_GSK_PhoE in unnamed = 0;  // substance in MWBUILTINPREFIX_nano_MWBUILTINUNIT_mole
  substanceOnly species AXNP_GSK_PhoE in unnamed = 0;  // substance in MWBUILTINPREFIX_nano_MWBUILTINUNIT_mole
  substanceOnly species BetaCateninP_PhoE in unnamed = 0;  // substance in MWBUILTINPREFIX_nano_MWBUILTINUNIT_mole
  substanceOnly species AXNP in unnamed = 0;  // substance in MWBUILTINPREFIX_nano_MWBUILTINUNIT_mole
  substanceOnly species AXNP_PhoE in unnamed = 0;  // substance in MWBUILTINPREFIX_nano_MWBUILTINUNIT_mole
  substanceOnly species APCP in unnamed = 0;  // substance in MWBUILTINPREFIX_nano_MWBUILTINUNIT_mole
  substanceOnly species APCP_PhoE in unnamed = 0;  // substance in MWBUILTINPREFIX_nano_MWBUILTINUNIT_mole
  substanceOnly species $PIP2_Gen in unnamed = 0.01;  // substance in MWBUILTINPREFIX_nano_MWBUILTINUNIT_mole
  substanceOnly species PIP2_PLCyP in unnamed = 0;  // substance in MWBUILTINPREFIX_nano_MWBUILTINUNIT_mole
  substanceOnly species IP3 in unnamed = 0;  // substance in MWBUILTINPREFIX_nano_MWBUILTINUNIT_mole
  substanceOnly species DAG in unnamed = 0;  // substance in MWBUILTINPREFIX_nano_MWBUILTINUNIT_mole
  substanceOnly species PKC in unnamed = 50;  // substance in MWBUILTINPREFIX_nano_MWBUILTINUNIT_mole
  substanceOnly species DAG_PKC in unnamed = 0;  // substance in MWBUILTINPREFIX_nano_MWBUILTINUNIT_mole
  substanceOnly species IP3D in unnamed = 0;  // substance in MWBUILTINPREFIX_nano_MWBUILTINUNIT_mole
  substanceOnly species DAGD in unnamed = 0;  // substance in MWBUILTINPREFIX_nano_MWBUILTINUNIT_mole
  substanceOnly species WNT_FRZ_LRP6_TAK in unnamed = 0;  // substance in MWBUILTINPREFIX_nano_MWBUILTINUNIT_mole
  substanceOnly species TAB in unnamed = 25;  // substance in MWBUILTINPREFIX_nano_MWBUILTINUNIT_mole
  substanceOnly species TAKP_TAB in unnamed = 0;  // substance in MWBUILTINPREFIX_nano_MWBUILTINUNIT_mole
  substanceOnly species TAKP_TAB_NLK in unnamed = 0;  // substance in MWBUILTINPREFIX_nano_MWBUILTINUNIT_mole
  substanceOnly species GROUCHO in unnamed = 25;  // substance in MWBUILTINPREFIX_nano_MWBUILTINUNIT_mole
  substanceOnly species GROUCHO_TCFLEF in unnamed = 0;  // substance in MWBUILTINPREFIX_nano_MWBUILTINUNIT_mole
  substanceOnly species GROUCHO_TCFLEF_TFBS in unnamed = 0;  // substance in MWBUILTINPREFIX_nano_MWBUILTINUNIT_mole
  substanceOnly species APC_BetaCatenin in unnamed = 0;  // substance in MWBUILTINPREFIX_nano_MWBUILTINUNIT_mole
  substanceOnly species TFBSI in unnamed = 0.00083;  // substance in MWBUILTINPREFIX_nano_MWBUILTINUNIT_mole
  substanceOnly species SMAD4_TCFLEF in unnamed = 0;  // substance in MWBUILTINPREFIX_nano_MWBUILTINUNIT_mole
  substanceOnly species SMAD4_TCFLEF_TFBS in unnamed = 0;  // substance in MWBUILTINPREFIX_nano_MWBUILTINUNIT_mole
  substanceOnly species DAG_PKC_Raf in unnamed = 0;  // substance in MWBUILTINPREFIX_nano_MWBUILTINUNIT_mole
  substanceOnly species PIP2deg in unnamed = 0;  // substance in MWBUILTINPREFIX_nano_MWBUILTINUNIT_mole
  substanceOnly species $Raf_inhibitor in unnamed = 30;  // substance in MWBUILTINPREFIX_nano_MWBUILTINUNIT_mole
  substanceOnly species Raf__Raf_inhibitor in unnamed = 0; Raf__Raf_inhibitor is "Raf*_Raf_inhibitor";  // substance in MWBUILTINPREFIX_nano_MWBUILTINUNIT_mole
  substanceOnly species $PI3K_inhibitor in unnamed = 0;  // substance in MWBUILTINPREFIX_nano_MWBUILTINUNIT_mole
  substanceOnly species PKP_PI3K_inhibitor in unnamed = 0;  // substance in MWBUILTINPREFIX_nano_MWBUILTINUNIT_mole
  substanceOnly species BetaCateninDeg in unnamed = 0;  // substance in MWBUILTINPREFIX_nano_MWBUILTINUNIT_mole
  substanceOnly species $PanERB in unnamed = 50;  // substance in MWBUILTINPREFIX_nano_MWBUILTINUNIT_mole
  substanceOnly species RP_PanERB in unnamed = 0;  // substance in MWBUILTINPREFIX_nano_MWBUILTINUNIT_mole
  substanceOnly species ERBP_PanERB in unnamed = 0;  // substance in MWBUILTINPREFIX_nano_MWBUILTINUNIT_mole
  substanceOnly species ERB3P_PanERB in unnamed = 0;  // substance in MWBUILTINPREFIX_nano_MWBUILTINUNIT_mole
  substanceOnly species PIP3Deg in unnamed = 0;  // substance in MWBUILTINPREFIX_nano_MWBUILTINUNIT_mole
  substanceOnly species $AKT_inhibi in unnamed = 0;  // substance in MWBUILTINPREFIX_nano_MWBUILTINUNIT_mole
  substanceOnly species AKT_AKT_inhibi in unnamed = 0;  // substance in MWBUILTINPREFIX_nano_MWBUILTINUNIT_mole
  substanceOnly species AXNP_GSK_BetaCatenin in unnamed = 0;  // substance in MWBUILTINPREFIX_nano_MWBUILTINUNIT_mole
  substanceOnly species $MEK_inhi in unnamed = 0;  // substance in MWBUILTINPREFIX_nano_MWBUILTINUNIT_mole
  substanceOnly species MEKPP_MEK_inhi in unnamed = 0;  // substance in MWBUILTINPREFIX_nano_MWBUILTINUNIT_mole
  substanceOnly species G_S_ERKPP in unnamed = 0;  // substance in MWBUILTINPREFIX_nano_MWBUILTINUNIT_mole
  substanceOnly species MDM2 in unnamed = 10;  // substance in MWBUILTINPREFIX_nano_MWBUILTINUNIT_mole
  substanceOnly species AKTP_MDM2 in unnamed = 0;  // substance in MWBUILTINPREFIX_nano_MWBUILTINUNIT_mole
  substanceOnly species MDM2P in unnamed = 0;  // substance in MWBUILTINPREFIX_nano_MWBUILTINUNIT_mole
  substanceOnly species TP53 in unnamed = 0;  // substance in MWBUILTINPREFIX_nano_MWBUILTINUNIT_mole
  substanceOnly species MDM2P_TP53 in unnamed = 0;  // substance in MWBUILTINPREFIX_nano_MWBUILTINUNIT_mole
  substanceOnly species TP53U in unnamed = 0;  // substance in MWBUILTINPREFIX_nano_MWBUILTINUNIT_mole
  substanceOnly species $TP53gen in unnamed = 0.1;  // substance in MWBUILTINPREFIX_nano_MWBUILTINUNIT_mole
  substanceOnly species Pho13 in unnamed = 50;  // substance in MWBUILTINPREFIX_nano_MWBUILTINUNIT_mole
  substanceOnly species TFBSIV in unnamed = 0.00083;  // substance in MWBUILTINPREFIX_nano_MWBUILTINUNIT_mole
  substanceOnly species TP53_TFBSIV in unnamed = 0;  // substance in MWBUILTINPREFIX_nano_MWBUILTINUNIT_mole
  substanceOnly species RP_ShP_G_GABP_ERKPP in unnamed = 0;  // substance in MWBUILTINPREFIX_nano_MWBUILTINUNIT_mole
  substanceOnly species RP_G_GABP_ERKPP in unnamed = 0;  // substance in MWBUILTINPREFIX_nano_MWBUILTINUNIT_mole
  substanceOnly species ERBP_ShP_G_GABP_ERKPP in unnamed = 0;  // substance in MWBUILTINPREFIX_nano_MWBUILTINUNIT_mole
  substanceOnly species ERBP_G_GABP_ERKPP in unnamed = 0;  // substance in MWBUILTINPREFIX_nano_MWBUILTINUNIT_mole
  substanceOnly species ERB3P_G_GABP_ERKPP in unnamed = 0;  // substance in MWBUILTINPREFIX_nano_MWBUILTINUNIT_mole
  substanceOnly species ERB3P_ShP_G_GABP_ERKPP in unnamed = 0;  // substance in MWBUILTINPREFIX_nano_MWBUILTINUNIT_mole
  substanceOnly species GABP_ERKPP in unnamed = 0;  // substance in MWBUILTINPREFIX_nano_MWBUILTINUNIT_mole
  substanceOnly species GABPP in unnamed = 0;  // substance in MWBUILTINPREFIX_nano_MWBUILTINUNIT_mole
  substanceOnly species GABPP_PhoA in unnamed = 0;  // substance in MWBUILTINPREFIX_nano_MWBUILTINUNIT_mole
  substanceOnly species MDM2P_Pho13 in unnamed = 0;  // substance in MWBUILTINPREFIX_nano_MWBUILTINUNIT_mole
  substanceOnly species ARF in unnamed = 10;  // substance in MWBUILTINPREFIX_nano_MWBUILTINUNIT_mole
  substanceOnly species ARF__MDM2 in unnamed = 0;  // substance in MWBUILTINPREFIX_nano_MWBUILTINUNIT_mole
  substanceOnly species CYCLIND1 in unnamed = 10;  // substance in MWBUILTINPREFIX_nano_MWBUILTINUNIT_mole
  substanceOnly species CDK4 in unnamed = 10;  // substance in MWBUILTINPREFIX_nano_MWBUILTINUNIT_mole
  substanceOnly species CYCLIND1_CDK4 in unnamed = 0;  // substance in MWBUILTINPREFIX_nano_MWBUILTINUNIT_mole
  substanceOnly species CYCLINE in unnamed = 10;  // substance in MWBUILTINPREFIX_nano_MWBUILTINUNIT_mole
  substanceOnly species CDK2 in unnamed = 10;  // substance in MWBUILTINPREFIX_nano_MWBUILTINUNIT_mole
  substanceOnly species CYCLINE_CDK2 in unnamed = 0;  // substance in MWBUILTINPREFIX_nano_MWBUILTINUNIT_mole
  substanceOnly species RB in unnamed = 10;  // substance in MWBUILTINPREFIX_nano_MWBUILTINUNIT_mole
  substanceOnly species CYCLIND1_CDK4_RB in unnamed = 0;  // substance in MWBUILTINPREFIX_nano_MWBUILTINUNIT_mole
  substanceOnly species RBP in unnamed = 0;  // substance in MWBUILTINPREFIX_nano_MWBUILTINUNIT_mole
  substanceOnly species E2F in unnamed = 10;  // substance in MWBUILTINPREFIX_nano_MWBUILTINUNIT_mole
  substanceOnly species DP1 in unnamed = 10;  // substance in MWBUILTINPREFIX_nano_MWBUILTINUNIT_mole
  substanceOnly species E2F_DP1 in unnamed = 0;  // substance in MWBUILTINPREFIX_nano_MWBUILTINUNIT_mole
  substanceOnly species E2F_DP1_RB in unnamed = 0;  // substance in MWBUILTINPREFIX_nano_MWBUILTINUNIT_mole
  substanceOnly species CYCLINE_CDK2_RBP in unnamed = 0;  // substance in MWBUILTINPREFIX_nano_MWBUILTINUNIT_mole
  substanceOnly species RBPP in unnamed = 0;  // substance in MWBUILTINPREFIX_nano_MWBUILTINUNIT_mole
  substanceOnly species Pho14 in unnamed = 10;  // substance in MWBUILTINPREFIX_nano_MWBUILTINUNIT_mole
  substanceOnly species RBPP_Pho14 in unnamed = 0;  // substance in MWBUILTINPREFIX_nano_MWBUILTINUNIT_mole
  substanceOnly species RBP_Pho14 in unnamed = 0;  // substance in MWBUILTINPREFIX_nano_MWBUILTINUNIT_mole
  substanceOnly species TFBSV in unnamed = 0.000834;  // substance in MWBUILTINPREFIX_nano_MWBUILTINUNIT_mole
  substanceOnly species E2F_DP1_RB_TFBSV in unnamed = 0;  // substance in MWBUILTINPREFIX_nano_MWBUILTINUNIT_mole
  substanceOnly species E2F_DP1_TFBSV in unnamed = 0;  // substance in MWBUILTINPREFIX_nano_MWBUILTINUNIT_mole
  substanceOnly species P16 in unnamed = 10;  // substance in MWBUILTINPREFIX_nano_MWBUILTINUNIT_mole
  substanceOnly species CYCLIND1_CDK4_P16 in unnamed = 0;  // substance in MWBUILTINPREFIX_nano_MWBUILTINUNIT_mole
  substanceOnly species Pho16 in unnamed = 5;  // substance in MWBUILTINPREFIX_nano_MWBUILTINUNIT_mole
  substanceOnly species CDC25C in unnamed = 50;  // substance in MWBUILTINPREFIX_nano_MWBUILTINUNIT_mole
  substanceOnly species CDC25C_ERKPP in unnamed = 0;  // substance in MWBUILTINPREFIX_nano_MWBUILTINUNIT_mole
  substanceOnly species CDC25CP in unnamed = 0;  // substance in MWBUILTINPREFIX_nano_MWBUILTINUNIT_mole
  substanceOnly species CDC25CP_Pho16 in unnamed = 0;  // substance in MWBUILTINPREFIX_nano_MWBUILTINUNIT_mole
  substanceOnly species CDC25CP_ERB3P in unnamed = 0;  // substance in MWBUILTINPREFIX_nano_MWBUILTINUNIT_mole
  substanceOnly species CDC25CP_ERB3P_ERB3P in unnamed = 0;  // substance in MWBUILTINPREFIX_nano_MWBUILTINUNIT_mole
  substanceOnly species CDC25CP_ERBP in unnamed = 0;  // substance in MWBUILTINPREFIX_nano_MWBUILTINUNIT_mole
  substanceOnly species CDC25CP_ERBP_ERBP in unnamed = 0;  // substance in MWBUILTINPREFIX_nano_MWBUILTINUNIT_mole
  substanceOnly species CDC25CP_RP in unnamed = 0;  // substance in MWBUILTINPREFIX_nano_MWBUILTINUNIT_mole
  substanceOnly species CDC25CP_RP_RP in unnamed = 0;  // substance in MWBUILTINPREFIX_nano_MWBUILTINUNIT_mole
  substanceOnly species PKP_PIP2_PI3K_inhibitor in unnamed = 0;  // substance in MWBUILTINPREFIX_nano_MWBUILTINUNIT_mole
  substanceOnly species PIP3_PTEN in unnamed = 0;  // substance in MWBUILTINPREFIX_nano_MWBUILTINUNIT_mole
  substanceOnly species MYC_mRNA in unnamed = 0;  // substance in MWBUILTINPREFIX_nano_MWBUILTINUNIT_mole
  substanceOnly species CCND1_mRNA in unnamed = 0;  // substance in MWBUILTINPREFIX_nano_MWBUILTINUNIT_mole
  substanceOnly species Kx in unnamed = 1;  // substance in MWBUILTINPREFIX_nano_MWBUILTINUNIT_mole
  substanceOnly species AZAKEN in unnamed = 0;  // substance in MWBUILTINPREFIX_nano_MWBUILTINUNIT_mole
  substanceOnly species GSKP_AZAKEN in unnamed = 0;  // substance in MWBUILTINPREFIX_nano_MWBUILTINUNIT_mole
  substanceOnly species Kx1 in unnamed = 2;  // substance in MWBUILTINPREFIX_nano_MWBUILTINUNIT_mole
  substanceOnly species Kx1p in unnamed = 1;  // substance in MWBUILTINPREFIX_nano_MWBUILTINUNIT_mole
  substanceOnly species Kx2 in unnamed = 100;  // substance in MWBUILTINPREFIX_nano_MWBUILTINUNIT_mole
  substanceOnly species Kx3 in unnamed = 700;  // substance in MWBUILTINPREFIX_nano_MWBUILTINUNIT_mole
  substanceOnly species Kx3p in unnamed = 3.5;  // substance in MWBUILTINPREFIX_nano_MWBUILTINUNIT_mole
  substanceOnly species Kx5 in unnamed = 10;  // substance in MWBUILTINPREFIX_nano_MWBUILTINUNIT_mole
  substanceOnly species Ky1 in unnamed = 100;  // substance in MWBUILTINPREFIX_nano_MWBUILTINUNIT_mole
  substanceOnly species Ky2 in unnamed = 10;  // substance in MWBUILTINPREFIX_nano_MWBUILTINUNIT_mole
  substanceOnly species Ky3 in unnamed = 10;  // substance in MWBUILTINPREFIX_nano_MWBUILTINUNIT_mole
  substanceOnly species Ky4 in unnamed = 10;  // substance in MWBUILTINPREFIX_nano_MWBUILTINUNIT_mole
  substanceOnly species Ky5 in unnamed = 10;  // substance in MWBUILTINPREFIX_nano_MWBUILTINUNIT_mole
  substanceOnly species Kugu in unnamed = 1;  // substance in MWBUILTINPREFIX_nano_MWBUILTINUNIT_mole
  substanceOnly species $Pb_MYC in unnamed;  // substance in MWBUILTINPREFIX_nano_MWBUILTINUNIT_mole
  substanceOnly species $Pb_CCND1 in unnamed;  // substance in MWBUILTINPREFIX_nano_MWBUILTINUNIT_mole
  substanceOnly species KRNAP in unnamed = 5;  // substance in MWBUILTINPREFIX_nano_MWBUILTINUNIT_mole
  substanceOnly species RNAP in unnamed = 0.166;  // substance in MWBUILTINPREFIX_nano_MWBUILTINUNIT_mole
  substanceOnly species Ku in unnamed = 2;  // substance in MWBUILTINPREFIX_nano_MWBUILTINUNIT_mole

  // Parameters:
  c655 = 0.0005 MWDERIVEDUNIT_1__second;

  // Assignment rules:
  Pb_MYC := RNAP/KRNAP*(1 + 2*(TCFLEF_BetaCatenin/Kx1) + 10*(TCFLEF_BetaCateninY654/Kx1p) + 2*(SMAD4_TCFLEF/Kx2))*(1 + 2*(AP1/Kx3) + 10*(AP1P/Kx3p))*(1 + 2*(E2F_DP1/Kx5))/(RNAP/KRNAP*(1 + 2*(TCFLEF_BetaCatenin/Kx1) + 10*(TCFLEF_BetaCateninY654/Kx1p) + 2*(SMAD4_TCFLEF/Kx2))*(1 + 2*(AP1/Kx3) + 10*(AP1P/Kx3p))*(1 + 2*(E2F_DP1/Kx5)) + (1 + TCFLEF_BetaCatenin/Kx1 + TCFLEF_BetaCateninY654/Kx1p + SMAD4_TCFLEF/Kx2 + GROUCHO_TCFLEF/Ky1)*(1 + SMADIIP_SMAD4/Ky2 + SMADIIIP_SMAD4/Ky3)*(1 + AP1/Kx3 + AP1P/Kx3p)*(1 + TP53/Ky4)*(1 + E2F_DP1/Kx5 + E2F_DP1_RB/Ky5))*Kugu;
  Pb_CCND1 := RNAP/KRNAP*(1 + 2*(TCFLEF_BetaCatenin/Kx1) + 10*(TCFLEF_BetaCateninY654/Kx1p) + 2*(SMAD4_TCFLEF/Kx2))*(1 + 2*(AP1/Kx3) + 10*(AP1P/Kx3p))*(1 + 2*(E2F_DP1/Kx5))/(RNAP/KRNAP*(1 + 2*(TCFLEF_BetaCatenin/Kx1) + 10*(TCFLEF_BetaCateninY654/Kx1p) + 2*(SMAD4_TCFLEF/Kx2))*(1 + 2*(AP1/Kx3) + 10*(AP1P/Kx3p))*(1 + 2*(E2F_DP1/Kx5)) + (1 + TCFLEF_BetaCatenin/Kx1 + TCFLEF_BetaCateninY654/Kx1p + SMAD4_TCFLEF/Kx2 + GROUCHO_TCFLEF/Ky1)*(1 + SMADIIP_SMAD4/Ky2 + SMADIIIP_SMAD4/Ky3)*(1 + AP1/Kx3 + AP1P/Kx3p)*(1 + TP53/Ky4)*(1 + E2F_DP1/Kx5 + E2F_DP1_RB/Ky5))*Kugu;
  // Reactions:
  reaction_463: R -> Rl; c1f*R*EGF - c1r*Rl;  // modifiers: EGF
    c1f = 0.01 MWDERIVEDUNIT_1__nanomole_second; c1r = 1 MWDERIVEDUNIT_1__second;
  reaction_464: Rl + Rl -> Rl2; c2f*Rl*Rl - c2r*Rl2;
    c2f = 0.01 MWDERIVEDUNIT_1__nanomole_second; c2r = 0.1 MWDERIVEDUNIT_1__second;
  reaction_465: Rl2 => Rl2P; c3f*Rl2;
    c3f = 1 MWDERIVEDUNIT_1__second;
  reaction_466: RP + PLCy -> RP_PL; c5f*RP*PLCy - c5r*RP_PL;
    c5f = 0.06 MWDERIVEDUNIT_1__nanomole_second; c5r = 0.2 MWDERIVEDUNIT_1__second;
  reaction_467: RP_PL => RP_PLP; c6f*RP_PL;
    c6f = 1 MWDERIVEDUNIT_1__second;
  reaction_468: RP_PLP -> RP + PLCyP; c7f*RP_PLP - c7r*RP*PLCyP;
    c7f = 0.3 MWDERIVEDUNIT_1__second; c7r = 0.006 MWDERIVEDUNIT_1__nanomole_second;
  reaction_469: RP + Grb -> RP_G; c10f*RP*Grb - c10r*RP_G;
    c10f = 0.0015 MWDERIVEDUNIT_1__nanomole_second; c10r = 0.2 MWDERIVEDUNIT_1__second;
  reaction_470: RP_G + SOS -> RP_G_S; c11f*RP_G*SOS - c11r*RP_G_S;
    c11f = 0.01 MWDERIVEDUNIT_1__nanomole_second; c11r = 0.06 MWDERIVEDUNIT_1__second;
  reaction_471: RP_G_S -> RP + G_S; c12f*RP_G_S - c12r*RP*G_S;
    c12f = 0.15 MWDERIVEDUNIT_1__second; c12r = 0.0028 MWDERIVEDUNIT_1__nanomole_second;
  reaction_472: G_S -> Grb + SOS; c13f*G_S - c13r*Grb*SOS;
    c13f = 0.0015 MWDERIVEDUNIT_1__second; c13r = 0.0001 MWDERIVEDUNIT_1__nanomole_second;
  reaction_473: RP + Shc -> RP_Sh; c14f*RP*Shc - c14r*RP_Sh;
    c14f = 0.09 MWDERIVEDUNIT_1__nanomole_second; c14r = 0.6 MWDERIVEDUNIT_1__second;
  reaction_474: RP_Sh => RP_ShP; c15*RP_Sh;
    c15 = 6 MWDERIVEDUNIT_1__second;
  reaction_475: RP_ShP -> ShP + RP; c16f*RP_ShP - c16r*ShP*RP;
    c16f = 0.3 MWDERIVEDUNIT_1__second; c16r = 0.0009 MWDERIVEDUNIT_1__nanomole_second;
  reaction_476: RP_ShP + Grb -> RP_ShP_G; c17f*RP_ShP*Grb - c17r*RP_ShP_G;
    c17f = 0.003 MWDERIVEDUNIT_1__nanomole_second; c17r = 0.1 MWDERIVEDUNIT_1__second;
  reaction_477: RP_ShP_G -> RP + ShP_G; c18f*RP_ShP_G - c18r*RP*ShP_G;
    c18f = 0.3 MWDERIVEDUNIT_1__second; c18r = 0.0009 MWDERIVEDUNIT_1__nanomole_second;
  reaction_478: RP_ShP_G + SOS -> RP_ShP_G_S; c19f*RP_ShP_G*SOS - c19r*RP_ShP_G_S;
    c19f = 0.01 MWDERIVEDUNIT_1__nanomole_second; c19r = 0.0214 MWDERIVEDUNIT_1__second;
  reaction_479: RP_ShP_G_S -> ShP_G_S + RP; c20f*RP_ShP_G_S - c20r*ShP_G_S*RP;
    c20f = 0.12 MWDERIVEDUNIT_1__second; c20r = 0.00024 MWDERIVEDUNIT_1__nanomole_second;
  reaction_480: ShP_G + SOS -> ShP_G_S; c21f*ShP_G*SOS - c21r*ShP_G_S;
    c21f = 0.03 MWDERIVEDUNIT_1__nanomole_second; c21r = 0.064 MWDERIVEDUNIT_1__second;
  reaction_481: ShP + Grb -> ShP_G; c22f*ShP*Grb - c22r*ShP_G;
    c22f = 0.003 MWDERIVEDUNIT_1__nanomole_second; c22r = 0.1 MWDERIVEDUNIT_1__second;
  reaction_482: ShP_G_S -> ShP + G_S; c24f*ShP_G_S - c24r*ShP*G_S;
    c24f = 0.1 MWDERIVEDUNIT_1__second; c24r = 0.021 MWDERIVEDUNIT_1__nanomole_second;
  reaction_483: RP_ShP + G_S -> RP_ShP_G_S; c25f*RP_ShP*G_S - c25r*RP_ShP_G_S;
    c25f = 0.009 MWDERIVEDUNIT_1__nanomole_second; c25r = 0.0429 MWDERIVEDUNIT_1__second;
  reaction_484: Ras_GDP -> Ras + $GDP; c26f*Ras_GDP - c26r*Ras*GDP;
    c26f = 5.4e-6 MWDERIVEDUNIT_1__second; c26r = 0.00027 MWDERIVEDUNIT_1__nanomole_second;
  reaction_485: Ras + $GTP -> Ras_GTP; c27f*Ras*GTP - c27r*Ras_GTP;
    c27f = 0.078 MWDERIVEDUNIT_1__nanomole_second; c27r = 0.00078 MWDERIVEDUNIT_1__second;
  reaction_486: Ras_GTP => Ras_GDP; c28*Ras_GTP;
    c28 = 1e-5 MWDERIVEDUNIT_1__second;
  reaction_487: RP_ShP_G_S + Ras_GDP -> RP_ShP_G_S_Ras_GDP; c29f*RP_ShP_G_S*Ras_GDP - c29r*RP_ShP_G_S_Ras_GDP;
    c29f = 0.00475 MWDERIVEDUNIT_1__nanomole_second; c29r = 0.76 MWDERIVEDUNIT_1__second;
  reaction_488: RP_ShP_G_S_Ras_GDP -> RP_ShP_G_S_Ras + $GDP; c30f*RP_ShP_G_S_Ras_GDP - c30r*RP_ShP_G_S_Ras*GDP;
    c30f = 46.5 MWDERIVEDUNIT_1__second; c30r = 0.093 MWDERIVEDUNIT_1__nanomole_second;
  reaction_489: RP_ShP_G_S_Ras + $GTP -> RP_ShP_G_S_Ras_GTP; c31f*RP_ShP_G_S_Ras*GTP - c31r*RP_ShP_G_S_Ras_GTP;
    c31f = 0.003 MWDERIVEDUNIT_1__nanomole_second; c31r = 2.4 MWDERIVEDUNIT_1__second;
  reaction_490: RP_ShP_G_S_Ras_GTP -> RP_ShP_G_S + Ras_GTP; c32f*RP_ShP_G_S_Ras_GTP - c32r*RP_ShP_G_S*Ras_GTP;
    c32f = 806.4 MWDERIVEDUNIT_1__second; c32r = 1.575 MWDERIVEDUNIT_1__nanomole_second;
  reaction_491: RP_ShP_G_S + Ras -> RP_ShP_G_S_Ras; c33f*RP_ShP_G_S*Ras - c33r*RP_ShP_G_S_Ras;
    c33f = 0.15625 MWDERIVEDUNIT_1__nanomole_second; c33r = 0.001 MWDERIVEDUNIT_1__second;
  reaction_492: RP_G_S + Ras_GDP -> RP_G_S_Ras_GDP; c34f*RP_G_S*Ras_GDP - c34r*RP_G_S_Ras_GDP;
    c34f = 0.0075 MWDERIVEDUNIT_1__nanomole_second; c34r = 1.2 MWDERIVEDUNIT_1__second;
  reaction_493: RP_G_S_Ras_GDP -> RP_G_S_Ras + $GDP; c35f*RP_G_S_Ras_GDP - c35r*RP_G_S_Ras*GDP;
    c35f = 50 MWDERIVEDUNIT_1__second; c35r = 0.1 MWDERIVEDUNIT_1__nanomole_second;
  reaction_494: RP_G_S_Ras + $GTP -> RP_G_S_Ras_GTP; c36f*RP_G_S_Ras*GTP - c36r*RP_G_S_Ras_GTP;
    c36f = 0.1 MWDERIVEDUNIT_1__nanomole_second; c36r = 80 MWDERIVEDUNIT_1__second;
  reaction_495: RP_G_S_Ras_GTP -> RP_G_S + Ras_GTP; c37f*RP_G_S_Ras_GTP - c37r*RP_G_S*Ras_GTP;
    c37f = 640 MWDERIVEDUNIT_1__second; c37r = 1.25 MWDERIVEDUNIT_1__nanomole_second;
  reaction_496: RP_G_S + Ras -> RP_G_S_Ras; c38f*RP_G_S*Ras - c38r*RP_G_S_Ras;
    c38f = 0.25 MWDERIVEDUNIT_1__nanomole_second; c38r = 0.0016 MWDERIVEDUNIT_1__second;
  reaction_497: Raf_unnamed_35 + Ras_GTP -> Raf_Ras_GTP; c39f*Raf_unnamed_35*Ras_GTP - c39r*Raf_Ras_GTP;
    c39f = 0.01 MWDERIVEDUNIT_1__nanomole_second; c39r = 0.0053 MWDERIVEDUNIT_1__second;
  reaction_498: Raf_Ras_GTP => Raf_unnamed_37 + Ras_GTP; c40f*Raf_Ras_GTP;
    c40f = 1 MWDERIVEDUNIT_1__second;
  reaction_499: Raf_unnamed_37 + Pase1 -> Raf__Pase1_unnamed_39; c41f*Raf_unnamed_37*Pase1 - c41r*Raf__Pase1_unnamed_39;
    c41f = 0.0717 MWDERIVEDUNIT_1__nanomole_second; c41r = 0.2 MWDERIVEDUNIT_1__second;
  reaction_500: Raf__Pase1_unnamed_39 => Raf_unnamed_35 + Pase1; c42*Raf__Pase1_unnamed_39;
    c42 = 1 MWDERIVEDUNIT_1__second;
  reaction_501: MEK + Raf_unnamed_37 -> MEK_Raf; c43f*MEK*Raf_unnamed_37 - c43r*MEK_Raf;
    c43f = 0.01 MWDERIVEDUNIT_1__nanomole_second; c43r = 0.1 MWDERIVEDUNIT_1__second;
  reaction_502: MEK_Raf => Raf_unnamed_37 + MEKP; c44*MEK_Raf;
    c44 = 1 MWDERIVEDUNIT_1__second;
  reaction_503: MEKP + Raf_unnamed_37 -> MEKP_Raf; c45f*MEKP*Raf_unnamed_37 - c45r*MEKP_Raf;
    c45f = 0.01 MWDERIVEDUNIT_1__nanomole_second; c45r = 0.1 MWDERIVEDUNIT_1__second;
  reaction_504: MEKP_Raf => MEKPP + Raf_unnamed_37; c46*MEKP_Raf;
    c46 = 1 MWDERIVEDUNIT_1__second;
  reaction_505: MEKPP + Pase2 -> MEKPP_Pase2; c47f*MEKPP*Pase2 - c47r*MEKPP_Pase2;
    c47f = 0.01 MWDERIVEDUNIT_1__nanomole_second; c47r = 0.1 MWDERIVEDUNIT_1__second;
  reaction_506: MEKPP_Pase2 => MEKP + Pase2; c48*MEKPP_Pase2;
    c48 = 0.1 MWDERIVEDUNIT_1__second;
  reaction_507: MEKP + Pase2 -> MEKP_Pase2; c49f*MEKP*Pase2 - c49r*MEKP_Pase2;
    c49f = 0.01 MWDERIVEDUNIT_1__nanomole_second; c49r = 0.1 MWDERIVEDUNIT_1__second;
  reaction_508: MEKP_Pase2 => MEK + Pase2; c50*MEKP_Pase2;
    c50 = 0.1 MWDERIVEDUNIT_1__second;
  reaction_509: ERK + MEKPP -> ERK_MEKPP; c51f*ERK*MEKPP - c51r*ERK_MEKPP;
    c51f = 0.01 MWDERIVEDUNIT_1__nanomole_second; c51r = 0.0033 MWDERIVEDUNIT_1__second;
  reaction_510: ERK_MEKPP => ERKP + MEKPP; c52*ERK_MEKPP;
    c52 = 16 MWDERIVEDUNIT_1__second;
  reaction_511: ERKP + MEKPP -> ERKP_MEKPP; c53f*ERKP*MEKPP - c53r*ERKP_MEKPP;
    c53f = 0.01 MWDERIVEDUNIT_1__nanomole_second; c53r = 0.0033 MWDERIVEDUNIT_1__second;
  reaction_512: ERKP_MEKPP => ERKPP + MEKPP; c54*ERKP_MEKPP;
    c54 = 5.7 MWDERIVEDUNIT_1__second;
  reaction_513: ERKPP + Pase3 -> ERKPP_Pase3; c55f*ERKPP*Pase3 - c55r*ERKPP_Pase3;
    c55f = 0.0145 MWDERIVEDUNIT_1__nanomole_second; c55r = 0.6 MWDERIVEDUNIT_1__second;
  reaction_514: ERKPP_Pase3 => ERKP + Pase3; c56*ERKPP_Pase3;
    c56 = 0.27 MWDERIVEDUNIT_1__second;
  reaction_515: ERKP + Pase3 -> ERKP_Pase3; c57f*ERKP*Pase3 - c57r*ERKP_Pase3;
    c57f = 0.05 MWDERIVEDUNIT_1__nanomole_second; c57r = 0.5 MWDERIVEDUNIT_1__second;
  reaction_516: ERKP_Pase3 => ERK + Pase3; c58*ERKP_Pase3;
    c58 = 0.3 MWDERIVEDUNIT_1__second;
  reaction_517: GAP + RP -> RP_GAP; c59f*GAP*RP - c59r*RP_GAP;
    c59f = 0.083 MWDERIVEDUNIT_1__nanomole_second; c59r = 0.15 MWDERIVEDUNIT_1__second;
  reaction_518: Ras_GTP + RP_GAP -> RP_GAP_Ras_GTP; c60f*Ras_GTP*RP_GAP - c60r*RP_GAP_Ras_GTP;
    c60f = 0.01 MWDERIVEDUNIT_1__nanomole_second; c60r = 0.03 MWDERIVEDUNIT_1__second;
  reaction_519: RP_GAP_Ras_GTP => RP_GAP + Ras_GDP; c61*RP_GAP_Ras_GTP;
    c61 = 1.494 MWDERIVEDUNIT_1__second;
  reaction_520: RP_ShP_G_S + ERKPP -> RP_ShP_G_S_ERKPP; c70f*RP_ShP_G_S*ERKPP - c70r*RP_ShP_G_S_ERKPP;
    c70f = 0.01 MWDERIVEDUNIT_1__nanomole_second; c70r = 0.033 MWDERIVEDUNIT_1__second;
  reaction_521: RP_ShP_G_S_ERKPP => RP_ShP_G + ERKPP + SOSP; c71*RP_ShP_G_S_ERKPP;
    c71 = 1 MWDERIVEDUNIT_1__second;
  reaction_522: RP_G_S + ERKPP -> RP_G_S_ERKPP; c72f*RP_G_S*ERKPP - c72r*RP_G_S_ERKPP;
    c72f = 0.01 MWDERIVEDUNIT_1__nanomole_second; c72r = 0.033 MWDERIVEDUNIT_1__second;
  reaction_523: RP_G_S_ERKPP => RP_G + SOSP + ERKPP; c73*RP_G_S_ERKPP;
    c73 = 1 MWDERIVEDUNIT_1__second;
  reaction_524: SOSP + Pase5 -> SOSP_Pase5; c74f*SOSP*Pase5 - c74r*SOSP_Pase5;
    c74f = 0.01 MWDERIVEDUNIT_1__nanomole_second; c74r = 0.1 MWDERIVEDUNIT_1__second;
  reaction_525: SOSP_Pase5 => SOS + Pase5; c75*SOSP_Pase5;
    c75 = 1 MWDERIVEDUNIT_1__second;
  reaction_526: RP_G + GAB -> RP_G_GAB; c76f*RP_G*GAB - c76r*RP_G_GAB;
    c76f = 0.01 MWDERIVEDUNIT_1__nanomole_second; c76r = 1 MWDERIVEDUNIT_1__second;
  reaction_527: RP_ShP_G + GAB -> RP_ShP_G_GAB; c77f*RP_ShP_G*GAB - c77r*RP_ShP_G_GAB;
    c77f = 0.01 MWDERIVEDUNIT_1__nanomole_second; c77r = 1 MWDERIVEDUNIT_1__second;
  reaction_528: RP_G_GAB => RP_G_GABP; c78*RP_G_GAB;
    c78 = 0.05 MWDERIVEDUNIT_1__second;
  reaction_529: RP_ShP_G_GAB => RP_ShP_G_GABP; c79*RP_ShP_G_GAB;
    c79 = 0.05 MWDERIVEDUNIT_1__second;
  reaction_530: RP_G_GABP + PI3K -> RP_G_GABP_PK; c80f*RP_G_GABP*PI3K - c80r*RP_G_GABP_PK;
    c80f = 0.01 MWDERIVEDUNIT_1__nanomole_second; c80r = 1 MWDERIVEDUNIT_1__second;
  reaction_531: RP_G_GABP_PK => RP_G_GABP_PKP; c82*RP_G_GABP_PK;
    c82 = 1 MWDERIVEDUNIT_1__second;
  reaction_532: RP_ShP_G_GABP + PI3K -> RP_ShP_G_GABP_PK; c81f*RP_ShP_G_GABP*PI3K - c81r*RP_ShP_G_GABP_PK;
    c81f = 0.01 MWDERIVEDUNIT_1__nanomole_second; c81r = 1 MWDERIVEDUNIT_1__second;
  reaction_533: RP_ShP_G_GABP_PK => RP_ShP_G_GABP_PKP; c83*RP_ShP_G_GABP_PK;
    c83 = 1 MWDERIVEDUNIT_1__second;
  reaction_534: RP_ShP_G_GABP + GAP -> RP_ShP_G_GABP_GAP; c84f*RP_ShP_G_GABP*GAP - c84r*RP_ShP_G_GABP_GAP;
    c84f = 0.083 MWDERIVEDUNIT_1__nanomole_second; c84r = 0.15 MWDERIVEDUNIT_1__second;
  reaction_535: RP_G_GABP + GAP -> RP_G_GABP_GAP; c85f*RP_G_GABP*GAP - c85r*RP_G_GABP_GAP;
    c85f = 0.083 MWDERIVEDUNIT_1__nanomole_second; c85r = 0.15 MWDERIVEDUNIT_1__second;
  reaction_536: RP_G_GABP_GAP + Ras_GTP -> RP_G_GABP_GAP_Ras_GTP; c86f*RP_G_GABP_GAP*Ras_GTP - c86r*RP_G_GABP_GAP_Ras_GTP;
    c86f = 0.6225 MWDERIVEDUNIT_1__nanomole_second; c86r = 0.3 MWDERIVEDUNIT_1__second;
  reaction_537: RP_G_GABP_GAP_Ras_GTP => RP_G_GABP_GAP + Ras_GDP; c87*RP_G_GABP_GAP_Ras_GTP;
    c87 = 1.494 MWDERIVEDUNIT_1__second;
  reaction_538: RP_ShP_G_GABP_GAP + Ras_GTP -> RP_ShP_G_GABP_GAP_Ras_GTP; c88f*RP_ShP_G_GABP_GAP*Ras_GTP - c88r*RP_ShP_G_GABP_GAP_Ras_GTP;
    c88f = 0.6225 MWDERIVEDUNIT_1__nanomole_second; c88r = 0.3 MWDERIVEDUNIT_1__second;
  reaction_539: RP_ShP_G_GABP_GAP_Ras_GTP => RP_ShP_G_GABP_GAP + Ras_GDP; c89*RP_ShP_G_GABP_GAP_Ras_GTP;
    c89 = 1.494 MWDERIVEDUNIT_1__second;
  reaction_540: RP + PI3K -> RP_PK; c90f*RP*PI3K - c90r*RP_PK;
    c90f = 0.01 MWDERIVEDUNIT_1__nanomole_second; c90r = 1 MWDERIVEDUNIT_1__second;
  reaction_541: RP_PK => RP_PKP; c91*RP_PK;
    c91 = 1 MWDERIVEDUNIT_1__second;
  reaction_542: RP + PKP -> RP_PKP; c92f*RP*PKP - c92r*RP_PKP;
    c92r = 0.1 MWDERIVEDUNIT_1__second; c92f = 0.01 MWDERIVEDUNIT_1__nanomole_second;
  reaction_543: PIP3 + PTEN -> PIP3_PTEN; c93f*PIP3*PTEN - c93r*PIP3_PTEN;
    c93f = 0.01 MWDERIVEDUNIT_1__nanomole_second; c93r = 0.01 MWDERIVEDUNIT_1__second;
  reaction_544: PIP3_PTEN => PIP2 + PTEN; c94*PIP3_PTEN;
    c94 = 20 MWDERIVEDUNIT_1__second;
  reaction_545: PKP + PIP2 -> PKP_PIP2; c95f*PKP*PIP2 - c95r*PKP_PIP2;
    c95f = 0.01 MWDERIVEDUNIT_1__nanomole_second; c95r = 0.035 MWDERIVEDUNIT_1__second;
  reaction_546: PKP_PIP2 => PKP + PIP3; c96*PKP_PIP2;
    c96 = 2.5 MWDERIVEDUNIT_1__second;
  reaction_547: RP_ShP_G_GABP + PhoA -> RP_ShP_G_GABP_PhoA; c98f*RP_ShP_G_GABP*PhoA - c98r*RP_ShP_G_GABP_PhoA;
    c98f = 0.001 MWDERIVEDUNIT_1__nanomole_second; c98r = 0.1 MWDERIVEDUNIT_1__second;
  reaction_548: RP_ShP_G_GABP_PhoA => RP_ShP_G_GAB + PhoA; c100*RP_ShP_G_GABP_PhoA;
    c100 = 0.03 MWDERIVEDUNIT_1__second;
  reaction_549: RP_G_GABP + PhoA -> RP_G_GABP_PhoA; c99f*RP_G_GABP*PhoA - c99r*RP_G_GABP_PhoA;
    c99f = 0.001 MWDERIVEDUNIT_1__nanomole_second; c99r = 0.1 MWDERIVEDUNIT_1__second;
  reaction_550: RP_G_GABP_PhoA => RP_G_GAB + PhoA; c101*RP_G_GABP_PhoA;
    c101 = 0.03 MWDERIVEDUNIT_1__second;
  reaction_551: RP_G_GABP_PKP + PIP2 -> RP_G_GABP_PKP_PIP2; c102f*RP_G_GABP_PKP*PIP2 - c102r*RP_G_GABP_PKP_PIP2;
    c102f = 6.25 MWDERIVEDUNIT_1__nanomole_second; c102r = 3.5 MWDERIVEDUNIT_1__second;
  reaction_552: RP_ShP_G_GABP_PKP + PIP2 -> RP_ShP_G_GABP_PKP_PIP2; c103f*RP_ShP_G_GABP_PKP*PIP2 - c103r*RP_ShP_G_GABP_PKP_PIP2;
    c103f = 6.25 MWDERIVEDUNIT_1__nanomole_second; c103r = 3.5 MWDERIVEDUNIT_1__second;
  reaction_553: RP_G_GABP_PKP_PIP2 => RP_G_GABP_PKP + PIP3; c104*RP_G_GABP_PKP_PIP2;
    c104 = 25 MWDERIVEDUNIT_1__second;
  reaction_554: RP_ShP_G_GABP_PKP_PIP2 => RP_ShP_G_GABP_PKP + PIP3; c105*RP_ShP_G_GABP_PKP_PIP2;
    c105 = 25 MWDERIVEDUNIT_1__second;
  reaction_555: RP_ShP_G + GABP -> RP_ShP_G_GABP; c110f*RP_ShP_G*GABP - c110r*RP_ShP_G_GABP;
    c110r = 1 MWDERIVEDUNIT_1__second; c110f = 0.01 MWDERIVEDUNIT_1__nanomole_second;
  reaction_556: RP_G + GABP -> RP_G_GABP; c111f*RP_G*GABP - c111r*RP_G_GABP;
    c111r = 1 MWDERIVEDUNIT_1__second; c111f = 0.01 MWDERIVEDUNIT_1__nanomole_second;
  reaction_557: GABP + PhoA -> GABP_PhoA; c112f*GABP*PhoA - c112r*GABP_PhoA;
    c112f = 0.001 MWDERIVEDUNIT_1__nanomole_second; c112r = 0.1 MWDERIVEDUNIT_1__second;
  reaction_558: GABP_PhoA => GAB + PhoA; c113*GABP_PhoA;
    c113 = 0.03 MWDERIVEDUNIT_1__second;
  reaction_559: AKT + PIP3 -> AKT_PIP3; c114f*AKT*PIP3 - c114r*AKT_PIP3;
    c114f = 0.01 MWDERIVEDUNIT_1__nanomole_second; c114r = 10 MWDERIVEDUNIT_1__second;
  reaction_560: GAB + PIP3 -> GAB_PIP3; c115f*GAB*PIP3 - c115r*GAB_PIP3;
    c115f = 0.01 MWDERIVEDUNIT_1__nanomole_second; c115r = 3 MWDERIVEDUNIT_1__second;
  reaction_561: GABP + PIP3 -> GABP_PIP3; c116f*GABP*PIP3 - c116r*GABP_PIP3;
    c116f = 0.01 MWDERIVEDUNIT_1__nanomole_second; c116r = 3 MWDERIVEDUNIT_1__second;
  reaction_562: RP_G + GAB_PIP3 -> RP_G_GAB_PIP3; c117f*RP_G*GAB_PIP3 - c117r*RP_G_GAB_PIP3;
    c117f = 2.5 MWDERIVEDUNIT_1__nanomole_second; c117r = 1 MWDERIVEDUNIT_1__second;
  reaction_563: RP_ShP_G + GAB_PIP3 -> RP_ShP_G_GAB_PIP3; c119f*RP_ShP_G*GAB_PIP3 - c119r*RP_ShP_G_GAB_PIP3;
    c119r = 1 MWDERIVEDUNIT_1__second; c119f = 2.5 MWDERIVEDUNIT_1__nanomole_second;
  reaction_564: RP_ShP_G_GAB_PIP3 => RP_ShP_G_GABP + PIP3; c120*RP_ShP_G_GAB_PIP3;
    c120 = 0.01 MWDERIVEDUNIT_1__second;
  reaction_565: AKT_PIP3 + PDK1 -> AKT_PIP3_PDK1; c124f*AKT_PIP3*PDK1 - c124r*AKT_PIP3_PDK1;
    c124f = 0.01 MWDERIVEDUNIT_1__nanomole_second; c124r = 0.1 MWDERIVEDUNIT_1__second;
  reaction_566: AKT_PIP3_PDK1 => AKTP + PIP3 + PDK1; c123*AKT_PIP3_PDK1;
    c123 = 5 MWDERIVEDUNIT_1__second;
  reaction_567: AKTP + TAKT -> AKTP_TAKT; c129f*AKTP*TAKT - c129r*AKTP_TAKT;
    c129f = 0.01 MWDERIVEDUNIT_1__nanomole_second; c129r = 1 MWDERIVEDUNIT_1__second;
  reaction_568: AKTP_TAKT => AKT + TAKT; c130*AKTP_TAKT;
    c130 = 1 MWDERIVEDUNIT_1__second;
  reaction_569: PKP + PhoB -> PKP_PhoB; c135f*PKP*PhoB - c135r*PKP_PhoB;
    c135f = 0.01 MWDERIVEDUNIT_1__nanomole_second; c135r = 1 MWDERIVEDUNIT_1__second;
  reaction_570: PKP_PhoB => PI3K + PhoB; c136*PKP_PhoB;
    c136 = 0.5 MWDERIVEDUNIT_1__second;
  reaction_571: RP_G_GABP_PKP + PhoB -> RP_G_GABP_PKP_PhoB; c137f*RP_G_GABP_PKP*PhoB - c137r*RP_G_GABP_PKP_PhoB;
    c137f = 0.001 MWDERIVEDUNIT_1__nanomole_second; c137r = 0.038 MWDERIVEDUNIT_1__second;
  reaction_572: RP_G_GABP_PKP_PhoB => RP_G_GABP_PK + PhoB; c138*RP_G_GABP_PKP_PhoB;
    c138 = 0.595 MWDERIVEDUNIT_1__second;
  reaction_573: RP_ShP_G_GABP_PKP + PhoB -> RP_ShP_G_GABP_PKP_PhoB; c139f*RP_ShP_G_GABP_PKP*PhoB - c139r*RP_ShP_G_GABP_PKP_PhoB;
    c139f = 0.001 MWDERIVEDUNIT_1__nanomole_second; c139r = 0.038 MWDERIVEDUNIT_1__second;
  reaction_574: RP_ShP_G_GABP_PKP_PhoB => RP_ShP_G_GABP_PK + PhoB; c140*RP_ShP_G_GABP_PKP_PhoB;
    c140 = 0.595 MWDERIVEDUNIT_1__second;
  reaction_575: RP_ShP_G_GAB + PIP3 -> RP_ShP_G_GAB_PIP3; c143f*RP_ShP_G_GAB*PIP3 - c143r*RP_ShP_G_GAB_PIP3;
    c143f = 2.5 MWDERIVEDUNIT_1__nanomole_second; c143r = 1 MWDERIVEDUNIT_1__second;
  reaction_576: RP_PKP + PIP2 -> RP_PKP_PIP2; c146f*RP_PKP*PIP2 - c146r*RP_PKP_PIP2;
    c146f = 6.25 MWDERIVEDUNIT_1__nanomole_second; c146r = 3.5 MWDERIVEDUNIT_1__second;
  reaction_577: RP_PKP_PIP2 => RP_PKP + PIP3; c147f*RP_PKP_PIP2;
    c147f = 2.5 MWDERIVEDUNIT_1__second;
  reaction_578: RP_ShP_G_GABP_PKP -> RP_ShP_G_GABP + PKP; c148f*RP_ShP_G_GABP_PKP - c148r*RP_ShP_G_GABP*PKP;
    c148f = 5 MWDERIVEDUNIT_1__second; c148r = 0.05 MWDERIVEDUNIT_1__nanomole_second;
  reaction_579: RP_G_GABP_PKP -> RP_G_GABP + PKP; c149f*RP_G_GABP_PKP - c149r*RP_G_GABP*PKP;
    c149f = 5 MWDERIVEDUNIT_1__second; c149r = 0.05 MWDERIVEDUNIT_1__nanomole_second;
  reaction_580: RP_G_GAB_PIP3 => RP_G_GABP + PIP3; c150*RP_G_GAB_PIP3;
    c150 = 0.01 MWDERIVEDUNIT_1__second;
  reaction_581: GSKP + PhoC -> GSKP_PhoC; c151f*GSKP*PhoC - c151r*GSKP_PhoC;
    c151f = 0.01 MWDERIVEDUNIT_1__nanomole_second; c151r = 5 MWDERIVEDUNIT_1__second;
  reaction_582: GSKP_PhoC => GSK + PhoC; c152*GSKP_PhoC;
    c152 = 0.1 MWDERIVEDUNIT_1__second;
  reaction_583: RP_G_GAB + PIP3 -> RP_G_GAB_PIP3; c156f*RP_G_GAB*PIP3 - c156r*RP_G_GAB_PIP3;
    c156f = 1 MWDERIVEDUNIT_1__nanomole_second; c156r = 2.5 MWDERIVEDUNIT_1__second;
  reaction_584: Raf_unnamed_37 + AKTP -> Raf___AKTP; c157f*Raf_unnamed_37*AKTP - c157r*Raf___AKTP;
    c157f = 0.01 MWDERIVEDUNIT_1__nanomole_second; c157r = 0.033 MWDERIVEDUNIT_1__second;
  reaction_585: Raf___AKTP => Raf_unnamed_112 + AKTP; c158*Raf___AKTP;
    c158 = 5.7 MWDERIVEDUNIT_1__second;
  reaction_586: Raf_unnamed_112 + Pase1 -> Raf__Pase1_unnamed_114; c159f*Raf_unnamed_112*Pase1 - c159r*Raf__Pase1_unnamed_114;
    c159f = 0.0717 MWDERIVEDUNIT_1__nanomole_second; c159r = 0.2 MWDERIVEDUNIT_1__second;
  reaction_587: Raf__Pase1_unnamed_114 => Raf_unnamed_37 + Pase1; c160*Raf__Pase1_unnamed_114;
    c160 = 1 MWDERIVEDUNIT_1__second;
  reaction_588: AKTP + GSK -> AKTP__GSK; c170f*AKTP*GSK - c170r*AKTP__GSK;
    c170f = 0.01 MWDERIVEDUNIT_1__nanomole_second; c170r = 0.1 MWDERIVEDUNIT_1__second;
  reaction_589: AKTP__GSK => AKTP + GSKP; c171*AKTP__GSK;
    c171 = 1 MWDERIVEDUNIT_1__second;
  reaction_590: R + R -> R_R; c181f*R*R - c181r*R_R;
    c181f = 0.0001 MWDERIVEDUNIT_1__nanomole_second; c181r = 0.1 MWDERIVEDUNIT_1__second;
  reaction_591: R_R -> Rl_R; c182f*EGF*R_R - c182r*Rl_R;  // modifiers: EGF
    c182f = 0.0001 MWDERIVEDUNIT_1__nanomole_second; c182r = 1 MWDERIVEDUNIT_1__second;
  reaction_592: Rl + R -> Rl_R; c183f*Rl*R - c183r*Rl_R;
    c183f = 0.001 MWDERIVEDUNIT_1__nanomole_second; c183r = 0.1 MWDERIVEDUNIT_1__second;
  reaction_593: Rl_R => RlP_RP; c184f*Rl_R;
    c184f = 1 MWDERIVEDUNIT_1__second;
  reaction_594: RlP_RP -> RP_RP; c185f*RlP_RP - c185r*EGF*RP_RP;  // modifiers: EGF
    c185f = 0.1 MWDERIVEDUNIT_1__second; c185r = 0.01 MWDERIVEDUNIT_1__nanomole_second;
  reaction_595: RP_RP -> RP + RP; c186f*RP_RP - c187r*RP*RP;
    c186f = 0.1 MWDERIVEDUNIT_1__second; c187r = 0.01 MWDERIVEDUNIT_1__nanomole_second;
  reaction_596: RP_R => RP_RP; c187f*RP_R;
    c187f = 1 MWDERIVEDUNIT_1__second;
  reaction_597: RP + R -> RP_R; c189f*RP*R - c189r*RP_R;
    c189f = 0.001 MWDERIVEDUNIT_1__nanomole_second; c189r = 0.1 MWDERIVEDUNIT_1__second;
  reaction_598: CDC25CP + RP -> CDC25CP_RP; c190f*CDC25CP*RP - c190r*CDC25CP_RP;
    c190f = 0.01 MWDERIVEDUNIT_1__nanomole_second; c190r = 0.1 MWDERIVEDUNIT_1__second;
  reaction_599: CDC25CP_RP => CDC25CP + R; c191f*CDC25CP_RP;
    c191f = 1 MWDERIVEDUNIT_1__second;
  reaction_600: CDC25CP + RP_RP -> CDC25CP_RP_RP; c192f*CDC25CP*RP_RP - c192r*CDC25CP_RP_RP;
    c192f = 0.01 MWDERIVEDUNIT_1__nanomole_second; c192r = 0.1 MWDERIVEDUNIT_1__second;
  reaction_601: CDC25CP_RP_RP => CDC25CP + R_R; c193f*CDC25CP_RP_RP;
    c193f = 0.5 MWDERIVEDUNIT_1__second;
  reaction_602: R + ERB -> R_ERB; c194f*R*ERB - c194r*R_ERB;
    c194f = 0.001 MWDERIVEDUNIT_1__nanomole_second; c194r = 0.1 MWDERIVEDUNIT_1__second;
  reaction_603: R_ERB -> Rl_ERB; c195f*R_ERB*EGF - c195r*Rl_ERB;  // modifiers: EGF
    c195f = 0.01 MWDERIVEDUNIT_1__nanomole_second; c195r = 0.1 MWDERIVEDUNIT_1__second;
  reaction_604: Rl_ERB => RlP_ERBP; c196f*Rl_ERB;
    c196f = 1 MWDERIVEDUNIT_1__second;
  reaction_605: RlP_ERBP -> RP_ERBP; c197f*RlP_ERBP - c197r*EGF*RP_ERBP;  // modifiers: EGF
    c197f = 0.1 MWDERIVEDUNIT_1__second; c197r = 0.01 MWDERIVEDUNIT_1__nanomole_second;
  reaction_606: RP_ERBP -> RP + ERBP; c198f*RP_ERBP - c198r*RP*ERBP;
    c198f = 0.1 MWDERIVEDUNIT_1__second; c198r = 0.01 MWDERIVEDUNIT_1__nanomole_second;
  reaction_607: Rl + ERB -> Rl_ERB; c199f*Rl*ERB - c199r*Rl_ERB;
    c199f = 0.01 MWDERIVEDUNIT_1__nanomole_second; c199r = 0.1 MWDERIVEDUNIT_1__second;
  reaction_608: R + ERBP -> R_ERBP; c200f*R*ERBP - c200r*R_ERBP;
    c200f = 0.001 MWDERIVEDUNIT_1__nanomole_second; c200r = 0.1 MWDERIVEDUNIT_1__second;
  reaction_609: R_ERBP => RP_ERBP; c201f*R_ERBP;
    c201f = 1 MWDERIVEDUNIT_1__second;
  reaction_610: RlP_ERBP -> RlP + ERBP; c202f*RlP_ERBP - c202r*RlP*ERBP;
    c202f = 0.1 MWDERIVEDUNIT_1__second; c202r = 0.01 MWDERIVEDUNIT_1__nanomole_second;
  reaction_611: RP + ERB -> RP_ERB; c203f*RP*ERB - c203r*RP_ERB;
    c203f = 0.01 MWDERIVEDUNIT_1__nanomole_second; c203r = 0.1 MWDERIVEDUNIT_1__second;
  reaction_612: RP_ERB => RP_ERBP; c204f*RP_ERB;
    c204f = 1 MWDERIVEDUNIT_1__second;
  reaction_613: ERBP + ERB -> ERBP_ERB; c205f*ERBP*ERB - c205r*ERBP_ERB;
    c205f = 0.01 MWDERIVEDUNIT_1__nanomole_second; c205r = 0.1 MWDERIVEDUNIT_1__second;
  reaction_614: ERBP_ERBP -> ERBP + ERBP; c207f*ERBP_ERBP - c207r*ERBP*ERBP;
    c207f = 0.1 MWDERIVEDUNIT_1__second; c207r = 0.01 MWDERIVEDUNIT_1__nanomole_second;
  reaction_615: ERB + ERB -> ERB_ERB; c208f*ERB*ERB - c209r*ERB_ERB;
    c208f = 0.01 MWDERIVEDUNIT_1__nanomole_second; c209r = 0.1 MWDERIVEDUNIT_1__second;
  reaction_616: ERBP_ERB => ERBP_ERBP; c206f*ERBP_ERB;
    c206f = 1 MWDERIVEDUNIT_1__second;
  reaction_617: CDC25CP + ERBP -> CDC25CP_ERBP; c207f_n*CDC25CP*ERBP - c208r*CDC25CP_ERBP;
    c207f_n = 0.01 MWDERIVEDUNIT_1__nanomole_second; c208r = 0.1 MWDERIVEDUNIT_1__second;
  reaction_618: CDC25CP_ERBP => CDC25CP + ERB; c208f_n*CDC25CP_ERBP;
    c208f_n = 0.5 MWDERIVEDUNIT_1__second;
  reaction_619: ShP + PTP1E -> PTP1E_ShP; c210f*ShP*PTP1E - c210r*PTP1E_ShP;
    c210f = 0.01 MWDERIVEDUNIT_1__nanomole_second; c210r = 0.1 MWDERIVEDUNIT_1__second;
  reaction_620: PTP1E_ShP => PTP1E + Shc; c209f*PTP1E_ShP;
    c209f = 0.005 MWDERIVEDUNIT_1__second;
  reaction_621: PLCyP + PaseX -> PLCyP_PaseX; c211f*PLCyP*PaseX - c211r*PLCyP_PaseX;
    c211f = 0.01 MWDERIVEDUNIT_1__nanomole_second; c211r = 0.1 MWDERIVEDUNIT_1__second;
  reaction_622: PLCyP_PaseX => PLCy + PaseX; c212f*PLCyP_PaseX;
    c212f = 0.01 MWDERIVEDUNIT_1__second;
  reaction_623: Rl2P -> RlP + RlP; c213f*Rl2P - c213r*RlP*RlP;
    c213f = 0.1 MWDERIVEDUNIT_1__second; c213r = 0.01 MWDERIVEDUNIT_1__nanomole_second;
  reaction_624: RlP -> RP; c214f*RlP - c214r*EGF*RP;  // modifiers: EGF
    c214f = 0.1 MWDERIVEDUNIT_1__second; c214r = 0.01 MWDERIVEDUNIT_1__nanomole_second;
  reaction_625: CDC25CP + ERBP_ERBP -> CDC25CP_ERBP_ERBP; c215f*CDC25CP*ERBP_ERBP - c215r*CDC25CP_ERBP_ERBP;
    c215f = 0.01 MWDERIVEDUNIT_1__nanomole_second; c215r = 0.1 MWDERIVEDUNIT_1__second;
  reaction_626: CDC25CP_ERBP_ERBP => CDC25CP + ERB_ERB; c216f*CDC25CP_ERBP_ERBP;
    c216f = 0.5 MWDERIVEDUNIT_1__second;
  reaction_627: ERBP + PLCy -> ERBP_PL; c_a_185f*ERBP*PLCy - c_a_185r*ERBP_PL;
    c_a_185f = 0.06 MWDERIVEDUNIT_1__nanomole_second; c_a_185r = 0.2 MWDERIVEDUNIT_1__second;
  reaction_628: ERBP_PL => ERBP_PLP; c_a_186f*ERBP_PL;
    c_a_186f = 1 MWDERIVEDUNIT_1__second;
  reaction_629: ERBP_PLP -> ERBP + PLCyP; c_a_187f*ERBP_PLP - c_a_187r*ERBP*PLCyP;
    c_a_187f = 0.3 MWDERIVEDUNIT_1__second; c_a_187r = 0.006 MWDERIVEDUNIT_1__nanomole_second;
  reaction_630: ERBP + Grb -> ERBP_G; c_a_190f*ERBP*Grb - c_a_190r*ERBP_G;
    c_a_190f = 0.0015 MWDERIVEDUNIT_1__nanomole_second; c_a_190r = 0.2 MWDERIVEDUNIT_1__second;
  reaction_631: ERBP_G + SOS -> ERBP_G_S; c_a_191f*ERBP_G*SOS - c_a_191r*ERBP_G_S;
    c_a_191f = 0.01 MWDERIVEDUNIT_1__nanomole_second; c_a_191r = 0.06 MWDERIVEDUNIT_1__second;
  reaction_632: ERBP_G_S -> ERBP + G_S; c_a_192f*ERBP_G_S - c_a_192r*ERBP*G_S;
    c_a_192f = 0.15 MWDERIVEDUNIT_1__second; c_a_192r = 0.0028 MWDERIVEDUNIT_1__nanomole_second;
  reaction_633: ERBP + Shc -> ERBP_Sh; c_a_194f*ERBP*Shc - c_a_194r*ERBP_Sh;
    c_a_194f = 0.09 MWDERIVEDUNIT_1__nanomole_second; c_a_194r = 0.6 MWDERIVEDUNIT_1__second;
  reaction_634: ERBP_Sh => ERBP_ShP; c_a_195*ERBP_Sh;
    c_a_195 = 6 MWDERIVEDUNIT_1__second;
  reaction_635: ERBP_ShP -> ShP + ERBP; c_a_196f*ERBP_ShP - c_a_196r*ShP*ERBP;
    c_a_196f = 0.3 MWDERIVEDUNIT_1__second; c_a_196r = 0.0009 MWDERIVEDUNIT_1__nanomole_second;
  reaction_636: ERBP_ShP + Grb -> ERBP_ShP_G; c_a_197f*ERBP_ShP*Grb - c_a_197r*ERBP_ShP_G;
    c_a_197f = 0.003 MWDERIVEDUNIT_1__nanomole_second; c_a_197r = 0.1 MWDERIVEDUNIT_1__second;
  reaction_637: ERBP_ShP_G -> ERBP + ShP_G; c_a_198f*ERBP_ShP_G - c_a_198r*ERBP*ShP_G;
    c_a_198f = 0.3 MWDERIVEDUNIT_1__second; c_a_198r = 0.0009 MWDERIVEDUNIT_1__nanomole_second;
  reaction_638: ERBP_ShP_G + SOS -> ERBP_ShP_G_S; c_a_199f*ERBP_ShP_G*SOS - c_a_199r*ERBP_ShP_G_S;
    c_a_199f = 0.01 MWDERIVEDUNIT_1__nanomole_second; c_a_199r = 0.0214 MWDERIVEDUNIT_1__second;
  reaction_639: ERBP_ShP_G_S -> ShP_G_S + ERBP; c_a_200f*ERBP_ShP_G_S - c_a_200r*ShP_G_S*ERBP;
    c_a_200f = 0.12 MWDERIVEDUNIT_1__second; c_a_200r = 0.00024 MWDERIVEDUNIT_1__nanomole_second;
  reaction_640: ERBP_ShP + G_S -> ERBP_ShP_G_S; c_a_205f*ERBP_ShP*G_S - c_a_205r*ERBP_ShP_G_S;
    c_a_205f = 0.009 MWDERIVEDUNIT_1__nanomole_second; c_a_205r = 0.0429 MWDERIVEDUNIT_1__second;
  reaction_641: ERBP_ShP_G_S + Ras_GDP -> ERBP_ShP_G_S_Ras_GDP; c_a_209f*ERBP_ShP_G_S*Ras_GDP - c_a_209r*ERBP_ShP_G_S_Ras_GDP;
    c_a_209f = 0.00475 MWDERIVEDUNIT_1__nanomole_second; c_a_209r = 0.76 MWDERIVEDUNIT_1__second;
  reaction_642: ERBP_ShP_G_S_Ras_GDP -> ERBP_ShP_G_S_Ras + $GDP; c_a_210f*ERBP_ShP_G_S_Ras_GDP - c_a_210r*ERBP_ShP_G_S_Ras*GDP;
    c_a_210f = 46.5 MWDERIVEDUNIT_1__second; c_a_210r = 0.093 MWDERIVEDUNIT_1__nanomole_second;
  reaction_643: ERBP_ShP_G_S_Ras + $GTP -> ERBP_ShP_G_S_Ras_GTP; c_a_211f*ERBP_ShP_G_S_Ras*GTP - c_a_211r*ERBP_ShP_G_S_Ras_GTP;
    c_a_211f = 0.003 MWDERIVEDUNIT_1__nanomole_second; c_a_211r = 2.4 MWDERIVEDUNIT_1__second;
  reaction_644: ERBP_ShP_G_S_Ras_GTP -> ERBP_ShP_G_S + Ras_GTP; c_a_212f*ERBP_ShP_G_S_Ras_GTP - c_a_212r*ERBP_ShP_G_S*Ras_GTP;
    c_a_212f = 806.4 MWDERIVEDUNIT_1__second; c_a_212r = 1.575 MWDERIVEDUNIT_1__nanomole_second;
  reaction_645: ERBP_ShP_G_S + Ras -> ERBP_ShP_G_S_Ras; c_a_213f*ERBP_ShP_G_S*Ras - c_a_213r*ERBP_ShP_G_S_Ras;
    c_a_213f = 0.15625 MWDERIVEDUNIT_1__nanomole_second; c_a_213r = 0.001 MWDERIVEDUNIT_1__second;
  reaction_646: ERBP_G_S + Ras_GDP -> ERBP_G_S_Ras_GDP; c_a_214f*ERBP_G_S*Ras_GDP - c_a_214r*ERBP_G_S_Ras_GDP;
    c_a_214f = 0.0075 MWDERIVEDUNIT_1__nanomole_second; c_a_214r = 1.2 MWDERIVEDUNIT_1__second;
  reaction_647: ERBP_G_S_Ras_GDP -> ERBP_G_S_Ras + $GDP; c_a_215f*ERBP_G_S_Ras_GDP - c_a_215r*ERBP_G_S_Ras*GDP;
    c_a_215f = 50 MWDERIVEDUNIT_1__second; c_a_215r = 0.1 MWDERIVEDUNIT_1__nanomole_second;
  reaction_648: ERBP_G_S_Ras + $GTP -> ERBP_G_S_Ras_GTP; c_a_216f*ERBP_G_S_Ras*GTP - c_a_216r*ERBP_G_S_Ras_GTP;
    c_a_216f = 0.1 MWDERIVEDUNIT_1__nanomole_second; c_a_216r = 80 MWDERIVEDUNIT_1__second;
  reaction_649: ERBP_G_S_Ras_GTP -> ERBP_G_S + Ras_GTP; c_a_217f*ERBP_G_S_Ras_GTP - c_a_217r*ERBP_G_S*Ras_GTP;
    c_a_217f = 640 MWDERIVEDUNIT_1__second; c_a_217r = 1.25 MWDERIVEDUNIT_1__nanomole_second;
  reaction_650: ERBP_G_S + Ras -> ERBP_G_S_Ras; c_a_218f*ERBP_G_S*Ras - c_a_218r*ERBP_G_S_Ras;
    c_a_218f = 0.25 MWDERIVEDUNIT_1__nanomole_second; c_a_218r = 0.0016 MWDERIVEDUNIT_1__second;
  reaction_651: GAP + ERBP -> ERBP_GAP; c_a_239f*GAP*ERBP - c_a_239r*ERBP_GAP;
    c_a_239f = 0.083 MWDERIVEDUNIT_1__nanomole_second; c_a_239r = 0.15 MWDERIVEDUNIT_1__second;
  reaction_652: Ras_GTP + ERBP_GAP -> ERBP_GAP_Ras_GTP; c_a_240f*Ras_GTP*ERBP_GAP - c_a_240r*ERBP_GAP_Ras_GTP;
    c_a_240f = 0.01 MWDERIVEDUNIT_1__nanomole_second; c_a_240r = 0.03 MWDERIVEDUNIT_1__second;
  reaction_653: ERBP_GAP_Ras_GTP => ERBP_GAP + Ras_GDP; c_a_241*ERBP_GAP_Ras_GTP;
    c_a_241 = 1.494 MWDERIVEDUNIT_1__second;
  reaction_654: ERBP_ShP_G_S + ERKPP -> ERBP_ShP_G_S_ERKPP; c_a_250f*ERBP_ShP_G_S*ERKPP - c_a_250r*ERBP_ShP_G_S_ERKPP;
    c_a_250f = 0.01 MWDERIVEDUNIT_1__nanomole_second; c_a_250r = 0.033 MWDERIVEDUNIT_1__second;
  reaction_655: ERBP_ShP_G_S_ERKPP => ERBP_ShP_G + ERKPP + SOSP; c_a_251*ERBP_ShP_G_S_ERKPP;
    c_a_251 = 1 MWDERIVEDUNIT_1__second;
  reaction_656: ERBP_G_S + ERKPP -> ERBP_G_S_ERKPP; c_a_252f*ERBP_G_S*ERKPP - c_a_252r*ERBP_G_S_ERKPP;
    c_a_252f = 0.01 MWDERIVEDUNIT_1__nanomole_second; c_a_252r = 0.033 MWDERIVEDUNIT_1__second;
  reaction_657: ERBP_G_S_ERKPP => ERBP_G + SOSP + ERKPP; c_a_253*ERBP_G_S_ERKPP;
    c_a_253 = 1 MWDERIVEDUNIT_1__second;
  reaction_658: ERBP_G + GAB -> ERBP_G_GAB; c_a_256f*ERBP_G*GAB - c_a_256r*ERBP_G_GAB;
    c_a_256f = 0.01 MWDERIVEDUNIT_1__nanomole_second; c_a_256r = 1 MWDERIVEDUNIT_1__second;
  reaction_659: ERBP_ShP_G + GAB -> ERBP_ShP_G_GAB; c_a_257f*ERBP_ShP_G*GAB - c_a_257r*ERBP_ShP_G_GAB;
    c_a_257f = 0.01 MWDERIVEDUNIT_1__nanomole_second; c_a_257r = 1 MWDERIVEDUNIT_1__second;
  reaction_660: ERBP_G_GAB => ERBP_G_GABP; c_a_258*ERBP_G_GAB;
    c_a_258 = 0.05 MWDERIVEDUNIT_1__second;
  reaction_661: ERBP_ShP_G_GAB => ERBP_ShP_G_GABP; c_a_259*ERBP_ShP_G_GAB;
    c_a_259 = 0.05 MWDERIVEDUNIT_1__second;
  reaction_662: ERBP_G_GABP + PI3K -> ERBP_G_GABP_PK; c_a_260f*ERBP_G_GABP*PI3K - c_a_260r*ERBP_G_GABP_PK;
    c_a_260f = 0.01 MWDERIVEDUNIT_1__nanomole_second; c_a_260r = 1 MWDERIVEDUNIT_1__second;
  reaction_663: ERBP_G_GABP_PK => ERBP_G_GABP_PKP; c_a_262*ERBP_G_GABP_PK;
    c_a_262 = 1 MWDERIVEDUNIT_1__second;
  reaction_664: ERBP_ShP_G_GABP + PI3K -> ERBP_ShP_G_GABP_PK; c_a_261f*ERBP_ShP_G_GABP*PI3K - c_a_261r*ERBP_ShP_G_GABP_PK;
    c_a_261f = 0.01 MWDERIVEDUNIT_1__nanomole_second; c_a_261r = 1 MWDERIVEDUNIT_1__second;
  reaction_665: ERBP_ShP_G_GABP_PK => ERBP_ShP_G_GABP_PKP; c_a_263*ERBP_ShP_G_GABP_PK;
    c_a_263 = 1 MWDERIVEDUNIT_1__second;
  reaction_666: ERBP_ShP_G_GABP + GAP -> ERBP_ShP_G_GABP_GAP; c_a_264f*ERBP_ShP_G_GABP*GAP - c_a_264r*ERBP_ShP_G_GABP_GAP;
    c_a_264f = 0.083 MWDERIVEDUNIT_1__nanomole_second; c_a_264r = 0.15 MWDERIVEDUNIT_1__second;
  reaction_667: ERBP_G_GABP + GAP -> ERBP_G_GABP_GAP; c_a_265f*ERBP_G_GABP*GAP - c_a_265r*ERBP_G_GABP_GAP;
    c_a_265f = 0.083 MWDERIVEDUNIT_1__nanomole_second; c_a_265r = 0.15 MWDERIVEDUNIT_1__second;
  reaction_668: ERBP_G_GABP_GAP + Ras_GTP -> ERBP_G_GABP_GAP_Ras_GTP; c_a_266f*ERBP_G_GABP_GAP*Ras_GTP - c_a_266r*ERBP_G_GABP_GAP_Ras_GTP;
    c_a_266f = 0.6225 MWDERIVEDUNIT_1__nanomole_second; c_a_266r = 0.3 MWDERIVEDUNIT_1__second;
  reaction_669: ERBP_G_GABP_GAP_Ras_GTP => ERBP_G_GABP_GAP + Ras_GDP; c_a_267*ERBP_G_GABP_GAP_Ras_GTP;
    c_a_267 = 1.494 MWDERIVEDUNIT_1__second;
  reaction_670: ERBP_ShP_G_GABP_GAP + Ras_GTP -> ERBP_ShP_G_GABP_GAP_Ras_GTP; c_a_268f*ERBP_ShP_G_GABP_GAP*Ras_GTP - c_a_268r*ERBP_ShP_G_GABP_GAP_Ras_GTP;
    c_a_268f = 0.6225 MWDERIVEDUNIT_1__nanomole_second; c_a_268r = 0.3 MWDERIVEDUNIT_1__second;
  reaction_671: ERBP_ShP_G_GABP_GAP_Ras_GTP => ERBP_ShP_G_GABP_GAP + Ras_GDP; c_a_269*ERBP_ShP_G_GABP_GAP_Ras_GTP;
    c_a_269 = 1.494 MWDERIVEDUNIT_1__second;
  reaction_672: ERBP + PI3K -> ERBP_PK; c_a_270f*ERBP*PI3K - c_a_270r*ERBP_PK;
    c_a_270f = 0.01 MWDERIVEDUNIT_1__nanomole_second; c_a_270r = 1 MWDERIVEDUNIT_1__second;
  reaction_673: ERBP_PK => ERBP_PKP; c_a_271f*ERBP_PK;
    c_a_271f = 1 MWDERIVEDUNIT_1__second;
  reaction_674: ERBP + PKP -> ERBP_PKP; c_a_272r*ERBP*PKP - c_a_272f*ERBP_PKP;
    c_a_272r = 0.01 MWDERIVEDUNIT_1__nanomole_second; c_a_272f = 0.1 MWDERIVEDUNIT_1__second;
  reaction_675: ERBP_ShP_G_GABP + PhoA -> ERBP_ShP_G_GABP_PhoA; c_a_278f*ERBP_ShP_G_GABP*PhoA - c_a_278r*ERBP_ShP_G_GABP_PhoA;
    c_a_278f = 0.001 MWDERIVEDUNIT_1__nanomole_second; c_a_278r = 0.1 MWDERIVEDUNIT_1__second;
  reaction_676: ERBP_ShP_G_GABP_PhoA => ERBP_ShP_G_GAB + PhoA; c_a_280*ERBP_ShP_G_GABP_PhoA;
    c_a_280 = 0.03 MWDERIVEDUNIT_1__second;
  reaction_677: ERBP_G_GABP + PhoA -> ERBP_G_GABP_PhoA; c_a_279f*ERBP_G_GABP*PhoA - c_a_279r*ERBP_G_GABP_PhoA;
    c_a_279f = 0.001 MWDERIVEDUNIT_1__nanomole_second; c_a_279r = 0.1 MWDERIVEDUNIT_1__second;
  reaction_678: ERBP_G_GABP_PhoA => ERBP_G_GAB + PhoA; c_a_281*ERBP_G_GABP_PhoA;
    c_a_281 = 0.03 MWDERIVEDUNIT_1__second;
  reaction_679: ERBP_G_GABP_PKP + PIP2 -> ERBP_G_GABP_PKP_PIP2; c_a_282f*ERBP_G_GABP_PKP*PIP2 - c_a_282r*ERBP_G_GABP_PKP_PIP2;
    c_a_282f = 6.25 MWDERIVEDUNIT_1__nanomole_second; c_a_282r = 3.5 MWDERIVEDUNIT_1__second;
  reaction_680: ERBP_ShP_G_GABP_PKP + PIP2 -> ERBP_ShP_G_GABP_PKP_PIP2; c_a_283f*ERBP_ShP_G_GABP_PKP*PIP2 - c_a_283r*ERBP_ShP_G_GABP_PKP_PIP2;
    c_a_283f = 6.25 MWDERIVEDUNIT_1__nanomole_second; c_a_283r = 3.5 MWDERIVEDUNIT_1__second;
  reaction_681: ERBP_G_GABP_PKP_PIP2 => ERBP_G_GABP_PKP + PIP3; c_a_284*ERBP_G_GABP_PKP_PIP2;
    c_a_284 = 25 MWDERIVEDUNIT_1__second;
  reaction_682: ERBP_ShP_G_GABP_PKP_PIP2 => ERBP_ShP_G_GABP_PKP + PIP3; c_a_285*ERBP_ShP_G_GABP_PKP_PIP2;
    c_a_285 = 25 MWDERIVEDUNIT_1__second;
  reaction_683: ERBP_G_GABP_PKP + PIP3 -> ERBP_G_GABP_PKP_PIP3; c_a_288f*ERBP_G_GABP_PKP*PIP3 - c_a_288r*ERBP_G_GABP_PKP_PIP3;
    c_a_288f = 25 MWDERIVEDUNIT_1__nanomole_second; c_a_288r = 3 MWDERIVEDUNIT_1__second;
  reaction_684: ERBP_ShP_G_GABP_PKP + PIP3 -> ERBP_ShP_G_GABP_PKP_PIP3; c_a_289f*ERBP_ShP_G_GABP_PKP*PIP3 - c_a_289r*ERBP_ShP_G_GABP_PKP_PIP3;
    c_a_289f = 25 MWDERIVEDUNIT_1__nanomole_second; c_a_289r = 3 MWDERIVEDUNIT_1__second;
  reaction_685: ERBP_ShP_G + GABP -> ERBP_ShP_G_GABP; c_a_290r*ERBP_ShP_G*GABP - c_a_290f*ERBP_ShP_G_GABP;
    c_a_290r = 0.01 MWDERIVEDUNIT_1__nanomole_second; c_a_290f = 1 MWDERIVEDUNIT_1__second;
  reaction_686: ERBP_G + GABP -> ERBP_G_GABP; c_a_291r*ERBP_G*GABP - c_a_291f*ERBP_G_GABP;
    c_a_291r = 0.01 MWDERIVEDUNIT_1__nanomole_second; c_a_291f = 1 MWDERIVEDUNIT_1__second;
  reaction_687: ERBP_G + GAB_PIP3 -> ERBP_G_GAB_PIP3; c_a_297f*ERBP_G*GAB_PIP3 - c_a_297r*ERBP_G_GAB_PIP3;
    c_a_297f = 2.5 MWDERIVEDUNIT_1__nanomole_second; c_a_297r = 1 MWDERIVEDUNIT_1__second;
  reaction_688: ERBP_ShP_G + GAB_PIP3 -> ERBP_ShP_G_GAB_PIP3; c_a_299r*ERBP_ShP_G*GAB_PIP3 - c_a_299f*ERBP_ShP_G_GAB_PIP3;
    c_a_299r = 2.5 MWDERIVEDUNIT_1__nanomole_second; c_a_299f = 1 MWDERIVEDUNIT_1__second;
  reaction_689: ERBP_ShP_G_GAB_PIP3 => ERBP_ShP_G_GABP + PIP3; c_a_300*ERBP_ShP_G_GAB_PIP3;
    c_a_300 = 0.01 MWDERIVEDUNIT_1__second;
  reaction_690: ERBP_G_GABP_PKP + PhoB -> ERBP_G_GABP_PKP_PhoB; c_a_317f*ERBP_G_GABP_PKP*PhoB - c_a_317r*ERBP_G_GABP_PKP_PhoB;
    c_a_317f = 0.001 MWDERIVEDUNIT_1__nanomole_second; c_a_317r = 0.038 MWDERIVEDUNIT_1__second;
  reaction_691: ERBP_G_GABP_PKP_PhoB => ERBP_G_GABP_PK + PhoB; c_a_318*ERBP_G_GABP_PKP_PhoB;
    c_a_318 = 0.595 MWDERIVEDUNIT_1__second;
  reaction_692: ERBP_ShP_G_GABP_PKP + PhoB -> ERBP_ShP_G_GABP_PKP_PhoB; c_a_319f*ERBP_ShP_G_GABP_PKP*PhoB - c_a_319r*ERBP_ShP_G_GABP_PKP_PhoB;
    c_a_319f = 0.001 MWDERIVEDUNIT_1__nanomole_second; c_a_319r = 0.038 MWDERIVEDUNIT_1__second;
  reaction_693: ERBP_ShP_G_GABP_PKP_PhoB => ERBP_ShP_G_GABP_PK + PhoB; c_a_320*ERBP_ShP_G_GABP_PKP_PhoB;
    c_a_320 = 0.595 MWDERIVEDUNIT_1__second;
  reaction_694: ERBP_ShP_G_GAB + PIP3 -> ERBP_ShP_G_GAB_PIP3; c_a_323f*ERBP_ShP_G_GAB*PIP3 - c_a_323r*ERBP_ShP_G_GAB_PIP3;
    c_a_323f = 2.5 MWDERIVEDUNIT_1__nanomole_second; c_a_323r = 1 MWDERIVEDUNIT_1__second;
  reaction_695: ERBP_PKP + PIP2 -> ERBP_PKP_PIP2; c_a_326f*ERBP_PKP*PIP2 - c_a_326r*ERBP_PKP_PIP2;
    c_a_326f = 6.25 MWDERIVEDUNIT_1__nanomole_second; c_a_326r = 3.5 MWDERIVEDUNIT_1__second;
  reaction_696: ERBP_PKP_PIP2 => ERBP_PKP + PIP3; c_a_327f*ERBP_PKP_PIP2;
    c_a_327f = 2.5 MWDERIVEDUNIT_1__second;
  reaction_697: ERBP_ShP_G_GABP_PKP -> ERBP_ShP_G_GABP + PKP; c_a_328f*ERBP_ShP_G_GABP_PKP - c_a_328r*ERBP_ShP_G_GABP*PKP;
    c_a_328f = 5 MWDERIVEDUNIT_1__second; c_a_328r = 0.05 MWDERIVEDUNIT_1__nanomole_second;
  reaction_698: ERBP_G_GABP_PKP -> ERBP_G_GABP + PKP; c_a_329f*ERBP_G_GABP_PKP - c_a_329r*ERBP_G_GABP*PKP;
    c_a_329f = 5 MWDERIVEDUNIT_1__second; c_a_329r = 0.05 MWDERIVEDUNIT_1__nanomole_second;
  reaction_699: ERBP_G_GAB_PIP3 => ERBP_G_GABP + PIP3; c_a_330*ERBP_G_GAB_PIP3;
    c_a_330 = 0.01 MWDERIVEDUNIT_1__second;
  reaction_700: ERBP_G_GAB + PIP3 -> ERBP_G_GAB_PIP3; c_a_336f*ERBP_G_GAB*PIP3 - c_a_336r*ERBP_G_GAB_PIP3;
    c_a_336f = 1 MWDERIVEDUNIT_1__nanomole_second; c_a_336r = 2.5 MWDERIVEDUNIT_1__second;
  reaction_701: ERB3P + PLCy -> ERB3P_PL; c_b_185f*ERB3P*PLCy - c_b_185r*ERB3P_PL;
    c_b_185f = 0.06 MWDERIVEDUNIT_1__nanomole_second; c_b_185r = 0.2 MWDERIVEDUNIT_1__second;
  reaction_702: ERB3P_PL => ERB3P_PLP; c_b_186f*ERB3P_PL;
    c_b_186f = 1 MWDERIVEDUNIT_1__second;
  reaction_703: ERB3P_PLP -> ERB3P + PLCyP; c_b_187f*ERB3P_PLP - c_b_187r*ERB3P*PLCyP;
    c_b_187f = 0.3 MWDERIVEDUNIT_1__second; c_b_187r = 0.006 MWDERIVEDUNIT_1__nanomole_second;
  reaction_704: ERB3P + Grb -> ERB3P_G; c_b_190f*ERB3P*Grb - c_b_190r*ERB3P_G;
    c_b_190f = 0.0015 MWDERIVEDUNIT_1__nanomole_second; c_b_190r = 0.2 MWDERIVEDUNIT_1__second;
  reaction_705: ERB3P_G + SOS -> ERB3P_G_S; c_b_191f*ERB3P_G*SOS - c_b_191r*ERB3P_G_S;
    c_b_191f = 0.01 MWDERIVEDUNIT_1__nanomole_second; c_b_191r = 0.06 MWDERIVEDUNIT_1__second;
  reaction_706: ERB3P_G_S -> ERB3P + G_S; c_b_192f*ERB3P_G_S - c_b_192r*ERB3P*G_S;
    c_b_192f = 0.15 MWDERIVEDUNIT_1__second; c_b_192r = 0.0028 MWDERIVEDUNIT_1__nanomole_second;
  reaction_707: ERB3P + Shc -> ERB3P_Sh; c_b_194f*ERB3P*Shc - c_b_194r*ERB3P_Sh;
    c_b_194f = 0.09 MWDERIVEDUNIT_1__nanomole_second; c_b_194r = 0.6 MWDERIVEDUNIT_1__second;
  reaction_708: ERB3P_Sh => ERB3P_ShP; c_b_195f*ERB3P_Sh;
    c_b_195f = 6 MWDERIVEDUNIT_1__second;
  reaction_709: ERB3P_ShP -> ShP + ERB3P; c_b_196f*ERB3P_ShP - c_b_196r*ShP*ERB3P;
    c_b_196f = 0.3 MWDERIVEDUNIT_1__second; c_b_196r = 0.0009 MWDERIVEDUNIT_1__nanomole_second;
  reaction_710: ERB3P_ShP + Grb -> ERB3P_ShP_G; c_b_197f*ERB3P_ShP*Grb - c_b_197r*ERB3P_ShP_G;
    c_b_197f = 0.003 MWDERIVEDUNIT_1__nanomole_second; c_b_197r = 0.1 MWDERIVEDUNIT_1__second;
  reaction_711: ERB3P_ShP_G -> ERB3P + ShP_G; c_b_198f*ERB3P_ShP_G - c_b_198r*ERB3P*ShP_G;
    c_b_198f = 0.3 MWDERIVEDUNIT_1__second; c_b_198r = 0.0009 MWDERIVEDUNIT_1__nanomole_second;
  reaction_712: ERB3P_ShP_G + SOS -> ERB3P_ShP_G_S; c_b_199f*ERB3P_ShP_G*SOS - c_b_199r*ERB3P_ShP_G_S;
    c_b_199f = 0.01 MWDERIVEDUNIT_1__nanomole_second; c_b_199r = 0.0214 MWDERIVEDUNIT_1__second;
  reaction_713: ERB3P_ShP_G_S -> ShP_G_S + ERB3P; c_b_200f*ERB3P_ShP_G_S - c_b_200r*ShP_G_S*ERB3P;
    c_b_200f = 0.12 MWDERIVEDUNIT_1__second; c_b_200r = 0.00024 MWDERIVEDUNIT_1__nanomole_second;
  reaction_714: ERB3P_ShP + G_S -> ERB3P_ShP_G_S; c_b_205f*ERB3P_ShP*G_S - c_b_205r*ERB3P_ShP_G_S;
    c_b_205f = 0.009 MWDERIVEDUNIT_1__nanomole_second; c_b_205r = 0.0429 MWDERIVEDUNIT_1__second;
  reaction_715: ERB3P_ShP_G_S + Ras_GDP -> ERB3P_Sh_G_S_Ras_GDP; c_b_209f*ERB3P_ShP_G_S*Ras_GDP - c_b_209r*ERB3P_Sh_G_S_Ras_GDP;
    c_b_209f = 0.00475 MWDERIVEDUNIT_1__nanomole_second; c_b_209r = 0.76 MWDERIVEDUNIT_1__second;
  reaction_716: ERB3P_Sh_G_S_Ras_GDP -> ERB3P_Sh_G_S_Ras + $GDP; c_b_210f*ERB3P_Sh_G_S_Ras_GDP - c_b_210r*ERB3P_Sh_G_S_Ras*GDP;
    c_b_210f = 46.5 MWDERIVEDUNIT_1__second; c_b_210r = 0.093 MWDERIVEDUNIT_1__nanomole_second;
  reaction_717: ERB3P_Sh_G_S_Ras + $GTP -> ERB3P_Sh_G_S_Ras_GTP; c_b_211f*ERB3P_Sh_G_S_Ras*GTP - c_b_211r*ERB3P_Sh_G_S_Ras_GTP;
    c_b_211f = 0.003 MWDERIVEDUNIT_1__nanomole_second; c_b_211r = 2.4 MWDERIVEDUNIT_1__second;
  reaction_718: ERB3P_Sh_G_S_Ras_GTP -> ERB3P_ShP_G_S + Ras_GTP; c_b_212f*ERB3P_Sh_G_S_Ras_GTP - c_b_212r*ERB3P_ShP_G_S*Ras_GTP;
    c_b_212f = 806.4 MWDERIVEDUNIT_1__second; c_b_212r = 1.575 MWDERIVEDUNIT_1__nanomole_second;
  reaction_719: ERB3P_ShP_G_S + Ras -> ERB3P_Sh_G_S_Ras; c_b_213f*ERB3P_ShP_G_S*Ras - c_b_213r*ERB3P_Sh_G_S_Ras;
    c_b_213f = 0.15625 MWDERIVEDUNIT_1__nanomole_second; c_b_213r = 0.001 MWDERIVEDUNIT_1__second;
  reaction_720: ERB3P_G_S + Ras_GDP -> ERB3P_G_S_Ras_GDP; c_b_214f*ERB3P_G_S*Ras_GDP - c_b_214r*ERB3P_G_S_Ras_GDP;
    c_b_214f = 0.0075 MWDERIVEDUNIT_1__nanomole_second; c_b_214r = 1.2 MWDERIVEDUNIT_1__second;
  reaction_721: ERB3P_G_S_Ras_GDP -> ERB3P_G_S_Ras + $GDP; c_b_215f*ERB3P_G_S_Ras_GDP - c_b_215r*ERB3P_G_S_Ras*GDP;
    c_b_215f = 50 MWDERIVEDUNIT_1__second; c_b_215r = 0.1 MWDERIVEDUNIT_1__nanomole_second;
  reaction_722: ERB3P_G_S_Ras + $GTP -> ERB3P_G_S_Ras_GTP; c_b_216f*ERB3P_G_S_Ras*GTP - c_b_216r*ERB3P_G_S_Ras_GTP;
    c_b_216f = 0.1 MWDERIVEDUNIT_1__nanomole_second; c_b_216r = 80 MWDERIVEDUNIT_1__second;
  reaction_723: ERB3P_G_S_Ras_GTP -> ERB3P_G_S + Ras_GTP; c_b_217f*ERB3P_G_S_Ras_GTP - c_b_217r*ERB3P_G_S*Ras_GTP;
    c_b_217f = 640 MWDERIVEDUNIT_1__second; c_b_217r = 1.25 MWDERIVEDUNIT_1__nanomole_second;
  reaction_724: ERB3P_G_S + Ras -> ERB3P_G_S_Ras; c_b_218f*ERB3P_G_S*Ras - c_b_218r*ERB3P_G_S_Ras;
    c_b_218f = 0.25 MWDERIVEDUNIT_1__nanomole_second; c_b_218r = 0.0016 MWDERIVEDUNIT_1__second;
  reaction_725: GAP + ERB3P -> ERB3P_GAP; c_b_239f*GAP*ERB3P - c_b_239r*ERB3P_GAP;
    c_b_239f = 0.083 MWDERIVEDUNIT_1__nanomole_second; c_b_239r = 0.15 MWDERIVEDUNIT_1__second;
  reaction_726: Ras_GTP + ERB3P_GAP -> ERB3P_GAP_Ras_GTP; c_b_240f*Ras_GTP*ERB3P_GAP - c_b_240r*ERB3P_GAP_Ras_GTP;
    c_b_240f = 0.01 MWDERIVEDUNIT_1__nanomole_second; c_b_240r = 0.03 MWDERIVEDUNIT_1__second;
  reaction_727: ERB3P_GAP_Ras_GTP => ERB3P_GAP + Ras_GDP; c_b_241*ERB3P_GAP_Ras_GTP;
    c_b_241 = 1.494 MWDERIVEDUNIT_1__second;
  reaction_728: ERB3P_ShP_G_S + ERKPP -> ERB3P_Sh_G_S_ERKPP; c_b_250f*ERB3P_ShP_G_S*ERKPP - c_b_250r*ERB3P_Sh_G_S_ERKPP;
    c_b_250f = 0.01 MWDERIVEDUNIT_1__nanomole_second; c_b_250r = 0.033 MWDERIVEDUNIT_1__second;
  reaction_729: ERB3P_Sh_G_S_ERKPP => ERB3P_ShP_G + ERKPP + SOSP; c_b_251*ERB3P_Sh_G_S_ERKPP;
    c_b_251 = 1 MWDERIVEDUNIT_1__second;
  reaction_730: ERB3P_G_S + ERKPP -> ERB3P_G_S_ERKPP; c_b_252f*ERB3P_G_S*ERKPP - c_b_252r*ERB3P_G_S_ERKPP;
    c_b_252f = 0.01 MWDERIVEDUNIT_1__nanomole_second; c_b_252r = 0.033 MWDERIVEDUNIT_1__second;
  reaction_731: ERB3P_G_S_ERKPP => ERB3P_G + SOSP + ERKPP; c_b_253*ERB3P_G_S_ERKPP;
    c_b_253 = 1 MWDERIVEDUNIT_1__second;
  reaction_732: ERB3P_G + GAB -> ERB3P_G_GAB; c_b_256f*ERB3P_G*GAB - c_b_256r*ERB3P_G_GAB;
    c_b_256f = 0.01 MWDERIVEDUNIT_1__nanomole_second; c_b_256r = 1 MWDERIVEDUNIT_1__second;
  reaction_733: ERB3P_ShP_G + GAB -> ERB3P_ShP_G_GAB; c_b_257f*ERB3P_ShP_G*GAB - c_b_257r*ERB3P_ShP_G_GAB;
    c_b_257f = 0.01 MWDERIVEDUNIT_1__nanomole_second; c_b_257r = 1 MWDERIVEDUNIT_1__second;
  reaction_734: ERB3P_G_GAB => ERB3P_G_GABP; c_b_258*ERB3P_G_GAB;
    c_b_258 = 0.05 MWDERIVEDUNIT_1__second;
  reaction_735: ERB3P_ShP_G_GAB => ERB3P_ShP_G_GABP; c_b_259*ERB3P_ShP_G_GAB;
    c_b_259 = 0.05 MWDERIVEDUNIT_1__second;
  reaction_736: ERB3P_G_GABP + PI3K -> ERB3P_G_GABP_PK; c_b_260f*ERB3P_G_GABP*PI3K - c_b_260r*ERB3P_G_GABP_PK;
    c_b_260f = 0.01 MWDERIVEDUNIT_1__nanomole_second; c_b_260r = 1 MWDERIVEDUNIT_1__second;
  reaction_737: ERB3P_G_GABP_PK => ERB3P_G_GABP_PKP; c_b_262*ERB3P_G_GABP_PK;
    c_b_262 = 1 MWDERIVEDUNIT_1__second;
  reaction_738: ERB3P_ShP_G_GABP + PI3K -> ERB3P_ShP_G_GABP_PK; c_b_261f*ERB3P_ShP_G_GABP*PI3K - c_b_261r*ERB3P_ShP_G_GABP_PK;
    c_b_261f = 0.01 MWDERIVEDUNIT_1__nanomole_second; c_b_261r = 1 MWDERIVEDUNIT_1__second;
  reaction_739: ERB3P_ShP_G_GABP_PK => ERB3P_ShP_G_GABP_PKP; c_b_263*ERB3P_ShP_G_GABP_PK;
    c_b_263 = 1 MWDERIVEDUNIT_1__second;
  reaction_740: ERB3P_ShP_G_GABP + GAP -> ERB3P_ShP_G_GABP_GAP; c_b_264f*ERB3P_ShP_G_GABP*GAP - c_b_264r*ERB3P_ShP_G_GABP_GAP;
    c_b_264f = 0.083 MWDERIVEDUNIT_1__nanomole_second; c_b_264r = 0.15 MWDERIVEDUNIT_1__second;
  reaction_741: ERB3P_G_GABP + GAP -> ERB3P_G_GABP_GAP; c_b_265f*ERB3P_G_GABP*GAP - c_b_265r*ERB3P_G_GABP_GAP;
    c_b_265f = 0.083 MWDERIVEDUNIT_1__nanomole_second; c_b_265r = 0.15 MWDERIVEDUNIT_1__second;
  reaction_742: ERB3P_G_GABP_GAP + Ras_GTP -> ERB3P_G_GABP_GAP_Ras_GTP; c_b_266f*ERB3P_G_GABP_GAP*Ras_GTP - c_b_266r*ERB3P_G_GABP_GAP_Ras_GTP;
    c_b_266f = 0.6225 MWDERIVEDUNIT_1__nanomole_second; c_b_266r = 0.3 MWDERIVEDUNIT_1__second;
  reaction_743: ERB3P_G_GABP_GAP_Ras_GTP => ERB3P_G_GABP_GAP + Ras_GDP; c_b_267f*ERB3P_G_GABP_GAP_Ras_GTP;
    c_b_267f = 1.494 MWDERIVEDUNIT_1__second;
  reaction_744: ERB3P_ShP_G_GABP_GAP + Ras_GTP -> ERB3P_ShP_G_GABP_GAP_Ras_GTP; c_b_268f*ERB3P_ShP_G_GABP_GAP*Ras_GTP - c_b_268r*ERB3P_ShP_G_GABP_GAP_Ras_GTP;
    c_b_268f = 0.6225 MWDERIVEDUNIT_1__nanomole_second; c_b_268r = 0.3 MWDERIVEDUNIT_1__second;
  reaction_745: ERB3P_ShP_G_GABP_GAP_Ras_GTP => ERB3P_ShP_G_GABP_GAP + Ras_GDP; c_b_269*ERB3P_ShP_G_GABP_GAP_Ras_GTP;
    c_b_269 = 1.494 MWDERIVEDUNIT_1__second;
  reaction_746: ERB3P + PI3K -> ERB3P_PK; c_b_270f*ERB3P*PI3K - c_b_270r*ERB3P_PK;
    c_b_270f = 0.01 MWDERIVEDUNIT_1__nanomole_second; c_b_270r = 1 MWDERIVEDUNIT_1__second;
  reaction_747: ERB3P_PK => ERB3P_PKP; c_b_271f*ERB3P_PK;
    c_b_271f = 1 MWDERIVEDUNIT_1__second;
  reaction_748: ERB3P + PKP -> ERB3P_PKP; c_b_272r*ERB3P*PKP - c_b_272f*ERB3P_PKP;
    c_b_272r = 0.01 MWDERIVEDUNIT_1__nanomole_second; c_b_272f = 0.1 MWDERIVEDUNIT_1__second;
  reaction_749: ERB3P_ShP_G_GABP + PhoA -> ERB3P_ShP_G_GABP_PhoA; c_b_278f*ERB3P_ShP_G_GABP*PhoA - c_b_278r*ERB3P_ShP_G_GABP_PhoA;
    c_b_278f = 0.001 MWDERIVEDUNIT_1__nanomole_second; c_b_278r = 0.1 MWDERIVEDUNIT_1__second;
  reaction_750: ERB3P_ShP_G_GABP_PhoA => ERB3P_ShP_G_GAB + PhoA; c_b_280*ERB3P_ShP_G_GABP_PhoA;
    c_b_280 = 0.03 MWDERIVEDUNIT_1__second;
  reaction_751: ERB3P_G_GABP + PhoA -> ERB3P_G_GABP_PhoA; c_b_279f*ERB3P_G_GABP*PhoA - c_b_279r*ERB3P_G_GABP_PhoA;
    c_b_279f = 0.001 MWDERIVEDUNIT_1__nanomole_second; c_b_279r = 0.1 MWDERIVEDUNIT_1__second;
  reaction_752: ERB3P_G_GABP_PhoA => ERB3P_G_GAB + PhoA; c_b_281*ERB3P_G_GABP_PhoA;
    c_b_281 = 0.03 MWDERIVEDUNIT_1__second;
  reaction_753: ERB3P_G_GABP_PKP + PIP2 -> ERB3P_G_GABP_PKP_PIP2; c_b_282f*ERB3P_G_GABP_PKP*PIP2 - c_b_282r*ERB3P_G_GABP_PKP_PIP2;
    c_b_282f = 6.25 MWDERIVEDUNIT_1__nanomole_second; c_b_282r = 3.5 MWDERIVEDUNIT_1__second;
  reaction_754: ERB3P_ShP_G_GABP_PKP + PIP2 -> ERB3P_ShP_G_GABP_PKP_PIP2; c_b_283f*ERB3P_ShP_G_GABP_PKP*PIP2 - c_b_283r*ERB3P_ShP_G_GABP_PKP_PIP2;
    c_b_283f = 6.25 MWDERIVEDUNIT_1__nanomole_second; c_b_283r = 3.5 MWDERIVEDUNIT_1__second;
  reaction_755: ERB3P_G_GABP_PKP_PIP2 => ERB3P_G_GABP_PKP + PIP3; c_b_284*ERB3P_G_GABP_PKP_PIP2;
    c_b_284 = 25 MWDERIVEDUNIT_1__second;
  reaction_756: ERB3P_ShP_G_GABP_PKP_PIP2 => ERB3P_ShP_G_GABP_PKP + PIP3; c_b_285*ERB3P_ShP_G_GABP_PKP_PIP2;
    c_b_285 = 25 MWDERIVEDUNIT_1__second;
  reaction_757: ERB3P_ShP_G + GABP -> ERB3P_ShP_G_GABP; c_b_290r*ERB3P_ShP_G*GABP - c_b_290f*ERB3P_ShP_G_GABP;
    c_b_290r = 0.01 MWDERIVEDUNIT_1__nanomole_second; c_b_290f = 1 MWDERIVEDUNIT_1__second;
  reaction_758: ERB3P_G + GABP -> ERB3P_G_GABP; c_b_291r*ERB3P_G*GABP - c_b_291f*ERB3P_G_GABP;
    c_b_291r = 0.01 MWDERIVEDUNIT_1__nanomole_second; c_b_291f = 1 MWDERIVEDUNIT_1__second;
  reaction_759: ERB3P_G + GAB_PIP3 -> ERB3P_G_GAB_PIP3; c_b_297f*ERB3P_G*GAB_PIP3 - c_b_297r*ERB3P_G_GAB_PIP3;
    c_b_297f = 2.5 MWDERIVEDUNIT_1__nanomole_second; c_b_297r = 1 MWDERIVEDUNIT_1__second;
  reaction_760: ERB3P_ShP_G + GAB_PIP3 -> ERB3P_ShP_G_GAB_PIP3; c_b_299r*ERB3P_ShP_G*GAB_PIP3 - c_b_299f*ERB3P_ShP_G_GAB_PIP3;
    c_b_299r = 2.5 MWDERIVEDUNIT_1__nanomole_second; c_b_299f = 1 MWDERIVEDUNIT_1__second;
  reaction_761: ERB3P_ShP_G_GAB_PIP3 => ERB3P_ShP_G_GABP + PIP3; c_b_300*ERB3P_ShP_G_GAB_PIP3;
    c_b_300 = 0.01 MWDERIVEDUNIT_1__second;
  reaction_762: ERB3P_G_GABP_PKP + PhoB -> ERB3P_G_GABP_PKP_PhoB; c_b_317f*ERB3P_G_GABP_PKP*PhoB - c_b_317r*ERB3P_G_GABP_PKP_PhoB;
    c_b_317f = 0.001 MWDERIVEDUNIT_1__nanomole_second; c_b_317r = 0.038 MWDERIVEDUNIT_1__second;
  reaction_763: ERB3P_G_GABP_PKP_PhoB => ERB3P_G_GABP_PK + PhoB; c_b_318*ERB3P_G_GABP_PKP_PhoB;
    c_b_318 = 0.595 MWDERIVEDUNIT_1__second;
  reaction_764: ERB3P_ShP_G_GABP_PKP + PhoB -> ERB3P_ShP_G_GABP_PKP_PhoB; c_b_319f*ERB3P_ShP_G_GABP_PKP*PhoB - c_b_319r*ERB3P_ShP_G_GABP_PKP_PhoB;
    c_b_319f = 0.001 MWDERIVEDUNIT_1__nanomole_second; c_b_319r = 0.038 MWDERIVEDUNIT_1__second;
  reaction_765: ERB3P_ShP_G_GABP_PKP_PhoB => ERB3P_ShP_G_GABP_PK + PhoB; c_b_320*ERB3P_ShP_G_GABP_PKP_PhoB;
    c_b_320 = 0.595 MWDERIVEDUNIT_1__second;
  reaction_766: ERB3P_ShP_G_GAB + PIP3 -> ERB3P_ShP_G_GAB_PIP3; c_b_323f*ERB3P_ShP_G_GAB*PIP3 - c_b_323r*ERB3P_ShP_G_GAB_PIP3;
    c_b_323f = 2.5 MWDERIVEDUNIT_1__nanomole_second; c_b_323r = 1 MWDERIVEDUNIT_1__second;
  reaction_767: ERB3P_PKP + PIP2 -> ERB3P_PKP_PIP2; c_b_326f*ERB3P_PKP*PIP2 - c_b_326r*ERB3P_PKP_PIP2;
    c_b_326f = 6.25 MWDERIVEDUNIT_1__nanomole_second; c_b_326r = 3.5 MWDERIVEDUNIT_1__second;
  reaction_768: ERB3P_PKP_PIP2 => ERB3P_PKP + PIP3; c_b_327f*ERB3P_PKP_PIP2;
    c_b_327f = 2.5 MWDERIVEDUNIT_1__second;
  reaction_769: ERB3P_ShP_G_GABP_PKP -> ERB3P_ShP_G_GABP + PKP; c_b_328f*ERB3P_ShP_G_GABP_PKP - c_b_328r*ERB3P_ShP_G_GABP*PKP;
    c_b_328f = 5 MWDERIVEDUNIT_1__second; c_b_328r = 0.05 MWDERIVEDUNIT_1__nanomole_second;
  reaction_770: ERB3P_G_GABP_PKP -> ERB3P_G_GABP + PKP; c_b_329f*ERB3P_G_GABP_PKP - c_b_329r*ERB3P_G_GABP*PKP;
    c_b_329f = 5 MWDERIVEDUNIT_1__second; c_b_329r = 0.05 MWDERIVEDUNIT_1__nanomole_second;
  reaction_771: ERB3P_G_GAB_PIP3 => ERB3P_G_GABP + PIP3; c_b_330*ERB3P_G_GAB_PIP3;
    c_b_330 = 0.01 MWDERIVEDUNIT_1__second;
  reaction_772: ERB3P_G_GAB + PIP3 -> ERB3P_G_GAB_PIP3; c_b_336f*ERB3P_G_GAB*PIP3 - c_b_336r*ERB3P_G_GAB_PIP3;
    c_b_336f = 1 MWDERIVEDUNIT_1__nanomole_second; c_b_336r = 2.5 MWDERIVEDUNIT_1__second;
  reaction_773: R + ERB3 -> R_ERB3; c217f*R*ERB3 - c217r*R_ERB3;
    c217f = 0.0001 MWDERIVEDUNIT_1__nanomole_second; c217r = 0.1 MWDERIVEDUNIT_1__second;
  reaction_774: R_ERB3 -> Rl_ERB3; c218f*EGF*R_ERB3 - c218r*Rl_ERB3;  // modifiers: EGF
    c218f = 0.0001 MWDERIVEDUNIT_1__nanomole_second; c218r = 0.1 MWDERIVEDUNIT_1__second;
  reaction_775: Rl_ERB3 => RlP_ERB3P; c219f*Rl_ERB3;
    c219f = 1 MWDERIVEDUNIT_1__second;
  reaction_776: RlP_ERB3P -> RP_ERB3P; c220f*RlP_ERB3P - c220r*EGF*RP_ERB3P;  // modifiers: EGF
    c220f = 0.1 MWDERIVEDUNIT_1__second; c220r = 0.01 MWDERIVEDUNIT_1__nanomole_second;
  reaction_777: RP_ERB3P -> RP + ERB3P; c221f*RP_ERB3P - c221r*RP*ERB3P;
    c221f = 0.1 MWDERIVEDUNIT_1__second; c221r = 0.01 MWDERIVEDUNIT_1__nanomole_second;
  reaction_778: Rl + ERB3 -> Rl_ERB3; c223f*Rl*ERB3 - c223r*Rl_ERB3;
    c223f = 0.001 MWDERIVEDUNIT_1__nanomole_second; c223r = 0.1 MWDERIVEDUNIT_1__second;
  reaction_779: ERB3P + R -> R_ERB3P; c224f*ERB3P*R - c224r*R_ERB3P;
    c224f = 0.001 MWDERIVEDUNIT_1__nanomole_second; c224r = 0.1 MWDERIVEDUNIT_1__second;
  reaction_780: RlP_ERB3P -> RlP + ERB3P; c226f*RlP_ERB3P - c227r_n*RlP*ERB3P;
    c226f = 0.1 MWDERIVEDUNIT_1__second; c227r_n = 0.01 MWDERIVEDUNIT_1__nanomole_second;
  reaction_781: RP + ERB3 -> RP_ERB3; c227f*RP*ERB3 - c227r*RP_ERB3;
    c227f = 0.001 MWDERIVEDUNIT_1__nanomole_second; c227r = 0.1 MWDERIVEDUNIT_1__second;
  reaction_782: RP_ERB3 => RP_ERB3P; c228f*RP_ERB3;
    c228f = 1 MWDERIVEDUNIT_1__second;
  reaction_783: ERB3 + ERB3 -> ERB3_ERB3; c229f*ERB3*ERB3 - c229r*ERB3_ERB3;
    c229f = 0.0001 MWDERIVEDUNIT_1__nanomole_second; c229r = 0.1 MWDERIVEDUNIT_1__second;
  reaction_784: ERB3P + ERB -> ERB3P_ERB; c230f*ERB3P*ERB - c230r*ERB3P_ERB;
    c230f = 0.01 MWDERIVEDUNIT_1__nanomole_second; c230r = 0.1 MWDERIVEDUNIT_1__second;
  reaction_785: ERB3P_ERB3P -> ERB3P + ERB3P; c232f*ERB3P_ERB3P - c232r*ERB3P*ERB3P;
    c232f = 0.1 MWDERIVEDUNIT_1__second; c232r = 0.01 MWDERIVEDUNIT_1__nanomole_second;
  reaction_786: ERB3 + ERB -> ERB3_ERB; c233f*ERB3*ERB - c233r*ERB3_ERB;
    c233f = 0.001 MWDERIVEDUNIT_1__nanomole_second; c233r = 0.1 MWDERIVEDUNIT_1__second;
  reaction_787: ERB3_ERB -> EGF_ERB3_ERB; c234f*EGF*ERB3_ERB - c234r*EGF_ERB3_ERB;  // modifiers: EGF
    c234f = 0.0001 MWDERIVEDUNIT_1__nanomole_second; c234r = 0.1 MWDERIVEDUNIT_1__second;
  reaction_788: ERB3 + ERBP -> ERB3_ERBP; c235f*ERB3*ERBP - c235r*ERB3_ERBP;
    c235f = 0.001 MWDERIVEDUNIT_1__nanomole_second; c235r = 0.1 MWDERIVEDUNIT_1__second;
  reaction_789: ERB3_ERBP => ERB3P_ERBP; c236f*ERB3_ERBP;
    c236f = 1 MWDERIVEDUNIT_1__second;
  reaction_790: ERB3P_ERBP -> ERB3P + ERBP; c237f*ERB3P_ERBP - c237r*ERB3P*ERBP;
    c237f = 0.1 MWDERIVEDUNIT_1__second; c237r = 0.001 MWDERIVEDUNIT_1__nanomole_second;
  reaction_791: ERB3 -> EGF_ERB3; c238f*EGF*ERB3 - c238r*EGF_ERB3;  // modifiers: EGF
    c238f = 0.0001 MWDERIVEDUNIT_1__nanomole_second; c238r = 0.1 MWDERIVEDUNIT_1__second;
  reaction_792: EGF_ERB3 + R -> EGF_ERB3_R; c239f*EGF_ERB3*R - c239r*EGF_ERB3_R;
    c239f = 0.0001 MWDERIVEDUNIT_1__nanomole_second; c239r = 0.1 MWDERIVEDUNIT_1__second;
  reaction_793: EGF_ERB3 + RP -> EGF_ERB3_RP; c240f*EGF_ERB3*RP - c240r*EGF_ERB3_RP;
    c240f = 0.0001 MWDERIVEDUNIT_1__nanomole_second; c240r = 0.1 MWDERIVEDUNIT_1__second;
  reaction_794: EGF_ERB3_RP => EGF_ERB3P_RP; c241f*EGF_ERB3_RP;
    c241f = 1 MWDERIVEDUNIT_1__second;
  reaction_795: EGF_ERB3P_RP -> RP_ERB3P; c242f*EGF_ERB3P_RP - c242r*EGF*RP_ERB3P;  // modifiers: EGF
    c242f = 0.1 MWDERIVEDUNIT_1__second; c242r = 0.0001 MWDERIVEDUNIT_1__nanomole_second;
  reaction_796: EGF_ERB3P_RP -> EGF_ERB3P + RP; c243f*EGF_ERB3P_RP - c243r*EGF_ERB3P*RP;
    c243f = 0.1 MWDERIVEDUNIT_1__second; c243r = 0.0001 MWDERIVEDUNIT_1__nanomole_second;
  reaction_797: EGF_ERB3 + ERBP -> EGF_ERB3_ERBP; c244f*EGF_ERB3*ERBP - c244r*EGF_ERB3_ERBP;
    c244f = 0.0001 MWDERIVEDUNIT_1__nanomole_second; c244r = 0.1 MWDERIVEDUNIT_1__second;
  reaction_798: EGF_ERB3_ERBP => EGF_ERB3P_ERBP; c245f*EGF_ERB3_ERBP;
    c245f = 1 MWDERIVEDUNIT_1__second;
  reaction_799: EGF_ERB3P_ERBP -> ERB3P_ERBP; c246f*EGF_ERB3P_ERBP - c246r*EGF*ERB3P_ERBP;  // modifiers: EGF
    c246f = 0.1 MWDERIVEDUNIT_1__second; c246r = 0.0001 MWDERIVEDUNIT_1__nanomole_second;
  reaction_800: EGF_ERB3 + ERB -> EGF_ERB3_ERB; c247f*EGF_ERB3*ERB - c247r*EGF_ERB3_ERB;
    c247f = 0.0001 MWDERIVEDUNIT_1__nanomole_second; c247r = 0.1 MWDERIVEDUNIT_1__second;
  reaction_801: EGF_ERB3P_ERBP -> EGF_ERB3P + ERBP; c248f*EGF_ERB3P_ERBP - c248r*EGF_ERB3P*ERBP;
    c248f = 0.1 MWDERIVEDUNIT_1__second; c248r = 0.0001 MWDERIVEDUNIT_1__nanomole_second;
  reaction_802: EGF_ERB3 + ERB3 -> EGF_ERB3_ERB3; c252f*EGF_ERB3*ERB3 - c252r*EGF_ERB3_ERB3;
    c252f = 0.0001 MWDERIVEDUNIT_1__nanomole_second; c252r = 0.1 MWDERIVEDUNIT_1__second;
  reaction_803: ERB3_ERB3 -> EGF_ERB3_ERB3; c253f*EGF*ERB3_ERB3 - c253r*EGF_ERB3_ERB3;  // modifiers: EGF
    c253f = 0.0001 MWDERIVEDUNIT_1__nanomole_second; c253r = 0.1 MWDERIVEDUNIT_1__second;
  reaction_804: CDC25CP + ERB3P -> CDC25CP_ERB3P; c254f*CDC25CP*ERB3P - c254r*CDC25CP_ERB3P;
    c254f = 0.01 MWDERIVEDUNIT_1__nanomole_second; c254r = 0.1 MWDERIVEDUNIT_1__second;
  reaction_805: CDC25CP_ERB3P => CDC25CP + ERB3; c255f*CDC25CP_ERB3P;
    c255f = 0.5 MWDERIVEDUNIT_1__second;
  reaction_806: CDC25CP + ERB3P_ERB3P -> CDC25CP_ERB3P_ERB3P; c256f*CDC25CP*ERB3P_ERB3P - c256r*CDC25CP_ERB3P_ERB3P;
    c256f = 0.01 MWDERIVEDUNIT_1__nanomole_second; c256r = 0.1 MWDERIVEDUNIT_1__second;
  reaction_807: CDC25CP_ERB3P_ERB3P => CDC25CP + ERB3_ERB3; c257f*CDC25CP_ERB3P_ERB3P;
    c257f = 0.5 MWDERIVEDUNIT_1__second;
  reaction_808: ERB3P + ERB3 -> ERB3P_ERB3; c258f*ERB3P*ERB3 - c258r*ERB3P_ERB3;
    c258f = 0.001 MWDERIVEDUNIT_1__nanomole_second; c258r = 0.1 MWDERIVEDUNIT_1__second;
  reaction_809: R_ERB3P -> Rl_ERB3P; c259f*R_ERB3P*EGF - c259r*Rl_ERB3P;  // modifiers: EGF
    c259f = 0.01 MWDERIVEDUNIT_1__nanomole_second; c259r = 0.1 MWDERIVEDUNIT_1__second;
  reaction_810: Rl_ERB3P => RlP_ERB3P; c260f*Rl_ERB3P;
    c260f = 1 MWDERIVEDUNIT_1__second;
  reaction_811: RP_ERB3P -> ERB3P + RP; c261f*RP_ERB3P - c261r*ERB3P*RP;
    c261f = 0.1 MWDERIVEDUNIT_1__second; c261r = 0.01 MWDERIVEDUNIT_1__nanomole_second;
  reaction_812: ERBP_PKP + PhoB -> ERBP_PKP_PhoB; c262f*ERBP_PKP*PhoB - c262r*ERBP_PKP_PhoB;
    c262f = 0.001 MWDERIVEDUNIT_1__nanomole_second; c262r = 0.038 MWDERIVEDUNIT_1__second;
  reaction_813: ERBP_PKP_PhoB => ERBP_PK + PhoB; c263f*ERBP_PKP_PhoB;
    c263f = 0.595 MWDERIVEDUNIT_1__second;
  reaction_814: ERB3P_PKP + PhoB -> ERB3P_PKP_PhoB; c264f*ERB3P_PKP*PhoB - c264r*ERB3P_PKP_PhoB;
    c264f = 0.001 MWDERIVEDUNIT_1__nanomole_second; c264r = 0.038 MWDERIVEDUNIT_1__second;
  reaction_815: ERB3P_PKP_PhoB => ERB3P_PK + PhoB; c265f*ERB3P_PKP_PhoB;
    c265f = 0.595 MWDERIVEDUNIT_1__second;
  reaction_816: RP_PKP + PhoB -> RP_PKP_PhoB; c266f*RP_PKP*PhoB - c266r*RP_PKP_PhoB;
    c266f = 0.001 MWDERIVEDUNIT_1__nanomole_second; c266r = 0.038 MWDERIVEDUNIT_1__second;
  reaction_817: RP_PKP_PhoB => RP_PK + PhoB; c267f*RP_PKP_PhoB;
    c267f = 0.595 MWDERIVEDUNIT_1__second;
  reaction_818: ERB_ERB => ERBP_ERBP; c268f*ERB_ERB;
    c268f = 1 MWDERIVEDUNIT_1__second;
  reaction_819: BetaCatenin + Cadh -> BetaCatenin_Cadh; c269f*BetaCatenin*Cadh - c269r*BetaCatenin_Cadh;
    c269f = 0.01 MWDERIVEDUNIT_1__nanomole_second; c269r = 0.01 MWDERIVEDUNIT_1__second;
  reaction_820: BetaCatenin_Cadh + PTP -> BetaCatenin_Cadh_PTP; c270f*BetaCatenin_Cadh*PTP - c270r*BetaCatenin_Cadh_PTP;
    c270f = 0.01 MWDERIVEDUNIT_1__nanomole_second; c270r = 1 MWDERIVEDUNIT_1__second;
  reaction_821: Cadh + PTP -> Cadh_PTP; c271f*Cadh*PTP - c271r*Cadh_PTP;
    c271f = 0.01 MWDERIVEDUNIT_1__nanomole_second; c271r = 1 MWDERIVEDUNIT_1__second;
  reaction_822: BetaCatenin_Cadh + RP -> BetaCatenin_Cadh_RP; c272f*BetaCatenin_Cadh*RP - c272r*BetaCatenin_Cadh_RP;
    c272f = 2.5 MWDERIVEDUNIT_1__nanomole_second; c272r = 1 MWDERIVEDUNIT_1__second;
  reaction_823: BetaCatenin_Cadh_RP => BetaCateninY654 + Cadh + RP; c273f*BetaCatenin_Cadh_RP;
    c273f = 1 MWDERIVEDUNIT_1__second;
  reaction_824: Cadh_PTP + BetaCateninY654 -> BetaCateninY654_Cadh_PTP; c274f*Cadh_PTP*BetaCateninY654 - c274r*BetaCateninY654_Cadh_PTP;
    c274f = 0.01 MWDERIVEDUNIT_1__nanomole_second; c274r = 0.1 MWDERIVEDUNIT_1__second;
  reaction_825: BetaCateninY654_Cadh_PTP => BetaCatenin + Cadh_PTP; c275f*BetaCateninY654_Cadh_PTP;
    c275f = 1 MWDERIVEDUNIT_1__second;
  reaction_826: BetaCatenin_Cadh_PTP -> BetaCatenin + Cadh_PTP; c276f*BetaCatenin_Cadh_PTP - _276r*BetaCatenin*Cadh_PTP;
    c276f = 0.1 MWDERIVEDUNIT_1__second; _276r = 0.01 MWDERIVEDUNIT_1__nanomole_second;
  reaction_827: BetaCatenin_Cadh + ERBP -> BetaCatenin_Cadh_ERBP; c277f*BetaCatenin_Cadh*ERBP - c277r*BetaCatenin_Cadh_ERBP;
    c277f = 2.5 MWDERIVEDUNIT_1__nanomole_second; c277r = 1 MWDERIVEDUNIT_1__second;
  reaction_828: BetaCatenin_Cadh_ERBP => BetaCateninY654 + Cadh + ERBP; c278f*BetaCatenin_Cadh_ERBP;
    c278f = 1 MWDERIVEDUNIT_1__second;
  reaction_829: -> DIMTGF; c480f*TGF*TGF - c480r*DIMTGF;  // modifiers: TGF
    c480f = 0.01 MWDERIVEDUNIT_1__nanomole_second; c480r = 0.01 MWDERIVEDUNIT_1__second;
  reaction_830: DIMTGF + DIMTBRII -> DIMTGF_DIMTBRII; C481F*DIMTGF*DIMTBRII - C481R*DIMTGF_DIMTBRII;
    C481F = 0.01 MWDERIVEDUNIT_1__nanomole_second; C481R = 0.03 MWDERIVEDUNIT_1__second;
  reaction_831: DIMTGF_DIMTBRII + DIMTBRI -> DIMTGF_DIMTBRII_DIMTBRI; C482F*DIMTGF_DIMTBRII*DIMTBRI - C482R*DIMTGF_DIMTBRII_DIMTBRI;
    C482F = 0.01 MWDERIVEDUNIT_1__nanomole_second; C482R = 0.01 MWDERIVEDUNIT_1__second;
  reaction_832: DIMTGF_DIMTBRII_DIMTBRI => DIMTGF_DIMTBRII_DIMTBRIP; C483*DIMTGF_DIMTBRII_DIMTBRI;
    C483 = 0.1 MWDERIVEDUNIT_1__second;
  reaction_833: DIMTGF_DIMTBRII_DIMTBRIP + SMADII -> DIMTGF_DIMTBRII_DIMTBRIP_SMADII; C486F*DIMTGF_DIMTBRII_DIMTBRIP*SMADII - C486R*DIMTGF_DIMTBRII_DIMTBRIP_SMADII;
    C486F = 0.01 MWDERIVEDUNIT_1__nanomole_second; C486R = 10 MWDERIVEDUNIT_1__second;
  reaction_834: TBRI + TBRI -> DIMTBRI; C487F*TBRI*TBRI - C487R*DIMTBRI;
    C487F = 0.01 MWDERIVEDUNIT_1__nanomole_second; C487R = 0.1 MWDERIVEDUNIT_1__second;
  reaction_835: TBRII + TBRII -> DIMTBRII; C488F*TBRII*TBRII - C488R*DIMTBRII;
    C488F = 0.01 MWDERIVEDUNIT_1__nanomole_second; C488R = 0.1 MWDERIVEDUNIT_1__second;
  reaction_836: DIMTGF_DIMTBRII_DIMTBRIP_SMADII => DIMTGF_DIMTBRII_DIMTBRIP + SMADIIP; C489*DIMTGF_DIMTBRII_DIMTBRIP_SMADII;
    C489 = 1 MWDERIVEDUNIT_1__second;
  reaction_837: DIMTGF_DIMTBRII_DIMTBRIP + SMADIII -> DIMTGF_DIMTBRII_DIMTBRIP_SMADIII; C490F*DIMTGF_DIMTBRII_DIMTBRIP*SMADIII - C490R*DIMTGF_DIMTBRII_DIMTBRIP_SMADIII;
    C490F = 0.01 MWDERIVEDUNIT_1__nanomole_second; C490R = 10 MWDERIVEDUNIT_1__second;
  reaction_838: DIMTGF_DIMTBRII_DIMTBRIP_SMADIII => DIMTGF_DIMTBRII_DIMTBRIP + SMADIIIP; C491*DIMTGF_DIMTBRII_DIMTBRIP_SMADIII;
    C491 = 1 MWDERIVEDUNIT_1__second;
  reaction_839: DIMTGF_DIMTBRII_DIMTBRIP + TAK -> DIMTGF_DIMTBRII_DIMTBRIP_TAK; C492F*DIMTGF_DIMTBRII_DIMTBRIP*TAK - C492R*DIMTGF_DIMTBRII_DIMTBRIP_TAK;
    C492F = 0.01 MWDERIVEDUNIT_1__nanomole_second; C492R = 0.01 MWDERIVEDUNIT_1__second;
  reaction_840: DIMTGF_DIMTBRII_DIMTBRIP_TAK => DIMTGF_DIMTBRII_DIMTBRIP + TAKP; C493*DIMTGF_DIMTBRII_DIMTBRIP_TAK;
    C493 = 10 MWDERIVEDUNIT_1__second;
  reaction_841: NLKP + TCFLEF -> NLKP_TCFLEF; C496F*NLKP*TCFLEF - C496R*NLKP_TCFLEF;
    C496F = 0.01 MWDERIVEDUNIT_1__nanomole_second; C496R = 1 MWDERIVEDUNIT_1__second;
  reaction_842: NLKP_TCFLEF => NLKP + TCFLEFP; C497*NLKP_TCFLEF;
    C497 = 1 MWDERIVEDUNIT_1__second;
  reaction_843: TCFLEFP + Pase8 -> TCFLEFP_Pase8; C498F*TCFLEFP*Pase8 - C498R*TCFLEFP_Pase8;
    C498F = 0.01 MWDERIVEDUNIT_1__nanomole_second; C498R = 1 MWDERIVEDUNIT_1__second;
  reaction_844: TCFLEFP_Pase8 => TCFLEF + Pase8; C499*TCFLEFP_Pase8;
    C499 = 0.1 MWDERIVEDUNIT_1__second;
  reaction_845: TAKP + Pase9 -> TAKP_Pase9; C500F*TAKP*Pase9 - C500R*TAKP_Pase9;
    C500F = 0.01 MWDERIVEDUNIT_1__nanomole_second; C500R = 1 MWDERIVEDUNIT_1__second;
  reaction_846: TAKP_Pase9 => TAK + Pase9; C501*TAKP_Pase9;
    C501 = 0.1 MWDERIVEDUNIT_1__second;
  reaction_847: NLKP + Pase10 -> NLKP_Pase10; C502F*NLKP*Pase10 - C502R*NLKP_Pase10;
    C502F = 0.01 MWDERIVEDUNIT_1__nanomole_second; C502R = 1 MWDERIVEDUNIT_1__second;
  reaction_848: NLKP_Pase10 => NLK + Pase10; C503*NLKP_Pase10;
    C503 = 0.1 MWDERIVEDUNIT_1__second;
  reaction_849: SMADIIP + SMAD4 -> SMADIIP_SMAD4; C504F*SMADIIP*SMAD4 - C504R*SMADIIP_SMAD4;
    C504F = 0.01 MWDERIVEDUNIT_1__nanomole_second; C504R = 0.01 MWDERIVEDUNIT_1__second;
  reaction_850: SMADIIIP + SMAD4 -> SMADIIIP_SMAD4; C505F*SMADIIIP*SMAD4 - C505R*SMADIIIP_SMAD4;
    C505F = 0.01 MWDERIVEDUNIT_1__nanomole_second; C505R = 0.01 MWDERIVEDUNIT_1__second;
  reaction_851: TCFLEF + BetaCatenin -> TCFLEF_BetaCatenin; C510F*TCFLEF*BetaCatenin - C510R*TCFLEF_BetaCatenin;
    C510F = 0.01 MWDERIVEDUNIT_1__nanomole_second; C510R = 10 MWDERIVEDUNIT_1__second;
  reaction_852: SMADIIIP + PP1A -> SMADIIIP_PP1A; C511F*SMADIIIP*PP1A - C511R*SMADIIIP_PP1A;
    C511F = 0.01 MWDERIVEDUNIT_1__nanomole_second; C511R = 10 MWDERIVEDUNIT_1__second;
  reaction_853: SMADIIIP_PP1A => SMADIII + PP1A; C512*SMADIIIP_PP1A;
    C512 = 0.1 MWDERIVEDUNIT_1__second;
  reaction_854: SMADIIP + PP1A -> SMADIIP_PP1A; C513F*SMADIIP*PP1A - C514R*SMADIIP_PP1A;
    C513F = 0.01 MWDERIVEDUNIT_1__nanomole_second; C514R = 10 MWDERIVEDUNIT_1__second;
  reaction_855: SMADIIP_PP1A => SMADII + PP1A; C514*SMADIIP_PP1A;
    C514 = 0.1 MWDERIVEDUNIT_1__second;
  reaction_856: TCFLEF + BetaCateninY654 -> TCFLEF_BetaCateninY654; C515F*TCFLEF*BetaCateninY654 - C515R*TCFLEF_BetaCateninY654;
    C515F = 0.01 MWDERIVEDUNIT_1__nanomole_second; C515R = 10 MWDERIVEDUNIT_1__second;
  reaction_857: TCFLEF_BetaCateninY654 + TFBS -> TCFLEF_BetaCateninY654_TFBS; C516F*TCFLEF_BetaCateninY654*TFBS - C516R*TCFLEF_BetaCateninY654_TFBS;
    C516F = 0.01 MWDERIVEDUNIT_1__nanomole_second; C516R = 0.01 MWDERIVEDUNIT_1__second;
  reaction_858: TCFLEF_BetaCatenin + TFBS -> TCFLEF_BetaCatenin_TFBS; C517F*TCFLEF_BetaCatenin*TFBS - C517R*TCFLEF_BetaCatenin_TFBS;
    C517F = 0.01 MWDERIVEDUNIT_1__nanomole_second; C517R = 0.02 MWDERIVEDUNIT_1__second;
  reaction_859: DIMTGF_DIMTBRII + DIMTBRIP -> DIMTGF_DIMTBRII_DIMTBRIP; C518F*DIMTGF_DIMTBRII*DIMTBRIP - C518R*DIMTGF_DIMTBRII_DIMTBRIP;
    C518F = 0.01 MWDERIVEDUNIT_1__nanomole_second; C518R = 0.1 MWDERIVEDUNIT_1__second;
  reaction_860: DIMTBRIP + PP1C -> DIMTBRIP_PP1C; C519F*DIMTBRIP*PP1C - C519R*DIMTBRIP_PP1C;
    C519F = 0.01 MWDERIVEDUNIT_1__nanomole_second; C519R = 1 MWDERIVEDUNIT_1__second;
  reaction_861: DIMTBRIP_PP1C => DIMTBRI + PP1C; C520*DIMTBRIP_PP1C;
    C520 = 0.5 MWDERIVEDUNIT_1__second;
  reaction_862: SMADIIP_SMAD4 + TFBSI -> SMADIIP_SMAD4_TFBSI; C521F*SMADIIP_SMAD4*TFBSI - C521R*SMADIIP_SMAD4_TFBSI;
    C521F = 0.01 MWDERIVEDUNIT_1__nanomole_second; C521R = 0.1 MWDERIVEDUNIT_1__second;
  reaction_863: SMADIIIP_SMAD4 + TFBSI -> SMADIIIP_SMAD4_TFBSI; C522F*SMADIIIP_SMAD4*TFBSI - C522R*SMADIIIP_SMAD4_TFBSI;
    C522F = 0.01 MWDERIVEDUNIT_1__nanomole_second; C522R = 0.1 MWDERIVEDUNIT_1__second;
  reaction_864: Ras_GTP + PI3K -> Ras_GTP_PK; C523F*Ras_GTP*PI3K - C523R*Ras_GTP_PK;
    C523F = 0.001 MWDERIVEDUNIT_1__nanomole_second; C523R = 15 MWDERIVEDUNIT_1__second;
  reaction_865: Ras_GTP_PK => Ras_GTP_PKP; C524*Ras_GTP_PK;
    C524 = 0.1 MWDERIVEDUNIT_1__second;
  reaction_866: Ras_GTP_PKP -> Ras_GTP + PKP; C525R*Ras_GTP_PKP - C525F*Ras_GTP*PKP;
    C525R = 15 MWDERIVEDUNIT_1__second; C525F = 0.001 MWDERIVEDUNIT_1__nanomole_second;
  reaction_867: Ras_GTP_PKP + PIP2 -> Ras_GTP_PKP_PIP2; C526F*Ras_GTP_PKP*PIP2 - C526R*Ras_GTP_PKP_PIP2;
    C526F = 0.625 MWDERIVEDUNIT_1__nanomole_second; C526R = 10 MWDERIVEDUNIT_1__second;
  reaction_868: Ras_GTP_PKP + PhoB -> Ras_GTP_PKP_PhoB; C528F*Ras_GTP_PKP*PhoB - C528R*Ras_GTP_PKP_PhoB;
    C528F = 0.01 MWDERIVEDUNIT_1__nanomole_second; C528R = 1 MWDERIVEDUNIT_1__second;
  reaction_869: Ras_GTP_PKP_PhoB => Ras_GTP + PI3K + PhoB; C528*Ras_GTP_PKP_PhoB;
    C528 = 0.5 MWDERIVEDUNIT_1__second;
  reaction_870: Ras_GTP_PKP_PIP2 => Ras_GTP_PKP + PIP3; C527*Ras_GTP_PKP_PIP2;
    C527 = 2.5 MWDERIVEDUNIT_1__second;
  reaction_871: ERKPP + AP1 -> ERKPP_AP1; c528f*ERKPP*AP1 - c528r*ERKPP_AP1;
    c528f = 0.01 MWDERIVEDUNIT_1__nanomole_second; c528r = 10 MWDERIVEDUNIT_1__second;
  reaction_872: ERKPP_AP1 => ERKPP + AP1P; c529*ERKPP_AP1;
    c529 = 1 MWDERIVEDUNIT_1__second;
  reaction_873: AP1P + Pase12 -> AP1P_Pase12; c530f*AP1P*Pase12 - c530r*AP1P_Pase12;
    c530f = 0.01 MWDERIVEDUNIT_1__nanomole_second; c530r = 0.1 MWDERIVEDUNIT_1__second;
  reaction_874: AP1P_Pase12 => AP1 + Pase12; c531*AP1P_Pase12;
    c531 = 1 MWDERIVEDUNIT_1__second;
  reaction_875: AP1 + TFBSII -> AP1_TFBSII; c532f*AP1*TFBSII - c532r*AP1_TFBSII;
    c532f = 0.01 MWDERIVEDUNIT_1__nanomole_second; c532r = 7 MWDERIVEDUNIT_1__second;
  reaction_876: AP1P + TFBSII -> AP1P_TFBSII; c533f*AP1P*TFBSII - c533r*AP1P_TFBSII;
    c533f = 0.01 MWDERIVEDUNIT_1__nanomole_second; c533r = 0.35 MWDERIVEDUNIT_1__second;
  reaction_877: FRZ -> WNT_FRZ; c534f*WNT*FRZ - c534r*WNT_FRZ;  // modifiers: WNT
    c534f = 0.01 MWDERIVEDUNIT_1__nanomole_second; c534r = 0.04 MWDERIVEDUNIT_1__second;
  reaction_878: WNT_FRZ + LRP6 -> WNT_FRZ_LRP6; c535f*WNT_FRZ*LRP6 - c535r*WNT_FRZ_LRP6;
    c535f = 0.01 MWDERIVEDUNIT_1__nanomole_second; c535r = 0.04 MWDERIVEDUNIT_1__second;
  reaction_879: WNT_FRZ_LRP6 + DVL -> WNT_FRZ_LRP6_DVL; c536f*WNT_FRZ_LRP6*DVL - c536r*WNT_FRZ_LRP6_DVL;
    c536f = 0.01 MWDERIVEDUNIT_1__nanomole_second; c536r = 0.04 MWDERIVEDUNIT_1__second;
  reaction_880: AXN + GSK -> AXN_GSK; c537f*AXN*GSK - c537r*AXN_GSK;
    c537f = 0.01 MWDERIVEDUNIT_1__nanomole_second; c537r = 0.1 MWDERIVEDUNIT_1__second;
  reaction_881: AXN_GSK => AXNP_GSK; c538*AXN_GSK;
    c538 = 1 MWDERIVEDUNIT_1__second;
  reaction_882: AXNP_GSK + APC -> AXNP_GSK_APC; c539f*AXNP_GSK*APC - c539r*AXNP_GSK_APC;
    c539f = 0.01 MWDERIVEDUNIT_1__nanomole_second; c539r = 0.1 MWDERIVEDUNIT_1__second;
  reaction_883: AXNP_GSK_APC => AXNP_GSK_APCP; c540*AXNP_GSK_APC;
    c540 = 1 MWDERIVEDUNIT_1__second;
  reaction_884: WNT_FRZ_LRP6_DVL + GSK -> WNT_FRZ_LRP6_DVL_GSK; c541f*WNT_FRZ_LRP6_DVL*GSK - c541r*WNT_FRZ_LRP6_DVL_GSK;
    c541f = 0.01 MWDERIVEDUNIT_1__nanomole_second; c541r = 0.04 MWDERIVEDUNIT_1__second;
  reaction_885: WNT_FRZ_LRP6_DVL_GSK => WNT_FRZ_LRP6P_DVL_GSK; c542*WNT_FRZ_LRP6_DVL_GSK;
    c542 = 1 MWDERIVEDUNIT_1__second;
  reaction_886: WNT_FRZ_LRP6P_DVL_GSK + AXN -> WNT_FRZ_LRP6P_DVL_GSK_AXN; c543f*WNT_FRZ_LRP6P_DVL_GSK*AXN - c543r*WNT_FRZ_LRP6P_DVL_GSK_AXN;
    c543f = 0.01 MWDERIVEDUNIT_1__nanomole_second; c543r = 0.04 MWDERIVEDUNIT_1__second;
  reaction_887: AXNP_GSK_APCP + BetaCatenin -> AXNP_GSK_APCP_BetaCatenin; c544f*AXNP_GSK_APCP*BetaCatenin - c544r*AXNP_GSK_APCP_BetaCatenin;
    c544f = 0.01 MWDERIVEDUNIT_1__nanomole_second; c544r = 0.1 MWDERIVEDUNIT_1__second;
  reaction_888: AXNP_GSK_APCP_BetaCatenin => AXNP_GSK_APCP + BetaCateninP; c545*AXNP_GSK_APCP_BetaCatenin;
    c545 = 1 MWDERIVEDUNIT_1__second;
  reaction_889: BetaCateninP => BetaCateninU; c546*BetaCateninP;
    c546 = 1 MWDERIVEDUNIT_1__second;
  reaction_890: => BetaCatenin; c547*BetaCatenin_generator;  // modifiers: BetaCatenin_generator
    c547 = 0.05 MWDERIVEDUNIT_1__second;
  reaction_891: WNT_FRZ_LRP6P_DVL_GSK + PhoE -> WNT_FRZ_LRP6P_DVL_GSK_PhoE; c548f*WNT_FRZ_LRP6P_DVL_GSK*PhoE - c548r*WNT_FRZ_LRP6P_DVL_GSK_PhoE;
    c548f = 0.01 MWDERIVEDUNIT_1__nanomole_second; c548r = 0.1 MWDERIVEDUNIT_1__second;
  reaction_892: WNT_FRZ_LRP6P_DVL_GSK_PhoE => WNT_FRZ_LRP6_DVL + GSK + PhoE; c549*WNT_FRZ_LRP6P_DVL_GSK_PhoE;
    c549 = 0.5 MWDERIVEDUNIT_1__second;
  reaction_893: AXNP_GSK + PhoE -> AXNP_GSK_PhoE; c550f*AXNP_GSK*PhoE - c550r*AXNP_GSK_PhoE;
    c550f = 0.01 MWDERIVEDUNIT_1__nanomole_second; c550r = 0.1 MWDERIVEDUNIT_1__second;
  reaction_894: AXNP_GSK_PhoE => AXN + GSK + PhoE; c551*AXNP_GSK_PhoE;
    c551 = 0.5 MWDERIVEDUNIT_1__second;
  reaction_895: BetaCateninP + PhoE -> BetaCateninP_PhoE; c552f*BetaCateninP*PhoE - c552r*BetaCateninP_PhoE;
    c552f = 0.01 MWDERIVEDUNIT_1__nanomole_second; c552r = 0.1 MWDERIVEDUNIT_1__second;
  reaction_896: BetaCateninP_PhoE => BetaCatenin + PhoE; c553*BetaCateninP_PhoE;
    c553 = 1 MWDERIVEDUNIT_1__second;
  reaction_897: AXNP_GSK -> AXNP + GSK; c554r*AXNP_GSK - c554f*AXNP*GSK;
    c554r = 0.1 MWDERIVEDUNIT_1__second; c554f = 0.01 MWDERIVEDUNIT_1__nanomole_second;
  reaction_898: AXNP + PhoE -> AXNP_PhoE; c555f*AXNP*PhoE - c555r*AXNP_PhoE;
    c555f = 0.01 MWDERIVEDUNIT_1__nanomole_second; c555r = 0.1 MWDERIVEDUNIT_1__second;
  reaction_899: AXNP_PhoE => AXN + PhoE; c556*AXNP_PhoE;
    c556 = 1 MWDERIVEDUNIT_1__second;
  reaction_900: AXNP_GSK_APCP -> AXNP_GSK + APCP; c557r*AXNP_GSK_APCP - c557f*AXNP_GSK*APCP;
    c557r = 0.1 MWDERIVEDUNIT_1__second; c557f = 0.01 MWDERIVEDUNIT_1__nanomole_second;
  reaction_901: APCP + PhoE -> APCP_PhoE; c558f*APCP*PhoE - c558r*APCP_PhoE;
    c558f = 0.01 MWDERIVEDUNIT_1__nanomole_second; c558r = 0.1 MWDERIVEDUNIT_1__second;
  reaction_902: APCP_PhoE => APC + PhoE; c559*APCP_PhoE;
    c559 = 1 MWDERIVEDUNIT_1__second;
  reaction_903: => PIP2; c560*PIP2_Gen;  // modifiers: PIP2_Gen
    c560 = 10 MWDERIVEDUNIT_1__second;
  reaction_904: PIP2 + PLCyP -> PIP2_PLCyP; c561f*PIP2*PLCyP - c561r*PIP2_PLCyP;
    c561f = 0.01 MWDERIVEDUNIT_1__nanomole_second; c561r = 10 MWDERIVEDUNIT_1__second;
  reaction_905: PIP2_PLCyP => IP3 + DAG + PLCyP; c562*PIP2_PLCyP;
    c562 = 0.001 MWDERIVEDUNIT_1__second;
  reaction_906: DAG + PKC -> DAG_PKC; c563f*DAG*PKC - c563r*DAG_PKC;
    c563f = 0.01 MWDERIVEDUNIT_1__nanomole_second; c563r = 0.1 MWDERIVEDUNIT_1__second;
  reaction_907: IP3 => IP3D; c565*IP3;
    c565 = 1e-5 MWDERIVEDUNIT_1__second;
  reaction_908: DAG => DAGD; c566*DAG;
    c566 = 1e-5 MWDERIVEDUNIT_1__second;
  reaction_909: DAG_PKC + Raf_unnamed_35 -> DAG_PKC_Raf; c567f*DAG_PKC*Raf_unnamed_35 - c567r*DAG_PKC_Raf;
    c567f = 0.01 MWDERIVEDUNIT_1__nanomole_second; c567r = 0.1 MWDERIVEDUNIT_1__second;
  reaction_910: DAG_PKC_Raf => DAG + PKC + Raf_unnamed_37; c568*DAG_PKC_Raf;
    c568 = 10 MWDERIVEDUNIT_1__second;
  reaction_911: WNT_FRZ_LRP6 + TAK -> WNT_FRZ_LRP6_TAK; c569f*WNT_FRZ_LRP6*TAK - c569r*WNT_FRZ_LRP6_TAK;
    c569f = 0.01 MWDERIVEDUNIT_1__nanomole_second; c569r = 10 MWDERIVEDUNIT_1__second;
  reaction_912: WNT_FRZ_LRP6_TAK => WNT_FRZ_LRP6 + TAKP; c570*WNT_FRZ_LRP6_TAK;
    c570 = 0.1 MWDERIVEDUNIT_1__second;
  reaction_913: TAKP + TAB -> TAKP_TAB; c571f*TAKP*TAB - c571r*TAKP_TAB;
    c571f = 0.01 MWDERIVEDUNIT_1__nanomole_second; c571r = 10 MWDERIVEDUNIT_1__second;
  reaction_914: TAKP_TAB + NLK -> TAKP_TAB_NLK; c572f*TAKP_TAB*NLK - c572r*TAKP_TAB_NLK;
    c572f = 0.01 MWDERIVEDUNIT_1__nanomole_second; c572r = 10 MWDERIVEDUNIT_1__second;
  reaction_915: TAKP_TAB_NLK => TAKP_TAB + NLKP; c573*TAKP_TAB_NLK;
    c573 = 1 MWDERIVEDUNIT_1__second;
  reaction_916: GROUCHO + TCFLEF -> GROUCHO_TCFLEF; c578f*GROUCHO*TCFLEF - c578r*GROUCHO_TCFLEF;
    c578f = 0.01 MWDERIVEDUNIT_1__nanomole_second; c578r = 10 MWDERIVEDUNIT_1__second;
  reaction_917: GROUCHO_TCFLEF + TFBS -> GROUCHO_TCFLEF_TFBS; c579f*GROUCHO_TCFLEF*TFBS - c579r*GROUCHO_TCFLEF_TFBS;
    c579f = 0.01 MWDERIVEDUNIT_1__nanomole_second; c579r = 1 MWDERIVEDUNIT_1__second;
  reaction_918: APC + BetaCatenin -> APC_BetaCatenin; c581f*APC*BetaCatenin - c581r*APC_BetaCatenin;
    c581f = 0.01 MWDERIVEDUNIT_1__nanomole_second; c581r = 12 MWDERIVEDUNIT_1__second;
  reaction_919: SMAD4 + TCFLEF -> SMAD4_TCFLEF; c582f*SMAD4*TCFLEF - c582r*SMAD4_TCFLEF;
    c582f = 0.01 MWDERIVEDUNIT_1__nanomole_second; c582r = 1 MWDERIVEDUNIT_1__second;
  reaction_920: SMAD4_TCFLEF + TFBS -> SMAD4_TCFLEF_TFBS; c583f*SMAD4_TCFLEF*TFBS - c583r*SMAD4_TCFLEF_TFBS;
    c583f = 0.01 MWDERIVEDUNIT_1__nanomole_second; c583r = 1 MWDERIVEDUNIT_1__second;
  reaction_921: PIP2 => PIP2deg; c584*PIP2;
    c584 = 0.0004 MWDERIVEDUNIT_1__second;
  reaction_922: PKP -> PKP_PI3K_inhibitor; c586f*PKP*PI3K_inhibitor - c586r*PKP_PI3K_inhibitor;  // modifiers: PI3K_inhibitor
    c586f = 0.01 MWDERIVEDUNIT_1__nanomole_second; c586r = 1.5 MWDERIVEDUNIT_1__second;
  reaction_923: BetaCatenin => BetaCateninDeg; c587*BetaCatenin;
    c587 = 1e-7 MWDERIVEDUNIT_1__second;
  reaction_924: PIP3 => PIP3Deg; c591*PIP3;
    c591 = 0.0001 MWDERIVEDUNIT_1__second;
  reaction_925: AKT -> AKT_AKT_inhibi; c592f*AKT*AKT_inhibi - c592r*AKT_AKT_inhibi;  // modifiers: AKT_inhibi
    c592f = 0.01 MWDERIVEDUNIT_1__nanomole_second; c592r = 48 MWDERIVEDUNIT_1__second;
  reaction_926: AXNP_GSK + BetaCatenin -> AXNP_GSK_BetaCatenin; c593f*AXNP_GSK*BetaCatenin - c593r*AXNP_GSK_BetaCatenin;
    c593f = 0.01 MWDERIVEDUNIT_1__nanomole_second; c593r = 10000 MWDERIVEDUNIT_1__second;
  reaction_927: AXNP_GSK_BetaCatenin => AXNP_GSK + BetaCateninP; c594*AXNP_GSK_BetaCatenin;
    c594 = 1 MWDERIVEDUNIT_1__second;
  reaction_928: MEKPP -> MEKPP_MEK_inhi; c595f*MEKPP*MEK_inhi - c595r*MEKPP_MEK_inhi;  // modifiers: MEK_inhi
    c595f = 0.01 MWDERIVEDUNIT_1__nanomole_second; c595r = 3 MWDERIVEDUNIT_1__second;
  reaction_929: G_S + ERKPP -> G_S_ERKPP; c596f*G_S*ERKPP - c596r*G_S_ERKPP;
    c596f = 0.01 MWDERIVEDUNIT_1__nanomole_second; c596r = 0.033 MWDERIVEDUNIT_1__second;
  reaction_930: G_S_ERKPP => Grb + SOSP + ERKPP; c597*G_S_ERKPP;
    c597 = 1 MWDERIVEDUNIT_1__second;
  reaction_931: AKTP + MDM2 -> AKTP_MDM2; c598f*AKTP*MDM2 - c598r*AKTP_MDM2;
    c598f = 0.01 MWDERIVEDUNIT_1__nanomole_second; c598r = 0.1 MWDERIVEDUNIT_1__second;
  reaction_932: AKTP_MDM2 => AKTP + MDM2P; c599*AKTP_MDM2;
    c599 = 0.1 MWDERIVEDUNIT_1__second;
  reaction_933: MDM2P + TP53 -> MDM2P_TP53; c600f*MDM2P*TP53 - c600r*MDM2P_TP53;
    c600f = 0.01 MWDERIVEDUNIT_1__nanomole_second; c600r = 0.1 MWDERIVEDUNIT_1__second;
  reaction_934: MDM2P_TP53 => MDM2P + TP53U; c601*MDM2P_TP53;
    c601 = 1 MWDERIVEDUNIT_1__second;
  reaction_935: => TP53; c602*TP53gen;  // modifiers: TP53gen
    c602 = 0.05 MWDERIVEDUNIT_1__second;
  reaction_936: MDM2P + Pho13 -> MDM2P_Pho13; c603f*MDM2P*Pho13 - c603r*MDM2P_Pho13;
    c603f = 0.01 MWDERIVEDUNIT_1__nanomole_second; c603r = 0.1 MWDERIVEDUNIT_1__second;
  reaction_937: MDM2P_Pho13 => MDM2 + Pho13; c604*MDM2P_Pho13;
    c604 = 1 MWDERIVEDUNIT_1__second;
  reaction_938: TP53 + TFBSIV -> TP53_TFBSIV; c605f*TP53*TFBSIV - c605r*TP53_TFBSIV;
    c605f = 0.01 MWDERIVEDUNIT_1__nanomole_second; c605r = 0.1 MWDERIVEDUNIT_1__second;
  reaction_939: RP_ShP_G_GABP + ERKPP -> RP_ShP_G_GABP_ERKPP; c606f*RP_ShP_G_GABP*ERKPP - c606r*RP_ShP_G_GABP_ERKPP;
    c606f = 0.01 MWDERIVEDUNIT_1__nanomole_second; c606r = 0.1 MWDERIVEDUNIT_1__second;
  reaction_940: RP_ShP_G_GABP_ERKPP => RP_ShP_G + GABPP + ERKPP; c607*RP_ShP_G_GABP_ERKPP;
    c607 = 1 MWDERIVEDUNIT_1__second;
  reaction_941: RP_G_GABP + ERKPP -> RP_G_GABP_ERKPP; c608f*RP_G_GABP*ERKPP - c608r*RP_G_GABP_ERKPP;
    c608f = 0.01 MWDERIVEDUNIT_1__nanomole_second; c608r = 0.1 MWDERIVEDUNIT_1__second;
  reaction_942: RP_G_GABP_ERKPP => RP_G + GABPP + ERKPP; c609*RP_G_GABP_ERKPP;
    c609 = 1 MWDERIVEDUNIT_1__second;
  reaction_943: ERBP_ShP_G_GABP + ERKPP -> ERBP_ShP_G_GABP_ERKPP; c610f*ERBP_ShP_G_GABP*ERKPP - c610r*ERBP_ShP_G_GABP_ERKPP;
    c610f = 0.01 MWDERIVEDUNIT_1__nanomole_second; c610r = 0.1 MWDERIVEDUNIT_1__second;
  reaction_944: ERBP_ShP_G_GABP_ERKPP => ERBP_ShP_G + GABPP + ERKPP; c611*ERBP_ShP_G_GABP_ERKPP;
    c611 = 1 MWDERIVEDUNIT_1__second;
  reaction_945: ERBP_G_GABP + ERKPP -> ERBP_G_GABP_ERKPP; c612f*ERBP_G_GABP*ERKPP - c612r*ERBP_G_GABP_ERKPP;
    c612f = 0.01 MWDERIVEDUNIT_1__nanomole_second; c612r = 0.1 MWDERIVEDUNIT_1__second;
  reaction_946: ERBP_G_GABP_ERKPP => ERBP_G + GABPP + ERKPP; c613*ERBP_G_GABP_ERKPP;
    c613 = 1 MWDERIVEDUNIT_1__second;
  reaction_947: ERB3P_G_GABP + ERKPP -> ERB3P_G_GABP_ERKPP; c614f*ERB3P_G_GABP*ERKPP - c614r*ERB3P_G_GABP_ERKPP;
    c614f = 0.01 MWDERIVEDUNIT_1__nanomole_second; c614r = 0.1 MWDERIVEDUNIT_1__second;
  reaction_948: ERB3P_G_GABP_ERKPP => ERB3P_G + GABPP + ERKPP; c615*ERB3P_G_GABP_ERKPP;
    c615 = 1 MWDERIVEDUNIT_1__second;
  reaction_949: ERB3P_ShP_G_GABP + ERKPP -> ERB3P_ShP_G_GABP_ERKPP; c616f*ERB3P_ShP_G_GABP*ERKPP - c616r*ERB3P_ShP_G_GABP_ERKPP;
    c616f = 0.01 MWDERIVEDUNIT_1__nanomole_second; c616r = 0.1 MWDERIVEDUNIT_1__second;
  reaction_950: ERB3P_ShP_G_GABP_ERKPP => ERB3P_ShP_G + GABPP + ERKPP; c617*ERB3P_ShP_G_GABP_ERKPP;
    c617 = 1 MWDERIVEDUNIT_1__second;
  reaction_951: GABP + ERKPP -> GABP_ERKPP; c618f*GABP*ERKPP - c618r*GABP_ERKPP;
    c618f = 0.01 MWDERIVEDUNIT_1__nanomole_second; c618r = 0.1 MWDERIVEDUNIT_1__second;
  reaction_952: GABPP + PhoA -> GABPP_PhoA; c619f*GABPP*PhoA - c619r*GABPP_PhoA;
    c619f = 0.01 MWDERIVEDUNIT_1__nanomole_second; c619r = 0.1 MWDERIVEDUNIT_1__second;
  reaction_953: GABPP_PhoA => GABP + PhoA; c620*GABPP_PhoA;
    c620 = 1 MWDERIVEDUNIT_1__second;
  reaction_954: GABP_ERKPP => GABPP + ERKPP; c621*GABP_ERKPP;
    c621 = 1 MWDERIVEDUNIT_1__second;
  reaction_955: ARF + MDM2 -> ARF__MDM2; c622f*ARF*MDM2 - c622r*ARF__MDM2;
    c622f = 0.01 MWDERIVEDUNIT_1__nanomole_second; c622r = 0.001 MWDERIVEDUNIT_1__second;
  reaction_956: CYCLIND1 + CDK4 -> CYCLIND1_CDK4; c623f*CYCLIND1*CDK4 - c623r*CYCLIND1_CDK4;
    c623f = 0.01 MWDERIVEDUNIT_1__nanomole_second; c623r = 0.1 MWDERIVEDUNIT_1__second;
  reaction_957: CYCLINE + CDK2 -> CYCLINE_CDK2; c624f*CYCLINE*CDK2 - c624r*CYCLINE_CDK2;
    c624f = 0.01 MWDERIVEDUNIT_1__nanomole_second; c624r = 0.1 MWDERIVEDUNIT_1__second;
  reaction_958: E2F + DP1 -> E2F_DP1; c625f*E2F*DP1 - c625r*E2F_DP1;
    c625f = 0.01 MWDERIVEDUNIT_1__nanomole_second; c625r = 0.1 MWDERIVEDUNIT_1__second;
  reaction_959: E2F_DP1 + RB -> E2F_DP1_RB; c626f*E2F_DP1*RB - c626r*E2F_DP1_RB;
    c626f = 0.01 MWDERIVEDUNIT_1__nanomole_second; c626r = 0.1 MWDERIVEDUNIT_1__second;
  reaction_960: CYCLIND1_CDK4 + RB -> CYCLIND1_CDK4_RB; c627f*CYCLIND1_CDK4*RB - c627r*CYCLIND1_CDK4_RB;
    c627f = 0.01 MWDERIVEDUNIT_1__nanomole_second; c627r = 0.1 MWDERIVEDUNIT_1__second;
  reaction_961: CYCLIND1_CDK4_RB => CYCLIND1_CDK4 + RBP; c628*CYCLIND1_CDK4_RB;
    c628 = 1 MWDERIVEDUNIT_1__second;
  reaction_962: CYCLINE_CDK2 + RBP -> CYCLINE_CDK2_RBP; c629f*CYCLINE_CDK2*RBP - c629r*CYCLINE_CDK2_RBP;
    c629f = 0.01 MWDERIVEDUNIT_1__nanomole_second; c629r = 0.1 MWDERIVEDUNIT_1__second;
  reaction_963: CYCLINE_CDK2_RBP => CYCLINE_CDK2 + RBPP; c630*CYCLINE_CDK2_RBP;
    c630 = 1 MWDERIVEDUNIT_1__second;
  reaction_964: RBPP + Pho14 -> RBPP_Pho14; c631f*RBPP*Pho14 - c631r*RBPP_Pho14;
    c631f = 0.01 MWDERIVEDUNIT_1__nanomole_second; c631r = 0.1 MWDERIVEDUNIT_1__second;
  reaction_965: RBPP_Pho14 => RBP + Pho14; c632*RBPP_Pho14;
    c632 = 1 MWDERIVEDUNIT_1__second;
  reaction_966: RBP + Pho14 -> RBP_Pho14; c633f*RBP*Pho14 - c633r*RBP_Pho14;
    c633f = 0.01 MWDERIVEDUNIT_1__nanomole_second; c633r = 0.1 MWDERIVEDUNIT_1__second;
  reaction_967: RBP_Pho14 => RB + Pho14; c634*RBP_Pho14;
    c634 = 1 MWDERIVEDUNIT_1__second;
  reaction_968: E2F_DP1_RB + TFBSV -> E2F_DP1_RB_TFBSV; c635f*E2F_DP1_RB*TFBSV - c635r*E2F_DP1_RB_TFBSV;
    c635f = 0.01 MWDERIVEDUNIT_1__nanomole_second; c635r = 0.1 MWDERIVEDUNIT_1__second;
  reaction_969: E2F_DP1 + TFBSV -> E2F_DP1_TFBSV; c636f*E2F_DP1*TFBSV - c636r*E2F_DP1_TFBSV;
    c636f = 0.01 MWDERIVEDUNIT_1__nanomole_second; c636r = 0.1 MWDERIVEDUNIT_1__second;
  reaction_970: CYCLIND1_CDK4 + P16 -> CYCLIND1_CDK4_P16; c637f*CYCLIND1_CDK4*P16 - c637r*CYCLIND1_CDK4_P16;
    c637f = 0.01 MWDERIVEDUNIT_1__nanomole_second; c637r = 0.1 MWDERIVEDUNIT_1__second;
  reaction_971: CDC25C + ERKPP -> CDC25C_ERKPP; c642f*CDC25C*ERKPP - c642r*CDC25C_ERKPP;
    c642f = 0.01 MWDERIVEDUNIT_1__nanomole_second; c642r = 0.01 MWDERIVEDUNIT_1__second;
  reaction_972: CDC25C_ERKPP => CDC25CP + ERKPP; c643*CDC25C_ERKPP;
    c643 = 10 MWDERIVEDUNIT_1__second;
  reaction_973: CDC25CP + Pho16 -> CDC25CP_Pho16; c644f*CDC25CP*Pho16 - c644r*CDC25CP_Pho16;
    c644f = 0.01 MWDERIVEDUNIT_1__nanomole_second; c644r = 10 MWDERIVEDUNIT_1__second;
  reaction_974: CDC25CP_Pho16 => CDC25C + Pho16; c645*CDC25CP_Pho16;
    c645 = 0.1 MWDERIVEDUNIT_1__second;
  reaction_975: $Pb_MYC => MYC_mRNA; c646*Pb_MYC;
    c646 = 5e-5 MWDERIVEDUNIT_1__second;
  reaction_976: MYC_mRNA => ; c647*MYC_mRNA;
    c647 = 0.00027 MWDERIVEDUNIT_1__second;
  reaction_977: PKP_PIP2 -> PKP_PIP2_PI3K_inhibitor; c648f*PKP_PIP2*PI3K_inhibitor - c648r*PKP_PIP2_PI3K_inhibitor;  // modifiers: PI3K_inhibitor
    c648f = 0.01 MWDERIVEDUNIT_1__nanomole_second; c648r = 1.5 MWDERIVEDUNIT_1__second;
  reaction_978: $Pb_CCND1 => CCND1_mRNA; c649*Pb_CCND1;
    c649 = 5e-5 MWDERIVEDUNIT_1__second;
  reaction_979: GSKP + AZAKEN -> GSKP_AZAKEN; c651f*GSKP*AZAKEN - c651r*GSKP_AZAKEN;
    c651f = 0.01 MWDERIVEDUNIT_1__nanomole_second; c651r = 0.18 MWDERIVEDUNIT_1__second;
  reaction_980: CCND1_mRNA => ; c655/(ERKPP/10 + Ku)*Kx*CCND1_mRNA;  // modifiers: ERKPP, Ku, Kx

  // Unit definitions:
  unit MWBUILTINPREFIX_nano_MWBUILTINUNIT_mole = 1e-9 mole; MWBUILTINPREFIX_nano_MWBUILTINUNIT_mole is "nanomole";
  unit MWDERIVEDUNIT_1__second = dimensionless / second; MWDERIVEDUNIT_1__second is "1/second";
  unit MWDERIVEDUNIT_1__nanomole_second = 1e9 dimensionless / (mole * second); MWDERIVEDUNIT_1__nanomole_second is "1/(nanomole*second)";
end
