// SBML level 3 version 1

function Constant_flux__irreversible(v)
  v;
end
Constant_flux__irreversible is "Constant flux (irreversible)";

function Henri_Michaelis_Menten__irreversible(substrate, Km, V)
  V*substrate/(Km + substrate);
end
Henri_Michaelis_Menten__irreversible is "Henri-Michaelis-Menten (irreversible)";

function Rate_Law_for_vMATIII(vMAX, Product, Kp, Substrate, Veff, Effector, Keff, beta)
  (vMAX/1 + Product/Kp)*(Substrate^2 + Veff/(1 + Effector/Keff)*beta*Substrate)/(Substrate^2 + 2*(Veff/(1 + Effector/Keff))*beta*Substrate + (Veff/(1 + Effector/Keff))^2);
end

function Rate_Law_for_vCBS(Vmax, K, Km, Substrate, Ka, Activator)
  Vmax/(K + Km/Substrate)*(1 + 1/(1 + Ka/Activator));
end

function Rate_Law_for_vMATI(Vmax, Km, Substrate, Ki, Product)
  Vmax/(1 + Km/Substrate*(1 + Product/Ki));
end

function Rate_Law_for_vMS(Vmax, Km, Substrate1, Kp, Kd, Substrate2)
  Vmax/(1 + Km/Substrate1 + Kp*(1 + Kd/Substrate1)/Substrate2);
end

function Rate_Law_for_vMETH(Vmax, Product, Ki, Substrate, Km_2)
  Vmax/(1 + (1 + Product/Ki)/Substrate + Km_2*(1 + (1 + Product/Ki)/Substrate));
end

function Rate_Law_for_vBHMT(Vmax, K, Km, Substrate, Product, Kp)
  Vmax/(K + Km/Substrate*(1 + Product/Kp));
end

function Rate_Law_for_vGNMT(Vmax, Km, Substrate, Product, Kp, n, Inhibitor, Ki)
  Vmax/(1 + (Km/Substrate*(1 + Product/Kp))^n)/(1 + Inhibitor/Ki);
end

function Rate_Law_for_vMTHFR(Vmax, Eff1, Keff1, Eff2, Keff2, Veff1, Kp, Product, Kp1, Km, Substrate)
  (Vmax*(1/(1 + Eff1/(Keff1*(1 + Eff2/Keff2)))) + Veff1/(1 + Keff1*(1 + Eff2/Keff2)/Eff1))*(1/(1 + Kp*(1 + Product/Kp1) + Km/Substrate));
end

function Rate_Law_for_vAHC(Vmax, Substrate, Product, Keq)
  Vmax*(Substrate - Product/Keq);
end

model MODEL1603150000()
  // Saa2016 - Mammalian methionine cycle - approximate bayesian computation
  // Construction of feasible and accurate kinetic models of metabolism: A Bayesian approach
  // Pedro A. Saa, Lars K. Nielsen*
  // Australian Institute for Bioengineering and Nanotechnology (AIBN), The University of Queensland, Brisbane, QLD 4072, Australia
  // *Corresponding author
  // Email: lars.nielsen@uq.edu.au
  // Reference methionine cycle model (i.e., true model) used for parameter estimation.
  // This model is almost entirely based on the kinetic reconstruction of Korendyaseva et al. (2008).
  // Korendyaseva TK, Kuvatov DN, Volkov Va, Martinov MV, Vitvitsky VM, Banerjee R, Ataullakhanov FI (2008) An allosteric mechanism for switching between parallel tracks in mammalian sulfur metabolism. Plos Comput Biol 4: e1000076
  // biomodels.db:MODEL1603150000
  // model units - substance: substance, time: time, volume: volume, area: area, length: length, extent: substance

  // Compartments:
  compartment compartment = 1 volume;

  // Species:
  species MET in compartment = 50;
  species ADOMET in compartment = 60;
  species ADOHCY in compartment = 35;
  species MTHF in compartment = 1.7;
  species HCY in compartment = 3.5;
  species $THF in compartment;

  // Assignment rules:
  THF := 0.2*(25 - MTHF);

  // Reactions:
  vINFLUX: => MET; compartment*Constant_flux__irreversible(v);
    v = 0.7613;
  vPROT: MET => ; compartment*Henri_Michaelis_Menten__irreversible(MET, vPROT_Km, V);
    vPROT_Km = 18; V = 0.188;
  vMATI: MET => ADOMET; compartment*Rate_Law_for_vMATI(vMATI_Vmax, vMATI_Km, MET, vMATI_Ki, ADOMET);
    vMATI_Vmax = 2.2; vMATI_Km = 25; vMATI_Ki = 25;
  vMATIII: MET => ADOMET; compartment*Rate_Law_for_vMATIII(vMAX, ADOMET, vMATIII_Kp, MET, Veff, ADOMET, Keff, beta);
    vMAX = 15.8; vMATIII_Kp = 700; Veff = 1200; Keff = 50; beta = 0.1;
  vMETH: ADOMET => ADOHCY; compartment*Rate_Law_for_vMETH(vMETH_Vmax, ADOHCY, vMETH_Ki, ADOMET, Km_2);
    vMETH_Vmax = 13; vMETH_Ki = 4; Km_2 = 10.0024;
  vGNMT: ADOMET => ADOHCY; compartment*Rate_Law_for_vGNMT(vGNMT_Vmax, vGNMT_Km, ADOMET, ADOHCY, vGNMT_Kp, n, MTHF, vGNMT_Ki);  // modifiers: MTHF
    vGNMT_Vmax = 60; vGNMT_Km = 350; vGNMT_Kp = 52; n = 2.3; vGNMT_Ki = 0.3;
  vAHC: ADOHCY -> HCY; compartment*Rate_Law_for_vAHC(vAHC_Vmax, ADOHCY, HCY, Keq);
    vAHC_Vmax = 100; Keq = 0.1;
  vMS: MTHF + HCY => MET; compartment*Rate_Law_for_vMS(vMS_Vmax, vMS_Km, MTHF, vMS_Kp, Kd, HCY);
    vMS_Vmax = 6.6; vMS_Km = 89; vMS_Kp = 1; Kd = 142;
  vBHMT: HCY => MET; compartment*Rate_Law_for_vBHMT(vBHMT_Vmax, vBHMT_K, vBHMT_Km, HCY, MET, vBHMT_Kp);
    vBHMT_Vmax = 60; vBHMT_K = 51; vBHMT_Km = 12; vBHMT_Kp = 1.5;
  vCBS: HCY => ; compartment*Rate_Law_for_vCBS(vCBS_Vmax, vCBS_K, vCBS_Km, HCY, Ka, ADOMET);  // modifiers: ADOMET
    vCBS_Vmax = 121; vCBS_K = 5.24; vCBS_Km = 1001.7; Ka = 60;
  vMTHFR: $THF => MTHF; compartment*Rate_Law_for_vMTHFR(vMTHFR_Vmax, ADOMET, Keff1, ADOHCY, Keff2, Veff1, vMTHFR_Kp, MTHF, Kp1, vMTHFR_Km, THF);  // modifiers: ADOMET, ADOHCY
    vMTHFR_Vmax = 4.08; Keff1 = 3; Keff2 = 3; Veff1 = 0.046; vMTHFR_Kp = 0.08; Kp1 = 20; vMTHFR_Km = 88;

  // Unit definitions:
  unit length = metre;
  unit area = metre^2;
  unit volume = dimensionless;
  unit time = 3600 second;
  unit substance = 1e-3 mole;
end
