// SBML level 2 version 4

model MODEL1603270000()
  // Nair2016 - Integration of calcium and dopamine signals by D1R-expressing medium-sized spiny neurons
  // This model is described in the article:
  // Role of DARPP-32 and ARPP-21 in the Emergence of Temporal Constraints on Striatal Calcium and Dopamine Integration.
  // Nair AG, Bhalla US, Hellgren Kotaleski J.
  // PLoS Comput. Biol. 2016 Sep; 12(9): e1005080
  // Abstract:
  // In reward learning, the integration of NMDA-dependent calcium and dopamine by striatal projection neurons leads to potentiation of corticostriatal synapses through CaMKII/PP1 signaling. In order to elicit the CaMKII/PP1-dependent response, the calcium and dopamine inputs should arrive in temporal proximity and must follow a specific (dopamine after calcium) order. However, little is known about the cellular mechanism which enforces these temporal constraints on the signal integration. In this computational study, we propose that these temporal requirements emerge as a result of the coordinated signaling via two striatal phosphoproteins, DARPP-32 and ARPP-21. Specifically, DARPP-32-mediated signaling could implement an input-interval dependent gating function, via transient PP1 inhibition, thus enforcing the requirement for temporal proximity. Furthermore, ARPP-21 signaling could impose the additional input-order requirement of calcium and dopamine, due to its Ca2+/calmodulin sequestering property when dopamine arrives first. This highlights the possible role of phosphoproteins in the temporal aspects of striatal signal transduction.
  // This model is hosted on BioModels Database and identified by: MODEL1603270000.
  // To cite BioModels Database, please use: BioModels Database: An enhanced, curated and annotated resource for published quantitative kinetic models.
  // To the extent possible under law, all copyright and related or neighbouring rights to this encoded model have been dedicated to the public domain worldwide. Please refer to CC0 Public Domain Dedication for more information.
  // biomodels.db:MODEL1603270000

  // Compartments:
  compartment Spine = 1e-15;

  // Species:
  species GaolfGDP in Spine = 0;
  species Gbgolf in Spine = 0;
  species GaolfGTP in Spine = 0;
  species D1RDAGolf in Spine = 0;
  species Golf in Spine = 2000;
  species D1RGolf in Spine = 0;
  species D1RDA in Spine = 0;
  species D1R in Spine = 2000;
  species cAMP in Spine = 0;
  species $Ca in Spine = 60;
  species AC5 in Spine = 700;
  species AC5GaolfGTP in Spine = 0;
  species CaM in Spine = 9000;
  species CaMCa2 in Spine = 0;
  species CaMCa4 in Spine = 0;
  species PDE4 in Spine = 2000;
  species PKA in Spine = 1200;
  species PKAcAMP2 in Spine = 0;
  species PKAcAMP4 in Spine = 0;
  species PKAreg in Spine = 0;
  species PKAc in Spine = 0;
  species PP2B in Spine = 4000;
  species PP2Bc in Spine = 0;
  species PP2BCaM in Spine = 0;
  species PP2BCaMCa2 in Spine = 0;
  species DARPP32 in Spine = 50000;
  species PKAc_D32 in Spine = 0; PKAc_D32 is "PKAc*D32";
  species D32p34 in Spine = 0;
  species B72PP2A in Spine = 2000;
  species PKAc_B56PP2A in Spine = 0; PKAc_B56PP2A is "PKAc*B56PP2A";
  species B56PP2Ap in Spine = 0;
  species CDK5 in Spine = 1800;
  species PP1 in Spine = 3000;
  species CDK5_D32 in Spine = 0; CDK5_D32 is "CDK5*D32";
  species D32p75 in Spine = 0;
  species PKAcD32p75 in Spine = 0;
  species B72PPA2Ca in Spine = 0;
  species B56PP2Ap_D32p75 in Spine = 0; B56PP2Ap_D32p75 is "B56PP2Ap*D32p75";
  species B72PP2A_D32p75 in Spine = 0; B72PP2A_D32p75 is "B72PP2A*D32p75";
  species B72PP2ACa_D32p75 in Spine = 0; B72PP2ACa_D32p75 is "B72PP2ACa*D32p75";
  species PP1D32p34 in Spine = 0;
  species PP2Bc_D32p34 in Spine = 0; PP2Bc_D32p34 is "PP2Bc*D32p34";
  species B72PP2A_D32p34 in Spine = 0; B72PP2A_D32p34 is "B72PP2A*D32p34";
  species $DA in Spine = 20;
  species $AMP in Spine = 0;
  species AC5Ca in Spine = 0;
  species AC5CaGaolfGTP in Spine = 0;
  species B56PP2A in Spine = 2000;
  species B56PP2A_D32p75 in Spine = 0; B56PP2A_D32p75 is "B56PP2A*D32p75";
  species B72PP2ACa_D32p34 in Spine = 0; B72PP2ACa_D32p34 is "B72PP2ACa*D32p34";
  species PDE4_cAMP in Spine = 0; PDE4_cAMP is "PDE4*cAMP";
  species PDE10c in Spine = 0;
  species PDE10 in Spine = 700;
  species PDE10_cAMP in Spine = 0; PDE10_cAMP is "PDE10*cAMP";
  species PDE10c_cAMP in Spine = 0; PDE10c_cAMP is "PDE10c*cAMP";
  species $ATP in Spine = 5000000;
  species AC5GaolfGTP_ATP in Spine = 0; AC5GaolfGTP_ATP is "AC5GaolfGTP*ATP";
  species AC5_ATP in Spine = 0; AC5_ATP is "AC5*ATP";
  species AC5CaGaolfGTP_ATP in Spine = 0; AC5CaGaolfGTP_ATP is "AC5CaGaolfGTP*ATP";
  species AC5Ca_ATP in Spine = 0; AC5Ca_ATP is "AC5Ca*ATP";
  species PP1_AKAR3p in Spine = 0; PP1_AKAR3p is "PP1*AKAR3p";
  species PKAc_AKAR3 in Spine = 0; PKAc_AKAR3 is "PKAc*AKAR3";
  species CaMKII in Spine = 20000;
  species CaMKIIc in Spine = 0;
  species CaMKIICaMCa2 in Spine = 0;
  species CaMKIICaM in Spine = 0;
  species pCaMKIIc in Spine = 0;
  species pCaMKII in Spine = 0;
  species pCaMKIICaMCa2 in Spine = 0;
  species pCaMKIICaM in Spine = 0;
  species pARPP21 in Spine = 0;
  species ARPP21 in Spine = 20000;
  species pSubstrate in Spine = 0;
  species Substrate in Spine = 3000;
  species PP1_pSubstrate in Spine = 0; PP1_pSubstrate is "PP1*pSubstrate";
  species pCaMKIIcpsd in Spine = 0;
  species pCaMKIICaMCa2psd in Spine = 0;
  species pCaMKIICaMpsd in Spine = 0;
  species pCaMKIIpsd in Spine = 0;
  species PP1_pCaMKIIpsd in Spine = 0; PP1_pCaMKIIpsd is "PP1*pCaMKIIpsd";
  species CaMKIIpsd in Spine = 0;
  species $totalActCaMKIIpsd in Spine;
  species CaMKIICaMpsd in Spine = 0;
  species CaMKIICaMCa2psd in Spine = 0;
  species CaMKIIcpsd in Spine = 0;
  species PKAc_ARPP21 in Spine = 0; PKAc_ARPP21 is "PKAc*ARPP21";
  species CaMCa4pARPP21 in Spine = 0;
  species B72PPA2Ca_pARPP21 in Spine = 0; B72PPA2Ca_pARPP21 is "B72PPA2Ca*pARPP21";
  species B72PP2A_pARPP21 in Spine = 0; B72PP2A_pARPP21 is "B72PP2A*pARPP21";
  species B56PP2Ap_pARPP21 in Spine = 0; B56PP2Ap_pARPP21 is "B56PP2Ap*pARPP21";
  species B56PP2A_pARPP21 in Spine = 0; B56PP2A_pARPP21 is "B56PP2A*pARPP21";
  species totalpCaMKIIpsd_Substrate in Spine = 0; totalpCaMKIIpsd_Substrate is "totalpCaMKIIpsd*Substrate";
  species $totalCaMKII in Spine;
  species $totalActiveFreeCaMKII in Spine;

  // Parameters:
  krPP2B_CaMCa2 = 0.03; krPP2B_CaMCa2 is "krPP2B*CaMCa2";
  kfPP2B_CaMCa2 = 0.1; kfPP2B_CaMCa2 is "kfPP2B*CaMCa2";
  krPP2BCaMCa2_2Ca = 100; krPP2BCaMCa2_2Ca is "krPP2BCaMCa2*2Ca";
  kfPP2BCaMCa2_2Ca = 0.1; kfPP2BCaMCa2_2Ca is "kfPP2BCaMCa2*2Ca";
  krPP2BCaM_2Ca = 0.0002; krPP2BCaM_2Ca is "krPP2BCaM*2Ca";
  kfPP2BCaM_2Ca = 0.006; kfPP2BCaM_2Ca is "kfPP2BCaM*2Ca";
  kfPP1_D32p34 = 1; kfPP1_D32p34 is "kfPP1*D32p34";
  krPP1_D32p34 = 1.5; krPP1_D32p34 is "krPP1*D32p34";
  kfPP2B_CaMCa4 = 0.1; kfPP2B_CaMCa4 is "kfPP2B*CaMCa4";
  krPP2B_CaMCa4 = 0.003; krPP2B_CaMCa4 is "krPP2B*CaMCa4";
  kfB72PP2A_Ca = 0.01; kfB72PP2A_Ca is "kfB72PP2A*Ca";
  krB72PP2A_Ca = 10; krB72PP2A_Ca is "krB72PP2A*Ca";
  kfPP2B_CaM = 0.1; kfPP2B_CaM is "kfPP2B*CaM";
  krPP2B_CaM = 3000; krPP2B_CaM is "krPP2B*CaM";
  kcatPKAc_D32 = 10; kcatPKAc_D32 is "kcatPKAc*D32";
  kGaolfGTPase = 30;
  kfPP2Bc_D32p34 = 1.3; kfPP2Bc_D32p34 is "kfPP2Bc*D32p34";
  krPP2Bc_D32p34 = 0.1; krPP2Bc_D32p34 is "krPP2Bc*D32p34";
  kfB56PP2A_D32p75 = 0.008; kfB56PP2A_D32p75 is "kfB56PP2A*D32p75";
  krB56PP2A_D32p75 = 100; krB56PP2A_D32p75 is "krB56PP2A*D32p75";
  kfB56PP2Ap_D32p75 = 0.015; kfB56PP2Ap_D32p75 is "kfB56PP2Ap*D32p75";
  krB56PP2Ap_D32p75 = 100; krB56PP2Ap_D32p75 is "krB56PP2Ap*D32p75";
  kcatB56PP2Ap_D32p75 = 8; kcatB56PP2Ap_D32p75 is "kcatB56PP2Ap*D32p75";
  kcatB56PP2A_D32p75 = 1.5; kcatB56PP2A_D32p75 is "kcatB56PP2A*D32p75";
  kcatB72PP2ACa_D32p75 = 8; kcatB72PP2ACa_D32p75 is "kcatB72PP2ACa*D32p75";
  kcatB72PP2A_D32p75 = 1.5; kcatB72PP2A_D32p75 is "kcatB72PP2A*D32p75";
  kfB72PP2A_D32p75 = 0.008; kfB72PP2A_D32p75 is "kfB72PP2A*D32p75";
  krB72PP2A_D32p75 = 100; krB72PP2A_D32p75 is "krB72PP2A*D32p75";
  kfB72PP2ACa_D32p75 = 0.015; kfB72PP2ACa_D32p75 is "kfB72PP2ACa*D32p75";
  krB72PP2ACa_D32p75 = 100; krB72PP2ACa_D32p75 is "krB72PP2ACa*D32p75";
  kcatPP2Bc_D32p34 = 1.2; kcatPP2Bc_D32p34 is "kcatPP2Bc*D32p34";
  kcatCDK5_D32 = 10; kcatCDK5_D32 is "kcatCDK5*D32";
  kfPKA_2cAMP = 0.026; kfPKA_2cAMP is "kfPKA*2cAMP";
  krPKA_2cAMP = 350; krPKA_2cAMP is "krPKA*2cAMP";
  krPKAc_PKAr = 50; krPKAc_PKAr is "krPKAc*PKAr";
  kfPKAc_PKAr = 0.03; kfPKAc_PKAr is "kfPKAc*PKAr";
  kfPKA2cAMP_2cAMP = 0.0346; kfPKA2cAMP_2cAMP is "kfPKA2cAMP*2cAMP";
  krPKA2cAMP_2cAMP = 50; krPKA2cAMP_2cAMP is "krPKA2cAMP*2cAMP";
  kfCDK5_D32 = 0.001; kfCDK5_D32 is "kfCDK5*D32";
  krCDK5_D32 = 100; krCDK5_D32 is "krCDK5*D32";
  kactGolf = 15;
  kcatPDE4_cAMP = 2.5; kcatPDE4_cAMP is "kcatPDE4*cAMP";
  kfPKAc_D32 = 0.01; kfPKAc_D32 is "kfPKAc*D32";
  krPKAc_D32 = 200; krPKAc_D32 is "krPKAc*D32";
  kfPDE4_cAMP = 0.03; kfPDE4_cAMP is "kfPDE4*cAMP";
  krPDE4_cAMP = 1; krPDE4_cAMP is "krPDE4*cAMP";
  krPDE10_cAMP = 1; krPDE10_cAMP is "krPDE10*cAMP";
  kcatPDE10c_cAMP = 10; kcatPDE10c_cAMP is "kcatPDE10c*cAMP";
  kfPDE10_cAMP = 1e-6; kfPDE10_cAMP is "kfPDE10*cAMP";
  kfcAMP_PDE10 = 0.1; kfcAMP_PDE10 is "kfcAMP*PDE10";
  krcAMP_PDE10 = 2; krcAMP_PDE10 is "krcAMP*PDE10";
  kcatcAMP_PDE10 = 3; kcatcAMP_PDE10 is "kcatcAMP*PDE10";
  kcatAC5GaolfGTP_ATP = 50; kcatAC5GaolfGTP_ATP is "kcatAC5GaolfGTP*ATP";
  kicatAC5GaolfGTP_ATP = 2.55; kicatAC5GaolfGTP_ATP is "kicatAC5GaolfGTP*ATP";
  kcatAC5_ATP = 1; kcatAC5_ATP is "kcatAC5*ATP";
  kicatAC5_ATP = 0.002; kicatAC5_ATP is "kicatAC5*ATP";
  kcatAC5Ca_ATP = 0.5; kcatAC5Ca_ATP is "kcatAC5Ca*ATP";
  kicatAC5Ca_ATP = 0.00075; kicatAC5Ca_ATP is "kicatAC5Ca*ATP";
  kcatAC5CaGaolfGTP_ATP = 25; kcatAC5CaGaolfGTP_ATP is "kcatAC5CaGaolfGTP*ATP";
  kicatAC5CaGaolfGTP_ATP = 0.65; kicatAC5CaGaolfGTP_ATP is "kicatAC5CaGaolfGTP*ATP";
  kfAC5_ATP = 0.0001; kfAC5_ATP is "kfAC5*ATP";
  kfAC5CaGaolfGTP_ATP = 0.0013; kfAC5CaGaolfGTP_ATP is "kfAC5CaGaolfGTP*ATP";
  kfCaM_2Ca = 0.006; kfCaM_2Ca is "kfCaM*2Ca";
  kGolfback = 100;
  krCaM_2Ca = 20; krCaM_2Ca is "krCaM*2Ca";
  kdpB56PP2Ap = 0.008;
  krCaMCa2_2Ca = 1000; krCaMCa2_2Ca is "krCaMCa2*2Ca";
  krPKAc_D32p75 = 100; krPKAc_D32p75 is "krPKAc*D32p75";
  kfPKAc_B56PP2A = 0.001; kfPKAc_B56PP2A is "kfPKAc*B56PP2A";
  krPKAc_B56PP2A = 0.3; krPKAc_B56PP2A is "krPKAc*B56PP2A";
  kfCaMCa2_2Ca = 0.1; kfCaMCa2_2Ca is "kfCaMCa2*2Ca";
  kcatPKAc_B56PP2A = 0.2; kcatPKAc_B56PP2A is "kcatPKAc*B56PP2A";
  kfPKAc_D32p75 = 0.1; kfPKAc_D32p75 is "kfPKAc*D32p75";
  kfAC5GaolfGTP_ATP = 0.00255; kfAC5GaolfGTP_ATP is "kfAC5GaolfGTP*ATP";
  kfAC5Ca_ATP = 7.5e-5; kfAC5Ca_ATP is "kfAC5Ca*ATP";
  kfD1R_Golf = 0.06; kfD1R_Golf is "kfD1R*Golf";
  krD1R_Golf = 250; krD1R_Golf is "krD1R*Golf";
  kfD1RDA_Golf = 0.06; kfD1RDA_Golf is "kfD1RDA*Golf";
  krD1RDA_Golf = 250; krD1RDA_Golf is "krD1RDA*Golf";
  kfB72PP2A_D32p34 = 0.0005; kfB72PP2A_D32p34 is "kfB72PP2A*D32p34";
  krB72PP2A_D32p34 = 1; krB72PP2A_D32p34 is "krB72PP2A*D32p34";
  krAC5X_ATP = 1; krAC5X_ATP is "krAC5X*ATP";
  kcatB72PP2A_D32p34 = 3; kcatB72PP2A_D32p34 is "kcatB72PP2A*D32p34";
  kfAC5XGaolfGTP = 10;
  kfAC5Ca = 0.001;
  krAC5XGaolfGTP = 1;
  krAC5Ca = 10;
  krgso = 1;
  kfPDE10c_cAMP = 0.1; kfPDE10c_cAMP is "kfPDE10c*cAMP";
  krPDE10c_cAMP = 2; krPDE10c_cAMP is "krPDE10c*cAMP";
  kfD1R_DA = 0.05; kfD1R_DA is "kfD1R*DA";
  kfD1RGolf_DA = 0.05; kfD1RGolf_DA is "kfD1RGolf*DA";
  krD1R_DA = 250; krD1R_DA is "krD1R*DA";
  krD1RGolf_DA = 250; krD1RGolf_DA is "krD1RGolf*DA";
  kfCaMKII_CaMCa4 = 0.1; kfCaMKII_CaMCa4 is "kfCaMKII*CaMCa4";
  krCaMKII_CaMCa4 = 40; krCaMKII_CaMCa4 is "krCaMKII*CaMCa4";
  kfCaMKII_CaMCa2 = 0.1; kfCaMKII_CaMCa2 is "kfCaMKII*CaMCa2";
  krCaMKII_CaMCa2 = 400; krCaMKII_CaMCa2 is "krCaMKII*CaMCa2";
  kfCaMKII_CaM = 0.1; kfCaMKII_CaM is "kfCaMKII*CaM";
  krCaMKII_CaM = 4000; krCaMKII_CaM is "krCaMKII*CaM";
  kfCaMKIICaM_2Ca = 0.006; kfCaMKIICaM_2Ca is "kfCaMKIICaM*2Ca";
  krCaMKIICaM_2Ca = 2; krCaMKIICaM_2Ca is "krCaMKIICaM*2Ca";
  kfCaMKIICaMCa2_2Ca = 0.1; kfCaMKIICaMCa2_2Ca is "kfCaMKIICaMCa2*2Ca";
  krCaMKIICaMCa2_2Ca = 100; krCaMKIICaMCa2_2Ca is "krCaMKIICaMCa2*2Ca";
  kfpCaMKII_CaM = 0.1; kfpCaMKII_CaM is "kfpCaMKII*CaM";
  krpCaMKII_CaM = 400; krpCaMKII_CaM is "krpCaMKII*CaM";
  kfpCaMKII_CaMCa2 = 0.1; kfpCaMKII_CaMCa2 is "kfpCaMKII*CaMCa2";
  krpCaMKII_CaMCa2 = 40; krpCaMKII_CaMCa2 is "krpCaMKII*CaMCa2";
  kfpCaMKII_CaMCa4 = 0.1; kfpCaMKII_CaMCa4 is "kfpCaMKII*CaMCa4";
  krpCaMKII_CaMCa4 = 0.4; krpCaMKII_CaMCa4 is "krpCaMKII*CaMCa4";
  kfpCaMKIICaM_2Ca = 0.006; kfpCaMKIICaM_2Ca is "kfpCaMKIICaM*2Ca";
  krpCaMKIICaM_2Ca = 2; krpCaMKIICaM_2Ca is "krpCaMKIICaM*2Ca";
  kfpCaMKIICaMCa2_2Ca = 0.1; kfpCaMKIICaMCa2_2Ca is "kfpCaMKIICaMCa2*2Ca";
  krpCaMKIICaMCa2_2Ca = 10; krpCaMKIICaMCa2_2Ca is "krpCaMKIICaMCa2*2Ca";
  var kpCaMKIIc;
  kfPP2A_pARPP21 = 0.004; kfPP2A_pARPP21 is "kfPP2A*pARPP21";
  krPP2A_pARPP21 = 100; krPP2A_pARPP21 is "krPP2A*pARPP21";
  kcatPP2A_pARPP21 = 1; kcatPP2A_pARPP21 is "kcatPP2A*pARPP21";
  kfPP2Ac_pARPP21 = 0.007; kfPP2Ac_pARPP21 is "kfPP2Ac*pARPP21";
  krPP2Ac_pARPP21 = 100; krPP2Ac_pARPP21 is "krPP2Ac*pARPP21";
  kcatPP2Ac_pARPP21 = 10; kcatPP2Ac_pARPP21 is "kcatPP2Ac*pARPP21";
  kcatPP1_pSubstrate = 10; kcatPP1_pSubstrate is "kcatPP1*pSubstrate";
  kfPP1_pSubstrate = 0.0005; kfPP1_pSubstrate is "kfPP1*pSubstrate";
  krPP1_pSubstrate = 1; krPP1_pSubstrate is "krPP1*pSubstrate";
  kfPKAc_ARPP21 = 0.045; kfPKAc_ARPP21 is "kfPKAc*ARPP21";
  krPKAc_ARPP21 = 200; krPKAc_ARPP21 is "krPKAc*ARPP21";
  kcatPKAc_ARPP21 = 10; kcatPKAc_ARPP21 is "kcatPKAc*ARPP21";
  kfCaMCa4_pARPP21 = 0.5; kfCaMCa4_pARPP21 is "kfCaMCa4*pARPP21";
  krCaMCa4_pARPP21 = 10; krCaMCa4_pARPP21 is "krCaMCa4*pARPP21";
  kdppCaMKII = 0.1;
  kfpCaMKII_Substrate = 0.0005; kfpCaMKII_Substrate is "kfpCaMKII*Substrate";
  krpCaMKII_Substrate = 10; krpCaMKII_Substrate is "krpCaMKII*Substrate";
  kcatpCaMKII_Substrate = 10; kcatpCaMKII_Substrate is "kcatpCaMKII*Substrate";
  kftranspCaMKII = 0.5;
  krtranspCaMKII = 0.001;
  kfPP1_pCaMKIIpsd = 0.0008; kfPP1_pCaMKIIpsd is "kfPP1*pCaMKIIpsd";
  krPP1_pCaMKIIpsd = 1; krPP1_pCaMKIIpsd is "krPP1*pCaMKIIpsd";
  ktransCaMKII = 0.5;
  kftransCaMKII = 0.5;
  krtransCaMKII = 0.5;
  max_CaMKII_phosphorate = 10;
  kcatPP1_pCaMKIIpsd = 1; kcatPP1_pCaMKIIpsd is "kcatPP1*pCaMKIIpsd";
  ModelValue_140 = max_CaMKII_phosphorate; ModelValue_140 is "Initial for max_CaMKII_phosphorate";

  // Assignment rules:
  totalActCaMKIIpsd := pCaMKIIpsd + pCaMKIICaMpsd + pCaMKIICaMCa2psd + pCaMKIIcpsd + CaMKIIcpsd + CaMKIICaMCa2psd + CaMKIICaMpsd;
  totalCaMKII := pCaMKII + pCaMKIIc + pCaMKIICaM + pCaMKIICaMCa2 + pCaMKIICaMCa2psd + pCaMKIICaMpsd + pCaMKIIcpsd + pCaMKIIpsd + CaMKIIc + CaMKIICaM + CaMKIICaMCa2 + CaMKIICaMCa2psd + CaMKIICaMpsd + CaMKIIcpsd + CaMKII + CaMKIIpsd;
  totalActiveFreeCaMKII := CaMKIIc + CaMKIICaM + CaMKIICaMCa2 + CaMKIICaMCa2psd + CaMKIICaMpsd + CaMKIIcpsd + pCaMKIIc + pCaMKIICaM + pCaMKIICaMCa2 + pCaMKIICaMCa2psd + pCaMKIICaMpsd + pCaMKIIcpsd;
  kpCaMKIIc := piecewise(0, (0.01*(totalActiveFreeCaMKII/totalCaMKII*100)^2 + (-0.0031*(totalActiveFreeCaMKII/totalCaMKII)*100) - 0.0007)/100*ModelValue_140 < 0, (0.01*(totalActiveFreeCaMKII/totalCaMKII*100)^2 + (-0.0031*(totalActiveFreeCaMKII/totalCaMKII)*100) - 0.0007)/100*ModelValue_140);

  // Reactions:
  revreaction_1: D1RGolf + $DA -> D1RDAGolf; Spine*(kfD1RGolf_DA*D1RGolf*DA - krD1RGolf_DA*D1RDAGolf);
  revreaction_2: D1R + $DA -> D1RDA; Spine*(kfD1R_DA*D1R*DA - krD1R_DA*D1RDA);
  revreaction_3: D1R + Golf -> D1RGolf; Spine*(kfD1R_Golf*D1R*Golf - krD1R_Golf*D1RGolf);
  revreaction_4: Golf + D1RDA -> D1RDAGolf; Spine*(kfD1RDA_Golf*Golf*D1RDA - krD1RDA_Golf*D1RDAGolf);
  revreaction_5: AC5 + GaolfGTP -> AC5GaolfGTP; Spine*(kfAC5XGaolfGTP*AC5*GaolfGTP - krAC5XGaolfGTP*AC5GaolfGTP);
  revreaction_6: AC5GaolfGTP + $ATP -> AC5GaolfGTP_ATP; Spine*(kfAC5GaolfGTP_ATP*AC5GaolfGTP*ATP - krAC5X_ATP*AC5GaolfGTP_ATP);
  revreaction_7: AC5 + $Ca -> AC5Ca; Spine*(kfAC5Ca*AC5*Ca - krAC5Ca*AC5Ca);
  revreaction_8: AC5Ca + GaolfGTP -> AC5CaGaolfGTP; Spine*(kfAC5XGaolfGTP*AC5Ca*GaolfGTP - krAC5XGaolfGTP*AC5CaGaolfGTP);
  revreaction_9: AC5 + $ATP -> AC5_ATP; Spine*(kfAC5_ATP*AC5*ATP - krAC5X_ATP*AC5_ATP);
  revreaction_10: AC5Ca + $ATP -> AC5Ca_ATP; Spine*(kfAC5Ca_ATP*AC5Ca*ATP - krAC5X_ATP*AC5Ca_ATP);
  revreaction_11: AC5CaGaolfGTP + $ATP -> AC5CaGaolfGTP_ATP; Spine*(kfAC5CaGaolfGTP_ATP*AC5CaGaolfGTP*ATP - krAC5X_ATP*AC5CaGaolfGTP_ATP);
  revreaction_12: GaolfGTP + AC5_ATP -> AC5GaolfGTP_ATP; Spine*(kfAC5XGaolfGTP*GaolfGTP*AC5_ATP - krAC5XGaolfGTP*AC5GaolfGTP_ATP);
  revreaction_13: GaolfGTP + AC5Ca_ATP -> AC5CaGaolfGTP_ATP; Spine*(kfAC5XGaolfGTP*GaolfGTP*AC5Ca_ATP - krAC5XGaolfGTP*AC5CaGaolfGTP_ATP);
  revreaction_14: $Ca + AC5_ATP -> AC5Ca_ATP; Spine*(kfAC5Ca*Ca*AC5_ATP - krAC5Ca*AC5Ca_ATP);
  revreaction_15: cAMP + PDE4 -> PDE4_cAMP; Spine*(kfPDE4_cAMP*cAMP*PDE4 - krPDE4_cAMP*PDE4_cAMP);
  revreaction_16: PDE10 + 2 cAMP -> PDE10c; Spine*(kfPDE10_cAMP*PDE10*cAMP^2 - krPDE10_cAMP*PDE10c);
  revreaction_17: cAMP + PDE10 -> PDE10_cAMP; Spine*(kfcAMP_PDE10*cAMP*PDE10 - krcAMP_PDE10*PDE10_cAMP);
  revreaction_18: cAMP + PDE10c -> PDE10c_cAMP; Spine*(kfPDE10c_cAMP*cAMP*PDE10c - krPDE10c_cAMP*PDE10c_cAMP);
  revreaction_19: cAMP + PKA -> PKAcAMP2; Spine*(kfPKA_2cAMP*cAMP*PKA - krPKA_2cAMP*PKAcAMP2);
  revreaction_20: cAMP + PKAcAMP2 -> PKAcAMP4; Spine*(kfPKA2cAMP_2cAMP*cAMP*PKAcAMP2 - krPKA2cAMP_2cAMP*PKAcAMP4);
  revreaction_21: PKAcAMP4 -> PKAc + PKAreg; Spine*(krPKAc_PKAr*PKAcAMP4 - kfPKAc_PKAr*PKAc*PKAreg);
  revreaction_22: CaM + $Ca -> CaMCa2; Spine*(kfCaM_2Ca*CaM*Ca - krCaM_2Ca*CaMCa2);
  revreaction_23: CaMCa2 + $Ca -> CaMCa4; Spine*(kfCaMCa2_2Ca*CaMCa2*Ca - krCaMCa2_2Ca*CaMCa4);
  revreaction_24: PP2B + CaM -> PP2BCaM; Spine*(kfPP2B_CaM*PP2B*CaM - krPP2B_CaM*PP2BCaM);
  revreaction_25: CaMCa4 + PP2B -> PP2Bc; Spine*(kfPP2B_CaMCa4*CaMCa4*PP2B - krPP2B_CaMCa4*PP2Bc);
  revreaction_26: $Ca + PP2BCaM -> PP2BCaMCa2; Spine*(kfPP2BCaM_2Ca*Ca*PP2BCaM - krPP2BCaM_2Ca*PP2BCaMCa2);
  revreaction_27: $Ca + PP2BCaMCa2 -> PP2Bc; Spine*(kfPP2BCaMCa2_2Ca*Ca*PP2BCaMCa2 - krPP2BCaMCa2_2Ca*PP2Bc);
  revreaction_28: CaMCa2 + PP2B -> PP2BCaMCa2; Spine*(kfPP2B_CaMCa2*CaMCa2*PP2B - krPP2B_CaMCa2*PP2BCaMCa2);
  revreaction_29: PKAc + DARPP32 -> PKAc_D32; Spine*(kfPKAc_D32*PKAc*DARPP32 - krPKAc_D32*PKAc_D32);
  revreaction_30: PKAc + B56PP2A -> PKAc_B56PP2A; Spine*(kfPKAc_B56PP2A*PKAc*B56PP2A - krPKAc_B56PP2A*PKAc_B56PP2A);
  revreaction_31: D32p34 + PP1 -> PP1D32p34; Spine*(kfPP1_D32p34*D32p34*PP1 - krPP1_D32p34*PP1D32p34);
  revreaction_32: CDK5 + DARPP32 -> CDK5_D32; Spine*(kfCDK5_D32*CDK5*DARPP32 - krCDK5_D32*CDK5_D32);
  revreaction_33: D32p75 + PKAc -> PKAcD32p75; Spine*(kfPKAc_D32p75*D32p75*PKAc - krPKAc_D32p75*PKAcD32p75);
  revreaction_34: B72PP2A + $Ca -> B72PPA2Ca; Spine*(kfB72PP2A_Ca*B72PP2A*Ca - krB72PP2A_Ca*B72PPA2Ca);
  revreaction_35: B56PP2Ap + D32p75 -> B56PP2Ap_D32p75; Spine*(kfB56PP2Ap_D32p75*B56PP2Ap*D32p75 - krB56PP2Ap_D32p75*B56PP2Ap_D32p75);
  revreaction_36: B72PP2A + D32p75 -> B72PP2A_D32p75; Spine*(kfB72PP2A_D32p75*B72PP2A*D32p75 - krB72PP2A_D32p75*B72PP2A_D32p75);
  revreaction_37: D32p75 + B72PPA2Ca -> B72PP2ACa_D32p75; Spine*(kfB72PP2ACa_D32p75*D32p75*B72PPA2Ca - krB72PP2ACa_D32p75*B72PP2ACa_D32p75);
  revreaction_38: D32p34 + PP2Bc -> PP2Bc_D32p34; Spine*(kfPP2Bc_D32p34*D32p34*PP2Bc - krPP2Bc_D32p34*PP2Bc_D32p34);
  revreaction_39: D32p75 + B56PP2A -> B56PP2A_D32p75; Spine*(kfB56PP2A_D32p75*D32p75*B56PP2A - krB56PP2A_D32p75*B56PP2A_D32p75);
  revreaction_40: D32p34 + B72PPA2Ca -> B72PP2ACa_D32p34; Spine*(kfB72PP2A_D32p34*D32p34*B72PPA2Ca - krB72PP2A_D32p34*B72PP2ACa_D32p34);
  revreaction_41: D32p34 + B72PP2A -> B72PP2A_D32p34; Spine*(kfB72PP2A_D32p34*D32p34*B72PP2A - krB72PP2A_D32p34*B72PP2A_D32p34);
  revreaction_42: ARPP21 + PKAc -> PKAc_ARPP21; Spine*(kfPKAc_ARPP21*ARPP21*PKAc - krPKAc_ARPP21*PKAc_ARPP21);
  revreaction_43: pARPP21 + CaMCa4 -> CaMCa4pARPP21; Spine*(kfCaMCa4_pARPP21*pARPP21*CaMCa4 - krCaMCa4_pARPP21*CaMCa4pARPP21);
  revreaction_44: pARPP21 + B72PPA2Ca -> B72PPA2Ca_pARPP21; Spine*(kfPP2Ac_pARPP21*pARPP21*B72PPA2Ca - krPP2Ac_pARPP21*B72PPA2Ca_pARPP21);
  revreaction_45: pARPP21 + B72PP2A -> B72PP2A_pARPP21; Spine*(kfPP2A_pARPP21*pARPP21*B72PP2A - krPP2A_pARPP21*B72PP2A_pARPP21);
  revreaction_46: pARPP21 + B56PP2Ap -> B56PP2Ap_pARPP21; Spine*(kfPP2Ac_pARPP21*pARPP21*B56PP2Ap - krPP2Ac_pARPP21*B56PP2Ap_pARPP21);
  revreaction_47: pARPP21 + B56PP2A -> B56PP2A_pARPP21; Spine*(kfPP2A_pARPP21*pARPP21*B56PP2A - krPP2A_pARPP21*B56PP2A_pARPP21);
  revreaction_48: CaMKII + CaMCa4 -> CaMKIIc; Spine*(kfCaMKII_CaMCa4*CaMKII*CaMCa4 - krCaMKII_CaMCa4*CaMKIIc);
  revreaction_49: CaMCa2 + CaMKII -> CaMKIICaMCa2; Spine*(kfCaMKII_CaMCa2*CaMCa2*CaMKII - krCaMKII_CaMCa2*CaMKIICaMCa2);
  revreaction_50: CaM + CaMKII -> CaMKIICaM; Spine*(kfCaMKII_CaM*CaM*CaMKII - krCaMKII_CaM*CaMKIICaM);
  revreaction_51: CaMKIICaMCa2 + $Ca -> CaMKIIc; Spine*(kfCaMKIICaMCa2_2Ca*CaMKIICaMCa2*Ca - krCaMKIICaMCa2_2Ca*CaMKIIc);
  revreaction_52: $Ca + CaMKIICaM -> CaMKIICaMCa2; Spine*(kfCaMKIICaM_2Ca*Ca*CaMKIICaM - krCaMKIICaM_2Ca*CaMKIICaMCa2);
  revreaction_53: pCaMKIICaMCa2 + $Ca -> pCaMKIIc; Spine*(kfpCaMKIICaMCa2_2Ca*pCaMKIICaMCa2*Ca - krpCaMKIICaMCa2_2Ca*pCaMKIIc);
  revreaction_54: pCaMKIICaM + $Ca -> pCaMKIICaMCa2; Spine*(kfpCaMKIICaM_2Ca*pCaMKIICaM*Ca - krpCaMKIICaM_2Ca*pCaMKIICaMCa2);
  revreaction_55: pCaMKII + CaMCa4 -> pCaMKIIc; Spine*(kfpCaMKII_CaMCa4*pCaMKII*CaMCa4 - krpCaMKII_CaMCa4*pCaMKIIc);
  revreaction_56: pCaMKII + CaMCa2 -> pCaMKIICaMCa2; Spine*(kfpCaMKII_CaMCa2*pCaMKII*CaMCa2 - krpCaMKII_CaMCa2*pCaMKIICaMCa2);
  revreaction_57: pCaMKII + CaM -> pCaMKIICaM; Spine*(kfpCaMKII_CaM*pCaMKII*CaM - krpCaMKII_CaM*pCaMKIICaM);
  revreaction_58: pCaMKIIc -> pCaMKIIcpsd; Spine*(kftranspCaMKII*pCaMKIIc - krtranspCaMKII*pCaMKIIcpsd);
  revreaction_59: pCaMKIICaMCa2 -> pCaMKIICaMCa2psd; Spine*(kftranspCaMKII*pCaMKIICaMCa2 - krtranspCaMKII*pCaMKIICaMCa2psd);
  revreaction_60: pCaMKIICaM -> pCaMKIICaMpsd; Spine*(kftranspCaMKII*pCaMKIICaM - krtranspCaMKII*pCaMKIICaMpsd);
  revreaction_61: pCaMKII -> pCaMKIIpsd; Spine*(kftranspCaMKII*pCaMKII - krtranspCaMKII*pCaMKIIpsd);
  revreaction_62: CaMKIICaM -> CaMKIICaMpsd; Spine*(kftransCaMKII*CaMKIICaM - krtransCaMKII*CaMKIICaMpsd);
  revreaction_63: CaMKIICaMCa2 -> CaMKIICaMCa2psd; Spine*(kftransCaMKII*CaMKIICaMCa2 - krtransCaMKII*CaMKIICaMCa2psd);
  revreaction_64: CaMKIIc -> CaMKIIcpsd; Spine*(kftransCaMKII*CaMKIIc - krtransCaMKII*CaMKIIcpsd);
  revreaction_65: CaMCa4 + pCaMKIIpsd -> pCaMKIIcpsd; Spine*(kfpCaMKII_CaMCa4*CaMCa4*pCaMKIIpsd - krpCaMKII_CaMCa4*pCaMKIIcpsd);
  revreaction_66: pCaMKIIpsd + CaMCa2 -> pCaMKIICaMCa2psd; Spine*(kfpCaMKII_CaMCa2*pCaMKIIpsd*CaMCa2 - krpCaMKII_CaMCa2*pCaMKIICaMCa2psd);
  revreaction_67: CaM + pCaMKIIpsd -> pCaMKIICaMpsd; Spine*(kfpCaMKII_CaM*CaM*pCaMKIIpsd - krpCaMKII_CaM*pCaMKIICaMpsd);
  revreaction_68: pCaMKIICaMpsd + $Ca -> pCaMKIICaMCa2psd; Spine*(kfpCaMKIICaM_2Ca*pCaMKIICaMpsd*Ca - krpCaMKIICaM_2Ca*pCaMKIICaMCa2psd);
  revreaction_69: pCaMKIICaMCa2psd + $Ca -> pCaMKIIcpsd; Spine*(kfpCaMKIICaMCa2_2Ca*pCaMKIICaMCa2psd*Ca - krpCaMKIICaMCa2_2Ca*pCaMKIIcpsd);
  revreaction_70: CaMCa4 + CaMKIIpsd -> CaMKIIcpsd; Spine*(kfCaMKII_CaMCa4*CaMCa4*CaMKIIpsd - krCaMKII_CaMCa4*CaMKIIcpsd);
  revreaction_71: CaMCa2 + CaMKIIpsd -> CaMKIICaMCa2psd; Spine*(kfCaMKII_CaMCa2*CaMCa2*CaMKIIpsd - krCaMKII_CaMCa2*CaMKIICaMCa2psd);
  revreaction_72: CaM + CaMKIIpsd -> CaMKIICaMpsd; Spine*(kfCaMKII_CaM*CaM*CaMKIIpsd - krCaMKII_CaM*CaMKIICaMpsd);
  revreaction_73: CaMKIICaMCa2psd + $Ca -> CaMKIIcpsd; Spine*(kfCaMKIICaMCa2_2Ca*CaMKIICaMCa2psd*Ca - krCaMKIICaMCa2_2Ca*CaMKIIcpsd);
  revreaction_74: $Ca + CaMKIICaMpsd -> CaMKIICaMCa2psd; Spine*(kfCaMKIICaM_2Ca*Ca*CaMKIICaMpsd - krCaMKIICaM_2Ca*CaMKIICaMCa2psd);
  revreaction_75: pCaMKIIpsd + PP1 -> PP1_pCaMKIIpsd; Spine*(kfPP1_pCaMKIIpsd*pCaMKIIpsd*PP1 - krPP1_pCaMKIIpsd*PP1_pCaMKIIpsd);
  revreaction_76: Substrate + $totalActCaMKIIpsd -> totalpCaMKIIpsd_Substrate; Spine*(kfpCaMKII_Substrate*Substrate*totalActCaMKIIpsd - krpCaMKII_Substrate*totalpCaMKIIpsd_Substrate);
  revreaction_77: pSubstrate + PP1 -> PP1_pSubstrate; Spine*(kfPP1_pSubstrate*pSubstrate*PP1 - krPP1_pSubstrate*PP1_pSubstrate);
  irrevreaction_1: D1RDAGolf => Gbgolf + D1RDA + GaolfGTP; Spine*kactGolf*D1RDAGolf;
  irrevreaction_2: GaolfGTP => GaolfGDP; Spine*kGaolfGTPase*GaolfGTP;
  irrevreaction_3: GaolfGDP + Gbgolf => Golf; Spine*kGolfback*GaolfGDP*Gbgolf;
  irrevreaction_4: AC5GaolfGTP_ATP => cAMP + AC5GaolfGTP; Spine*kcatAC5GaolfGTP_ATP*AC5GaolfGTP_ATP;
  irrevreaction_5: cAMP + AC5GaolfGTP => AC5GaolfGTP_ATP; Spine*kicatAC5GaolfGTP_ATP*cAMP*AC5GaolfGTP;
  irrevreaction_6: AC5_ATP => cAMP + AC5; Spine*kcatAC5_ATP*AC5_ATP;
  irrevreaction_7: cAMP + AC5 => AC5_ATP; Spine*kicatAC5_ATP*cAMP*AC5;
  irrevreaction_8: AC5Ca_ATP => cAMP + AC5Ca; Spine*kcatAC5Ca_ATP*AC5Ca_ATP;
  irrevreaction_9: cAMP + AC5Ca => AC5Ca_ATP; Spine*kicatAC5Ca_ATP*cAMP*AC5Ca;
  irrevreaction_10: AC5CaGaolfGTP_ATP => cAMP + AC5CaGaolfGTP; Spine*kcatAC5CaGaolfGTP_ATP*AC5CaGaolfGTP_ATP;
  irrevreaction_11: cAMP + AC5CaGaolfGTP => AC5CaGaolfGTP_ATP; Spine*kicatAC5CaGaolfGTP_ATP*cAMP*AC5CaGaolfGTP;
  irrevreaction_12: AC5GaolfGTP => AC5 + GaolfGDP; Spine*krgso*AC5GaolfGTP;
  irrevreaction_13: AC5CaGaolfGTP => AC5Ca + GaolfGDP; Spine*krgso*AC5CaGaolfGTP;
  irrevreaction_14: AC5GaolfGTP_ATP => AC5_ATP + GaolfGDP; Spine*krgso*AC5GaolfGTP_ATP;
  irrevreaction_15: AC5CaGaolfGTP_ATP => AC5Ca_ATP + GaolfGDP; Spine*krgso*AC5CaGaolfGTP_ATP;
  irrevreaction_16: PDE4_cAMP => PDE4 + $AMP; Spine*kcatPDE4_cAMP*PDE4_cAMP;
  irrevreaction_17: PDE10_cAMP => PDE10 + $AMP; Spine*kcatcAMP_PDE10*PDE10_cAMP;
  irrevreaction_18: PDE10c_cAMP => PDE10c + $AMP; Spine*kcatPDE10c_cAMP*PDE10c_cAMP;
  irrevreaction_19: PKAc_D32 => D32p34 + PKAc; Spine*kcatPKAc_D32*PKAc_D32;
  irrevreaction_20: PKAc_B56PP2A => B56PP2Ap + PKAc; Spine*kcatPKAc_B56PP2A*PKAc_B56PP2A;
  irrevreaction_21: CDK5_D32 => CDK5 + D32p75; Spine*kcatCDK5_D32*CDK5_D32;
  irrevreaction_22: B56PP2Ap_D32p75 => B56PP2Ap + DARPP32; Spine*kcatB56PP2Ap_D32p75*B56PP2Ap_D32p75;
  irrevreaction_23: B72PP2A_D32p75 => B72PP2A + DARPP32; Spine*kcatB72PP2A_D32p75*B72PP2A_D32p75;
  irrevreaction_24: B72PP2ACa_D32p75 => B72PPA2Ca + DARPP32; Spine*kcatB72PP2ACa_D32p75*B72PP2ACa_D32p75;
  irrevreaction_25: B56PP2A_D32p75 => B56PP2A + DARPP32; Spine*kcatB56PP2A_D32p75*B56PP2A_D32p75;
  irrevreaction_26: B72PP2ACa_D32p34 => B72PPA2Ca + DARPP32; Spine*kcatB72PP2A_D32p34*B72PP2ACa_D32p34;
  irrevreaction_27: B72PP2A_D32p34 => DARPP32 + B72PP2A; Spine*kcatB72PP2A_D32p34*B72PP2A_D32p34;
  irrevreaction_28: PP2Bc_D32p34 => DARPP32 + PP2Bc; Spine*kcatPP2Bc_D32p34*PP2Bc_D32p34;
  irrevreaction_29: B56PP2Ap => B56PP2A; Spine*kdpB56PP2Ap*B56PP2Ap;
  irrevreaction_30: PKAc_ARPP21 => PKAc + pARPP21; Spine*kcatPKAc_ARPP21*PKAc_ARPP21;
  irrevreaction_31: B72PPA2Ca_pARPP21 => ARPP21 + B72PPA2Ca; Spine*kcatPP2Ac_pARPP21*B72PPA2Ca_pARPP21;
  irrevreaction_32: B72PP2A_pARPP21 => ARPP21 + B72PP2A; Spine*kcatPP2A_pARPP21*B72PP2A_pARPP21;
  irrevreaction_33: B56PP2Ap_pARPP21 => ARPP21 + B56PP2Ap; Spine*kcatPP2Ac_pARPP21*B56PP2Ap_pARPP21;
  irrevreaction_34: B56PP2A_pARPP21 => ARPP21 + B56PP2A; Spine*kcatPP2A_pARPP21*B56PP2A_pARPP21;
  irrevreaction_35: CaMKIIpsd => CaMKII; Spine*ktransCaMKII*CaMKIIpsd;
  irrevreaction_36: CaMKIIcpsd => pCaMKIIcpsd; Spine*kpCaMKIIc*CaMKIIcpsd;
  irrevreaction_37: pCaMKII => CaMKII; Spine*kdppCaMKII*pCaMKII;
  irrevreaction_38: CaMKIIc => pCaMKIIc; Spine*kpCaMKIIc*CaMKIIc;
  irrevreaction_39: PP1_pCaMKIIpsd => PP1 + CaMKIIpsd; Spine*kcatPP1_pCaMKIIpsd*PP1_pCaMKIIpsd;
  irrevreaction_40: totalpCaMKIIpsd_Substrate => pSubstrate + $totalActCaMKIIpsd; Spine*kcatpCaMKII_Substrate*totalpCaMKIIpsd_Substrate;
  irrevreaction_41: PP1_pSubstrate => PP1 + Substrate; Spine*kcatPP1_pSubstrate*PP1_pSubstrate;

  // Unit definitions:
  unit substance = 1e-9 mole;
end
