// SBML level 2 version 3

model MODEL1604100000()
  // Mukhopadhyay2013 - T cell receptor proximal signaling reveals emergent ultrasensitivity
  // This model is described in the article:
  // Systems model of T cell receptor proximal signaling reveals emergent ultrasensitivity.
  // Mukhopadhyay H, Cordoba SP, Maini PK, van der Merwe PA, Dushek O.
  // PLoS Comput. Biol. 2013; 9(3): e1003004
  // Abstract:
  // Receptor phosphorylation is thought to be tightly regulated because phosphorylated receptors initiate signaling cascades leading to cellular activation. The T cell antigen receptor (TCR) on the surface of T cells is phosphorylated by the kinase Lck and dephosphorylated by the phosphatase CD45 on multiple immunoreceptor tyrosine-based activation motifs (ITAMs). Intriguingly, Lck sequentially phosphorylates ITAMs and ZAP-70, a cytosolic kinase, binds to phosphorylated ITAMs with differential affinities. The purpose of multiple ITAMs, their sequential phosphorylation, and the differential ZAP-70 affinities are unknown. Here, we use a systems model to show that this signaling architecture produces emergent ultrasensitivity resulting in switch-like responses at the scale of individual TCRs. Importantly, this switch-like response is an emergent property, so that removal of multiple ITAMs, sequential phosphorylation, or differential affinities abolishes the switch. We propose that highly regulated TCR phosphorylation is achieved by an emergent switch-like response and use the systems model to design novel chimeric antigen receptors for therapy.
  // This model is hosted on BioModels Database and identified by: MODEL1604100000.
  // To cite BioModels Database, please use: BioModels Database: An enhanced, curated and annotated resource for published quantitative kinetic models.
  // To the extent possible under law, all copyright and related or neighbouring rights to this encoded model have been dedicated to the public domain worldwide. Please refer to CC0 Public Domain Dedication for more information.
  // biomodels.db:MODEL1604100000

  // Compartments:
  compartment cell = 1;

  // Species:
  species S_Y1_U_Y2_U_Y3_U_b_0 in cell = 100; S_Y1_U_Y2_U_Y3_U_b_0 is "S(Y1~U,Y2~U,Y3~U,b~0)";
  species E_b in cell = 100; E_b is "E(b)";
  species F_b in cell = 100; F_b is "F(b)";
  species Z_b in cell = 5000; Z_b is "Z(b)";
  species E_b_1_S_Y1_U_1_Y2_U_Y3_U_b_1 in cell = 0; E_b_1_S_Y1_U_1_Y2_U_Y3_U_b_1 is "E(b!1).S(Y1~U!1,Y2~U,Y3~U,b~1)";
  species S_Y1_P_Y2_U_Y3_U_b_0 in cell = 0; S_Y1_P_Y2_U_Y3_U_b_0 is "S(Y1~P,Y2~U,Y3~U,b~0)";
  species F_b_1_S_Y1_P_1_Y2_U_Y3_U_b_1 in cell = 0; F_b_1_S_Y1_P_1_Y2_U_Y3_U_b_1 is "F(b!1).S(Y1~P!1,Y2~U,Y3~U,b~1)";
  species E_b_1_S_Y1_P_1_Y2_U_Y3_U_b_1 in cell = 0; E_b_1_S_Y1_P_1_Y2_U_Y3_U_b_1 is "E(b!1).S(Y1~P!1,Y2~U,Y3~U,b~1)";
  species S_Y1_2P_Y2_U_Y3_U_b_0 in cell = 0; S_Y1_2P_Y2_U_Y3_U_b_0 is "S(Y1~2P,Y2~U,Y3~U,b~0)";
  species F_b_1_S_Y1_2P_1_Y2_U_Y3_U_b_1 in cell = 0; F_b_1_S_Y1_2P_1_Y2_U_Y3_U_b_1 is "F(b!1).S(Y1~2P!1,Y2~U,Y3~U,b~1)";
  species E_b_1_S_Y1_2P_Y2_U_1_Y3_U_b_1 in cell = 0; E_b_1_S_Y1_2P_Y2_U_1_Y3_U_b_1 is "E(b!1).S(Y1~2P,Y2~U!1,Y3~U,b~1)";
  species S_Y1_2P_1_Y2_U_Y3_U_b_0_Z_b_1 in cell = 0; S_Y1_2P_1_Y2_U_Y3_U_b_0_Z_b_1 is "S(Y1~2P!1,Y2~U,Y3~U,b~0).Z(b!1)";
  species S13 in cell = 0; S13 is "E(b!1).S(Y1~2P!2,Y2~U!1,Y3~U,b~1).Z(b!2)";
  species S_Y1_2P_Y2_P_Y3_U_b_0 in cell = 0; S_Y1_2P_Y2_P_Y3_U_b_0 is "S(Y1~2P,Y2~P,Y3~U,b~0)";
  species S_Y1_2P_1_Y2_P_Y3_U_b_0_Z_b_1 in cell = 0; S_Y1_2P_1_Y2_P_Y3_U_b_0_Z_b_1 is "S(Y1~2P!1,Y2~P,Y3~U,b~0).Z(b!1)";
  species F_b_1_S_Y1_2P_Y2_P_1_Y3_U_b_1 in cell = 0; F_b_1_S_Y1_2P_Y2_P_1_Y3_U_b_1 is "F(b!1).S(Y1~2P,Y2~P!1,Y3~U,b~1)";
  species E_b_1_S_Y1_2P_Y2_P_1_Y3_U_b_1 in cell = 0; E_b_1_S_Y1_2P_Y2_P_1_Y3_U_b_1 is "E(b!1).S(Y1~2P,Y2~P!1,Y3~U,b~1)";
  species S18 in cell = 0; S18 is "F(b!1).S(Y1~2P!2,Y2~P!1,Y3~U,b~1).Z(b!2)";
  species S19 in cell = 0; S19 is "E(b!1).S(Y1~2P!2,Y2~P!1,Y3~U,b~1).Z(b!2)";
  species S_Y1_2P_Y2_2P_Y3_U_b_0 in cell = 0; S_Y1_2P_Y2_2P_Y3_U_b_0 is "S(Y1~2P,Y2~2P,Y3~U,b~0)";
  species S_Y1_2P_1_Y2_2P_Y3_U_b_0_Z_b_1 in cell = 0; S_Y1_2P_1_Y2_2P_Y3_U_b_0_Z_b_1 is "S(Y1~2P!1,Y2~2P,Y3~U,b~0).Z(b!1)";
  species F_b_1_S_Y1_2P_Y2_2P_1_Y3_U_b_1 in cell = 0; F_b_1_S_Y1_2P_Y2_2P_1_Y3_U_b_1 is "F(b!1).S(Y1~2P,Y2~2P!1,Y3~U,b~1)";
  species E_b_1_S_Y1_2P_Y2_2P_Y3_U_1_b_1 in cell = 0; E_b_1_S_Y1_2P_Y2_2P_Y3_U_1_b_1 is "E(b!1).S(Y1~2P,Y2~2P,Y3~U!1,b~1)";
  species S_Y1_2P_Y2_2P_1_Y3_U_b_0_Z_b_1 in cell = 0; S_Y1_2P_Y2_2P_1_Y3_U_b_0_Z_b_1 is "S(Y1~2P,Y2~2P!1,Y3~U,b~0).Z(b!1)";
  species S25 in cell = 0; S25 is "F(b!1).S(Y1~2P!2,Y2~2P!1,Y3~U,b~1).Z(b!2)";
  species S26 in cell = 0; S26 is "E(b!1).S(Y1~2P!2,Y2~2P,Y3~U!1,b~1).Z(b!2)";
  species S27 in cell = 0; S27 is "E(b!1).S(Y1~2P,Y2~2P!2,Y3~U!1,b~1).Z(b!2)";
  species S_Y1_2P_Y2_2P_Y3_P_b_0 in cell = 0; S_Y1_2P_Y2_2P_Y3_P_b_0 is "S(Y1~2P,Y2~2P,Y3~P,b~0)";
  species S29 in cell = 0; S29 is "S(Y1~2P!1,Y2~2P!2,Y3~U,b~0).Z(b!1).Z(b!2)";
  species S30 in cell = 0; S30 is "E(b!1).S(Y1~2P!2,Y2~2P!3,Y3~U!1,b~1).Z(b!2).Z(b!3)";
  species S_Y1_2P_1_Y2_2P_Y3_P_b_0_Z_b_1 in cell = 0; S_Y1_2P_1_Y2_2P_Y3_P_b_0_Z_b_1 is "S(Y1~2P!1,Y2~2P,Y3~P,b~0).Z(b!1)";
  species S_Y1_2P_Y2_2P_1_Y3_P_b_0_Z_b_1 in cell = 0; S_Y1_2P_Y2_2P_1_Y3_P_b_0_Z_b_1 is "S(Y1~2P,Y2~2P!1,Y3~P,b~0).Z(b!1)";
  species F_b_1_S_Y1_2P_Y2_2P_Y3_P_1_b_1 in cell = 0; F_b_1_S_Y1_2P_Y2_2P_Y3_P_1_b_1 is "F(b!1).S(Y1~2P,Y2~2P,Y3~P!1,b~1)";
  species E_b_1_S_Y1_2P_Y2_2P_Y3_P_1_b_1 in cell = 0; E_b_1_S_Y1_2P_Y2_2P_Y3_P_1_b_1 is "E(b!1).S(Y1~2P,Y2~2P,Y3~P!1,b~1)";
  species S35 in cell = 0; S35 is "S(Y1~2P!1,Y2~2P!2,Y3~P,b~0).Z(b!1).Z(b!2)";
  species S36 in cell = 0; S36 is "F(b!1).S(Y1~2P!2,Y2~2P,Y3~P!1,b~1).Z(b!2)";
  species S37 in cell = 0; S37 is "F(b!1).S(Y1~2P,Y2~2P!2,Y3~P!1,b~1).Z(b!2)";
  species S38 in cell = 0; S38 is "E(b!1).S(Y1~2P!2,Y2~2P,Y3~P!1,b~1).Z(b!2)";
  species S39 in cell = 0; S39 is "E(b!1).S(Y1~2P,Y2~2P!2,Y3~P!1,b~1).Z(b!2)";
  species S_Y1_2P_Y2_2P_Y3_2P_b_0 in cell = 0; S_Y1_2P_Y2_2P_Y3_2P_b_0 is "S(Y1~2P,Y2~2P,Y3~2P,b~0)";
  species S41 in cell = 0; S41 is "F(b!1).S(Y1~2P!2,Y2~2P!3,Y3~P!1,b~1).Z(b!2).Z(b!3)";
  species S42 in cell = 0; S42 is "E(b!1).S(Y1~2P!2,Y2~2P!3,Y3~P!1,b~1).Z(b!2).Z(b!3)";
  species S_Y1_2P_1_Y2_2P_Y3_2P_b_0_Z_b_1 in cell = 0; S_Y1_2P_1_Y2_2P_Y3_2P_b_0_Z_b_1 is "S(Y1~2P!1,Y2~2P,Y3~2P,b~0).Z(b!1)";
  species S_Y1_2P_Y2_2P_1_Y3_2P_b_0_Z_b_1 in cell = 0; S_Y1_2P_Y2_2P_1_Y3_2P_b_0_Z_b_1 is "S(Y1~2P,Y2~2P!1,Y3~2P,b~0).Z(b!1)";
  species F_b_1_S_Y1_2P_Y2_2P_Y3_2P_1_b_1 in cell = 0; F_b_1_S_Y1_2P_Y2_2P_Y3_2P_1_b_1 is "F(b!1).S(Y1~2P,Y2~2P,Y3~2P!1,b~1)";
  species S_Y1_2P_Y2_2P_Y3_2P_1_b_0_Z_b_1 in cell = 0; S_Y1_2P_Y2_2P_Y3_2P_1_b_0_Z_b_1 is "S(Y1~2P,Y2~2P,Y3~2P!1,b~0).Z(b!1)";
  species S47 in cell = 0; S47 is "S(Y1~2P!1,Y2~2P!2,Y3~2P,b~0).Z(b!1).Z(b!2)";
  species S48 in cell = 0; S48 is "F(b!1).S(Y1~2P!2,Y2~2P,Y3~2P!1,b~1).Z(b!2)";
  species S49 in cell = 0; S49 is "F(b!1).S(Y1~2P,Y2~2P!2,Y3~2P!1,b~1).Z(b!2)";
  species S50 in cell = 0; S50 is "S(Y1~2P!1,Y2~2P,Y3~2P!2,b~0).Z(b!1).Z(b!2)";
  species S51 in cell = 0; S51 is "S(Y1~2P,Y2~2P!1,Y3~2P!2,b~0).Z(b!1).Z(b!2)";
  species S52 in cell = 0; S52 is "F(b!1).S(Y1~2P!2,Y2~2P!3,Y3~2P!1,b~1).Z(b!2).Z(b!3)";
  species S53 in cell = 0; S53 is "S(Y1~2P!1,Y2~2P!2,Y3~2P!3,b~0).Z(b!1).Z(b!2).Z(b!3)";

  // Parameters:
  ek_on = 0.0001;
  ek_off = 10;
  ek_cat = 10;
  fk_on = 0.0001;
  fk_off = 10;
  fk_cat = 10;
  zap_on = 1;
  zap_off1 = 10;
  zap_off2 = 1;
  zap_off3 = 0.1;
  E_T = 100;
  F_T = 100;
  S_T = 100;
  Z_T = 5000;

  // Assignment rules:
  Bound_ZAP := S_Y1_2P_1_Y2_U_Y3_U_b_0_Z_b_1 + S13 + S_Y1_2P_1_Y2_P_Y3_U_b_0_Z_b_1 + S18 + S19 + S_Y1_2P_1_Y2_2P_Y3_U_b_0_Z_b_1 + S_Y1_2P_Y2_2P_1_Y3_U_b_0_Z_b_1 + S25 + S26 + S27 + 2*S29 + 2*S30 + S_Y1_2P_1_Y2_2P_Y3_P_b_0_Z_b_1 + S_Y1_2P_Y2_2P_1_Y3_P_b_0_Z_b_1 + 2*S35 + S36 + S37 + S38 + S39 + 2*S41 + 2*S42 + S_Y1_2P_1_Y2_2P_Y3_2P_b_0_Z_b_1 + S_Y1_2P_Y2_2P_1_Y3_2P_b_0_Z_b_1 + S_Y1_2P_Y2_2P_Y3_2P_1_b_0_Z_b_1 + 2*S47 + S48 + S49 + 2*S50 + 2*S51 + 2*S52 + 3*S53;
  Szero := S_Y1_U_Y2_U_Y3_U_b_0 + E_b_1_S_Y1_U_1_Y2_U_Y3_U_b_1;
  Sone := S_Y1_P_Y2_U_Y3_U_b_0 + F_b_1_S_Y1_P_1_Y2_U_Y3_U_b_1 + E_b_1_S_Y1_P_1_Y2_U_Y3_U_b_1;
  Stwo := S_Y1_2P_Y2_U_Y3_U_b_0 + F_b_1_S_Y1_2P_1_Y2_U_Y3_U_b_1 + E_b_1_S_Y1_2P_Y2_U_1_Y3_U_b_1 + S_Y1_2P_1_Y2_U_Y3_U_b_0_Z_b_1 + S13;
  Sthree := S_Y1_2P_Y2_P_Y3_U_b_0 + S_Y1_2P_1_Y2_P_Y3_U_b_0_Z_b_1 + F_b_1_S_Y1_2P_Y2_P_1_Y3_U_b_1 + E_b_1_S_Y1_2P_Y2_P_1_Y3_U_b_1 + S18 + S19;
  Sfour := S_Y1_2P_Y2_2P_Y3_U_b_0 + S_Y1_2P_1_Y2_2P_Y3_U_b_0_Z_b_1 + F_b_1_S_Y1_2P_Y2_2P_1_Y3_U_b_1 + E_b_1_S_Y1_2P_Y2_2P_Y3_U_1_b_1 + S_Y1_2P_Y2_2P_1_Y3_U_b_0_Z_b_1 + S25 + S26 + S27 + S29 + S30;
  Sfive := S_Y1_2P_Y2_2P_Y3_P_b_0 + S_Y1_2P_1_Y2_2P_Y3_P_b_0_Z_b_1 + S_Y1_2P_Y2_2P_1_Y3_P_b_0_Z_b_1 + F_b_1_S_Y1_2P_Y2_2P_Y3_P_1_b_1 + E_b_1_S_Y1_2P_Y2_2P_Y3_P_1_b_1 + S35 + S36 + S37 + S38 + S39 + S41 + S42;
  Ssix := S_Y1_2P_Y2_2P_Y3_2P_b_0 + S_Y1_2P_1_Y2_2P_Y3_2P_b_0_Z_b_1 + S_Y1_2P_Y2_2P_1_Y3_2P_b_0_Z_b_1 + F_b_1_S_Y1_2P_Y2_2P_Y3_2P_1_b_1 + S_Y1_2P_Y2_2P_Y3_2P_1_b_0_Z_b_1 + S47 + S48 + S49 + S50 + S51 + S52 + S53;

  // Reactions:
  R1: S_Y1_U_Y2_U_Y3_U_b_0 + E_b => E_b_1_S_Y1_U_1_Y2_U_Y3_U_b_1; ek_on*S_Y1_U_Y2_U_Y3_U_b_0*E_b;
  R2: E_b_1_S_Y1_U_1_Y2_U_Y3_U_b_1 => S_Y1_U_Y2_U_Y3_U_b_0 + E_b; ek_off*E_b_1_S_Y1_U_1_Y2_U_Y3_U_b_1;
  R3: E_b_1_S_Y1_U_1_Y2_U_Y3_U_b_1 => E_b + S_Y1_P_Y2_U_Y3_U_b_0; ek_cat*E_b_1_S_Y1_U_1_Y2_U_Y3_U_b_1;
  R4: F_b + S_Y1_P_Y2_U_Y3_U_b_0 => F_b_1_S_Y1_P_1_Y2_U_Y3_U_b_1; fk_on*F_b*S_Y1_P_Y2_U_Y3_U_b_0;
  R5: E_b + S_Y1_P_Y2_U_Y3_U_b_0 => E_b_1_S_Y1_P_1_Y2_U_Y3_U_b_1; ek_on*E_b*S_Y1_P_Y2_U_Y3_U_b_0;
  R6: F_b_1_S_Y1_P_1_Y2_U_Y3_U_b_1 => F_b + S_Y1_P_Y2_U_Y3_U_b_0; fk_off*F_b_1_S_Y1_P_1_Y2_U_Y3_U_b_1;
  R7: F_b_1_S_Y1_P_1_Y2_U_Y3_U_b_1 => S_Y1_U_Y2_U_Y3_U_b_0 + F_b; fk_cat*F_b_1_S_Y1_P_1_Y2_U_Y3_U_b_1;
  R8: E_b_1_S_Y1_P_1_Y2_U_Y3_U_b_1 => E_b + S_Y1_P_Y2_U_Y3_U_b_0; ek_off*E_b_1_S_Y1_P_1_Y2_U_Y3_U_b_1;
  R9: E_b_1_S_Y1_P_1_Y2_U_Y3_U_b_1 => E_b + S_Y1_2P_Y2_U_Y3_U_b_0; ek_cat*E_b_1_S_Y1_P_1_Y2_U_Y3_U_b_1;
  R10: F_b + S_Y1_2P_Y2_U_Y3_U_b_0 => F_b_1_S_Y1_2P_1_Y2_U_Y3_U_b_1; fk_on*F_b*S_Y1_2P_Y2_U_Y3_U_b_0;
  R11: E_b + S_Y1_2P_Y2_U_Y3_U_b_0 => E_b_1_S_Y1_2P_Y2_U_1_Y3_U_b_1; ek_on*E_b*S_Y1_2P_Y2_U_Y3_U_b_0;
  R12: Z_b + S_Y1_2P_Y2_U_Y3_U_b_0 => S_Y1_2P_1_Y2_U_Y3_U_b_0_Z_b_1; zap_on*Z_b*S_Y1_2P_Y2_U_Y3_U_b_0;
  R13: F_b_1_S_Y1_2P_1_Y2_U_Y3_U_b_1 => F_b + S_Y1_2P_Y2_U_Y3_U_b_0; fk_off*F_b_1_S_Y1_2P_1_Y2_U_Y3_U_b_1;
  R14: F_b_1_S_Y1_2P_1_Y2_U_Y3_U_b_1 => F_b + S_Y1_P_Y2_U_Y3_U_b_0; fk_cat*F_b_1_S_Y1_2P_1_Y2_U_Y3_U_b_1;
  R15: E_b + S_Y1_2P_1_Y2_U_Y3_U_b_0_Z_b_1 => S13; ek_on*E_b*S_Y1_2P_1_Y2_U_Y3_U_b_0_Z_b_1;
  R16: E_b_1_S_Y1_2P_Y2_U_1_Y3_U_b_1 => E_b + S_Y1_2P_Y2_U_Y3_U_b_0; ek_off*E_b_1_S_Y1_2P_Y2_U_1_Y3_U_b_1;
  R17: E_b_1_S_Y1_2P_Y2_U_1_Y3_U_b_1 => E_b + S_Y1_2P_Y2_P_Y3_U_b_0; ek_cat*E_b_1_S_Y1_2P_Y2_U_1_Y3_U_b_1;
  R18: Z_b + E_b_1_S_Y1_2P_Y2_U_1_Y3_U_b_1 => S13; zap_on*Z_b*E_b_1_S_Y1_2P_Y2_U_1_Y3_U_b_1;
  R19: S_Y1_2P_1_Y2_U_Y3_U_b_0_Z_b_1 => Z_b + S_Y1_2P_Y2_U_Y3_U_b_0; zap_off1*S_Y1_2P_1_Y2_U_Y3_U_b_0_Z_b_1;
  R20: S13 => E_b + S_Y1_2P_1_Y2_U_Y3_U_b_0_Z_b_1; ek_off*S13;
  R21: S13 => E_b + S_Y1_2P_1_Y2_P_Y3_U_b_0_Z_b_1; ek_cat*S13;
  R22: F_b + S_Y1_2P_Y2_P_Y3_U_b_0 => F_b_1_S_Y1_2P_Y2_P_1_Y3_U_b_1; fk_on*F_b*S_Y1_2P_Y2_P_Y3_U_b_0;
  R23: E_b + S_Y1_2P_Y2_P_Y3_U_b_0 => E_b_1_S_Y1_2P_Y2_P_1_Y3_U_b_1; ek_on*E_b*S_Y1_2P_Y2_P_Y3_U_b_0;
  R24: Z_b + S_Y1_2P_Y2_P_Y3_U_b_0 => S_Y1_2P_1_Y2_P_Y3_U_b_0_Z_b_1; zap_on*Z_b*S_Y1_2P_Y2_P_Y3_U_b_0;
  R25: S13 => Z_b + E_b_1_S_Y1_2P_Y2_U_1_Y3_U_b_1; zap_off1*S13;
  R26: F_b + S_Y1_2P_1_Y2_P_Y3_U_b_0_Z_b_1 => S18; fk_on*F_b*S_Y1_2P_1_Y2_P_Y3_U_b_0_Z_b_1;
  R27: F_b_1_S_Y1_2P_Y2_P_1_Y3_U_b_1 => F_b + S_Y1_2P_Y2_P_Y3_U_b_0; fk_off*F_b_1_S_Y1_2P_Y2_P_1_Y3_U_b_1;
  R28: F_b_1_S_Y1_2P_Y2_P_1_Y3_U_b_1 => F_b + S_Y1_2P_Y2_U_Y3_U_b_0; fk_cat*F_b_1_S_Y1_2P_Y2_P_1_Y3_U_b_1;
  R29: E_b + S_Y1_2P_1_Y2_P_Y3_U_b_0_Z_b_1 => S19; ek_on*E_b*S_Y1_2P_1_Y2_P_Y3_U_b_0_Z_b_1;
  R30: E_b_1_S_Y1_2P_Y2_P_1_Y3_U_b_1 => E_b + S_Y1_2P_Y2_P_Y3_U_b_0; ek_off*E_b_1_S_Y1_2P_Y2_P_1_Y3_U_b_1;
  R31: E_b_1_S_Y1_2P_Y2_P_1_Y3_U_b_1 => E_b + S_Y1_2P_Y2_2P_Y3_U_b_0; ek_cat*E_b_1_S_Y1_2P_Y2_P_1_Y3_U_b_1;
  R32: Z_b + F_b_1_S_Y1_2P_Y2_P_1_Y3_U_b_1 => S18; zap_on*Z_b*F_b_1_S_Y1_2P_Y2_P_1_Y3_U_b_1;
  R33: Z_b + E_b_1_S_Y1_2P_Y2_P_1_Y3_U_b_1 => S19; zap_on*Z_b*E_b_1_S_Y1_2P_Y2_P_1_Y3_U_b_1;
  R34: S_Y1_2P_1_Y2_P_Y3_U_b_0_Z_b_1 => Z_b + S_Y1_2P_Y2_P_Y3_U_b_0; zap_off1*S_Y1_2P_1_Y2_P_Y3_U_b_0_Z_b_1;
  R35: S18 => F_b + S_Y1_2P_1_Y2_P_Y3_U_b_0_Z_b_1; fk_off*S18;
  R36: S18 => F_b + S_Y1_2P_1_Y2_U_Y3_U_b_0_Z_b_1; fk_cat*S18;
  R37: S19 => E_b + S_Y1_2P_1_Y2_P_Y3_U_b_0_Z_b_1; ek_off*S19;
  R38: S19 => E_b + S_Y1_2P_1_Y2_2P_Y3_U_b_0_Z_b_1; ek_cat*S19;
  R39: F_b + S_Y1_2P_Y2_2P_Y3_U_b_0 => F_b_1_S_Y1_2P_Y2_2P_1_Y3_U_b_1; fk_on*F_b*S_Y1_2P_Y2_2P_Y3_U_b_0;
  R40: E_b + S_Y1_2P_Y2_2P_Y3_U_b_0 => E_b_1_S_Y1_2P_Y2_2P_Y3_U_1_b_1; ek_on*E_b*S_Y1_2P_Y2_2P_Y3_U_b_0;
  R41: Z_b + S_Y1_2P_Y2_2P_Y3_U_b_0 => S_Y1_2P_1_Y2_2P_Y3_U_b_0_Z_b_1; zap_on*Z_b*S_Y1_2P_Y2_2P_Y3_U_b_0;
  R42: S18 => Z_b + F_b_1_S_Y1_2P_Y2_P_1_Y3_U_b_1; zap_off1*S18;
  R43: S19 => Z_b + E_b_1_S_Y1_2P_Y2_P_1_Y3_U_b_1; zap_off1*S19;
  R44: Z_b + S_Y1_2P_Y2_2P_Y3_U_b_0 => S_Y1_2P_Y2_2P_1_Y3_U_b_0_Z_b_1; zap_on*Z_b*S_Y1_2P_Y2_2P_Y3_U_b_0;
  R45: F_b + S_Y1_2P_1_Y2_2P_Y3_U_b_0_Z_b_1 => S25; fk_on*F_b*S_Y1_2P_1_Y2_2P_Y3_U_b_0_Z_b_1;
  R46: F_b_1_S_Y1_2P_Y2_2P_1_Y3_U_b_1 => F_b + S_Y1_2P_Y2_2P_Y3_U_b_0; fk_off*F_b_1_S_Y1_2P_Y2_2P_1_Y3_U_b_1;
  R47: F_b_1_S_Y1_2P_Y2_2P_1_Y3_U_b_1 => F_b + S_Y1_2P_Y2_P_Y3_U_b_0; fk_cat*F_b_1_S_Y1_2P_Y2_2P_1_Y3_U_b_1;
  R48: E_b + S_Y1_2P_1_Y2_2P_Y3_U_b_0_Z_b_1 => S26; ek_on*E_b*S_Y1_2P_1_Y2_2P_Y3_U_b_0_Z_b_1;
  R49: E_b + S_Y1_2P_Y2_2P_1_Y3_U_b_0_Z_b_1 => S27; ek_on*E_b*S_Y1_2P_Y2_2P_1_Y3_U_b_0_Z_b_1;
  R50: E_b_1_S_Y1_2P_Y2_2P_Y3_U_1_b_1 => E_b + S_Y1_2P_Y2_2P_Y3_U_b_0; ek_off*E_b_1_S_Y1_2P_Y2_2P_Y3_U_1_b_1;
  R51: E_b_1_S_Y1_2P_Y2_2P_Y3_U_1_b_1 => E_b + S_Y1_2P_Y2_2P_Y3_P_b_0; ek_cat*E_b_1_S_Y1_2P_Y2_2P_Y3_U_1_b_1;
  R52: Z_b + F_b_1_S_Y1_2P_Y2_2P_1_Y3_U_b_1 => S25; zap_on*Z_b*F_b_1_S_Y1_2P_Y2_2P_1_Y3_U_b_1;
  R53: Z_b + E_b_1_S_Y1_2P_Y2_2P_Y3_U_1_b_1 => S26; zap_on*Z_b*E_b_1_S_Y1_2P_Y2_2P_Y3_U_1_b_1;
  R54: Z_b + S_Y1_2P_Y2_2P_1_Y3_U_b_0_Z_b_1 => S29; zap_on*Z_b*S_Y1_2P_Y2_2P_1_Y3_U_b_0_Z_b_1;
  R55: S_Y1_2P_1_Y2_2P_Y3_U_b_0_Z_b_1 => Z_b + S_Y1_2P_Y2_2P_Y3_U_b_0; zap_off1*S_Y1_2P_1_Y2_2P_Y3_U_b_0_Z_b_1;
  R56: Z_b + S_Y1_2P_1_Y2_2P_Y3_U_b_0_Z_b_1 => S29; zap_on*Z_b*S_Y1_2P_1_Y2_2P_Y3_U_b_0_Z_b_1;
  R57: Z_b + E_b_1_S_Y1_2P_Y2_2P_Y3_U_1_b_1 => S27; zap_on*Z_b*E_b_1_S_Y1_2P_Y2_2P_Y3_U_1_b_1;
  R58: S_Y1_2P_Y2_2P_1_Y3_U_b_0_Z_b_1 => Z_b + S_Y1_2P_Y2_2P_Y3_U_b_0; zap_off2*S_Y1_2P_Y2_2P_1_Y3_U_b_0_Z_b_1;
  R59: S25 => F_b + S_Y1_2P_1_Y2_2P_Y3_U_b_0_Z_b_1; fk_off*S25;
  R60: S25 => F_b + S_Y1_2P_1_Y2_P_Y3_U_b_0_Z_b_1; fk_cat*S25;
  R61: E_b + S29 => S30; ek_on*E_b*S29;
  R62: S26 => E_b + S_Y1_2P_1_Y2_2P_Y3_U_b_0_Z_b_1; ek_off*S26;
  R63: S27 => E_b + S_Y1_2P_Y2_2P_1_Y3_U_b_0_Z_b_1; ek_off*S27;
  R64: S26 => E_b + S_Y1_2P_1_Y2_2P_Y3_P_b_0_Z_b_1; ek_cat*S26;
  R65: S27 => E_b + S_Y1_2P_Y2_2P_1_Y3_P_b_0_Z_b_1; ek_cat*S27;
  R66: F_b + S_Y1_2P_Y2_2P_Y3_P_b_0 => F_b_1_S_Y1_2P_Y2_2P_Y3_P_1_b_1; fk_on*F_b*S_Y1_2P_Y2_2P_Y3_P_b_0;
  R67: E_b + S_Y1_2P_Y2_2P_Y3_P_b_0 => E_b_1_S_Y1_2P_Y2_2P_Y3_P_1_b_1; ek_on*E_b*S_Y1_2P_Y2_2P_Y3_P_b_0;
  R68: Z_b + S27 => S30; zap_on*Z_b*S27;
  R69: Z_b + S_Y1_2P_Y2_2P_Y3_P_b_0 => S_Y1_2P_1_Y2_2P_Y3_P_b_0_Z_b_1; zap_on*Z_b*S_Y1_2P_Y2_2P_Y3_P_b_0;
  R70: S25 => Z_b + F_b_1_S_Y1_2P_Y2_2P_1_Y3_U_b_1; zap_off1*S25;
  R71: S26 => Z_b + E_b_1_S_Y1_2P_Y2_2P_Y3_U_1_b_1; zap_off1*S26;
  R72: S29 => Z_b + S_Y1_2P_Y2_2P_1_Y3_U_b_0_Z_b_1; zap_off1*S29;
  R73: Z_b + S26 => S30; zap_on*Z_b*S26;
  R74: Z_b + S_Y1_2P_Y2_2P_Y3_P_b_0 => S_Y1_2P_Y2_2P_1_Y3_P_b_0_Z_b_1; zap_on*Z_b*S_Y1_2P_Y2_2P_Y3_P_b_0;
  R75: S27 => Z_b + E_b_1_S_Y1_2P_Y2_2P_Y3_U_1_b_1; zap_off2*S27;
  R76: S29 => Z_b + S_Y1_2P_1_Y2_2P_Y3_U_b_0_Z_b_1; zap_off2*S29;
  R77: S30 => E_b + S29; ek_off*S30;
  R78: S30 => E_b + S35; ek_cat*S30;
  R79: F_b + S_Y1_2P_1_Y2_2P_Y3_P_b_0_Z_b_1 => S36; fk_on*F_b*S_Y1_2P_1_Y2_2P_Y3_P_b_0_Z_b_1;
  R80: F_b + S_Y1_2P_Y2_2P_1_Y3_P_b_0_Z_b_1 => S37; fk_on*F_b*S_Y1_2P_Y2_2P_1_Y3_P_b_0_Z_b_1;
  R81: F_b_1_S_Y1_2P_Y2_2P_Y3_P_1_b_1 => F_b + S_Y1_2P_Y2_2P_Y3_P_b_0; fk_off*F_b_1_S_Y1_2P_Y2_2P_Y3_P_1_b_1;
  R82: F_b_1_S_Y1_2P_Y2_2P_Y3_P_1_b_1 => F_b + S_Y1_2P_Y2_2P_Y3_U_b_0; fk_cat*F_b_1_S_Y1_2P_Y2_2P_Y3_P_1_b_1;
  R83: E_b + S_Y1_2P_1_Y2_2P_Y3_P_b_0_Z_b_1 => S38; ek_on*E_b*S_Y1_2P_1_Y2_2P_Y3_P_b_0_Z_b_1;
  R84: E_b + S_Y1_2P_Y2_2P_1_Y3_P_b_0_Z_b_1 => S39; ek_on*E_b*S_Y1_2P_Y2_2P_1_Y3_P_b_0_Z_b_1;
  R85: E_b_1_S_Y1_2P_Y2_2P_Y3_P_1_b_1 => E_b + S_Y1_2P_Y2_2P_Y3_P_b_0; ek_off*E_b_1_S_Y1_2P_Y2_2P_Y3_P_1_b_1;
  R86: E_b_1_S_Y1_2P_Y2_2P_Y3_P_1_b_1 => E_b + S_Y1_2P_Y2_2P_Y3_2P_b_0; ek_cat*E_b_1_S_Y1_2P_Y2_2P_Y3_P_1_b_1;
  R87: Z_b + S_Y1_2P_Y2_2P_1_Y3_P_b_0_Z_b_1 => S35; zap_on*Z_b*S_Y1_2P_Y2_2P_1_Y3_P_b_0_Z_b_1;
  R88: Z_b + F_b_1_S_Y1_2P_Y2_2P_Y3_P_1_b_1 => S36; zap_on*Z_b*F_b_1_S_Y1_2P_Y2_2P_Y3_P_1_b_1;
  R89: Z_b + E_b_1_S_Y1_2P_Y2_2P_Y3_P_1_b_1 => S38; zap_on*Z_b*E_b_1_S_Y1_2P_Y2_2P_Y3_P_1_b_1;
  R90: S30 => Z_b + S27; zap_off1*S30;
  R91: S_Y1_2P_1_Y2_2P_Y3_P_b_0_Z_b_1 => Z_b + S_Y1_2P_Y2_2P_Y3_P_b_0; zap_off1*S_Y1_2P_1_Y2_2P_Y3_P_b_0_Z_b_1;
  R92: Z_b + S_Y1_2P_1_Y2_2P_Y3_P_b_0_Z_b_1 => S35; zap_on*Z_b*S_Y1_2P_1_Y2_2P_Y3_P_b_0_Z_b_1;
  R93: Z_b + F_b_1_S_Y1_2P_Y2_2P_Y3_P_1_b_1 => S37; zap_on*Z_b*F_b_1_S_Y1_2P_Y2_2P_Y3_P_1_b_1;
  R94: Z_b + E_b_1_S_Y1_2P_Y2_2P_Y3_P_1_b_1 => S39; zap_on*Z_b*E_b_1_S_Y1_2P_Y2_2P_Y3_P_1_b_1;
  R95: S30 => Z_b + S26; zap_off2*S30;
  R96: S_Y1_2P_Y2_2P_1_Y3_P_b_0_Z_b_1 => Z_b + S_Y1_2P_Y2_2P_Y3_P_b_0; zap_off2*S_Y1_2P_Y2_2P_1_Y3_P_b_0_Z_b_1;
  R97: F_b + S35 => S41; fk_on*F_b*S35;
  R98: S36 => F_b + S_Y1_2P_1_Y2_2P_Y3_P_b_0_Z_b_1; fk_off*S36;
  R99: S37 => F_b + S_Y1_2P_Y2_2P_1_Y3_P_b_0_Z_b_1; fk_off*S37;
  R100: S36 => F_b + S_Y1_2P_1_Y2_2P_Y3_U_b_0_Z_b_1; fk_cat*S36;
  R101: S37 => F_b + S_Y1_2P_Y2_2P_1_Y3_U_b_0_Z_b_1; fk_cat*S37;
  R102: E_b + S35 => S42; ek_on*E_b*S35;
  R103: S38 => E_b + S_Y1_2P_1_Y2_2P_Y3_P_b_0_Z_b_1; ek_off*S38;
  R104: S39 => E_b + S_Y1_2P_Y2_2P_1_Y3_P_b_0_Z_b_1; ek_off*S39;
  R105: S38 => E_b + S_Y1_2P_1_Y2_2P_Y3_2P_b_0_Z_b_1; ek_cat*S38;
  R106: S39 => E_b + S_Y1_2P_Y2_2P_1_Y3_2P_b_0_Z_b_1; ek_cat*S39;
  R107: F_b + S_Y1_2P_Y2_2P_Y3_2P_b_0 => F_b_1_S_Y1_2P_Y2_2P_Y3_2P_1_b_1; fk_on*F_b*S_Y1_2P_Y2_2P_Y3_2P_b_0;
  R108: Z_b + S37 => S41; zap_on*Z_b*S37;
  R109: Z_b + S39 => S42; zap_on*Z_b*S39;
  R110: Z_b + S_Y1_2P_Y2_2P_Y3_2P_b_0 => S_Y1_2P_1_Y2_2P_Y3_2P_b_0_Z_b_1; zap_on*Z_b*S_Y1_2P_Y2_2P_Y3_2P_b_0;
  R111: S35 => Z_b + S_Y1_2P_Y2_2P_1_Y3_P_b_0_Z_b_1; zap_off1*S35;
  R112: S36 => Z_b + F_b_1_S_Y1_2P_Y2_2P_Y3_P_1_b_1; zap_off1*S36;
  R113: S38 => Z_b + E_b_1_S_Y1_2P_Y2_2P_Y3_P_1_b_1; zap_off1*S38;
  R114: Z_b + S36 => S41; zap_on*Z_b*S36;
  R115: Z_b + S38 => S42; zap_on*Z_b*S38;
  R116: Z_b + S_Y1_2P_Y2_2P_Y3_2P_b_0 => S_Y1_2P_Y2_2P_1_Y3_2P_b_0_Z_b_1; zap_on*Z_b*S_Y1_2P_Y2_2P_Y3_2P_b_0;
  R117: S35 => Z_b + S_Y1_2P_1_Y2_2P_Y3_P_b_0_Z_b_1; zap_off2*S35;
  R118: S37 => Z_b + F_b_1_S_Y1_2P_Y2_2P_Y3_P_1_b_1; zap_off2*S37;
  R119: S39 => Z_b + E_b_1_S_Y1_2P_Y2_2P_Y3_P_1_b_1; zap_off2*S39;
  R120: Z_b + S_Y1_2P_Y2_2P_Y3_2P_b_0 => S_Y1_2P_Y2_2P_Y3_2P_1_b_0_Z_b_1; zap_on*Z_b*S_Y1_2P_Y2_2P_Y3_2P_b_0;
  R121: S41 => F_b + S35; fk_off*S41;
  R122: S41 => F_b + S29; fk_cat*S41;
  R123: S42 => E_b + S35; ek_off*S42;
  R124: S42 => E_b + S47; ek_cat*S42;
  R125: F_b + S_Y1_2P_1_Y2_2P_Y3_2P_b_0_Z_b_1 => S48; fk_on*F_b*S_Y1_2P_1_Y2_2P_Y3_2P_b_0_Z_b_1;
  R126: F_b + S_Y1_2P_Y2_2P_1_Y3_2P_b_0_Z_b_1 => S49; fk_on*F_b*S_Y1_2P_Y2_2P_1_Y3_2P_b_0_Z_b_1;
  R127: F_b_1_S_Y1_2P_Y2_2P_Y3_2P_1_b_1 => F_b + S_Y1_2P_Y2_2P_Y3_2P_b_0; fk_off*F_b_1_S_Y1_2P_Y2_2P_Y3_2P_1_b_1;
  R128: F_b_1_S_Y1_2P_Y2_2P_Y3_2P_1_b_1 => F_b + S_Y1_2P_Y2_2P_Y3_P_b_0; fk_cat*F_b_1_S_Y1_2P_Y2_2P_Y3_2P_1_b_1;
  R129: Z_b + S_Y1_2P_Y2_2P_1_Y3_2P_b_0_Z_b_1 => S47; zap_on*Z_b*S_Y1_2P_Y2_2P_1_Y3_2P_b_0_Z_b_1;
  R130: Z_b + F_b_1_S_Y1_2P_Y2_2P_Y3_2P_1_b_1 => S48; zap_on*Z_b*F_b_1_S_Y1_2P_Y2_2P_Y3_2P_1_b_1;
  R131: Z_b + S_Y1_2P_Y2_2P_Y3_2P_1_b_0_Z_b_1 => S50; zap_on*Z_b*S_Y1_2P_Y2_2P_Y3_2P_1_b_0_Z_b_1;
  R132: S41 => Z_b + S37; zap_off1*S41;
  R133: S42 => Z_b + S39; zap_off1*S42;
  R134: S_Y1_2P_1_Y2_2P_Y3_2P_b_0_Z_b_1 => Z_b + S_Y1_2P_Y2_2P_Y3_2P_b_0; zap_off1*S_Y1_2P_1_Y2_2P_Y3_2P_b_0_Z_b_1;
  R135: Z_b + S_Y1_2P_1_Y2_2P_Y3_2P_b_0_Z_b_1 => S47; zap_on*Z_b*S_Y1_2P_1_Y2_2P_Y3_2P_b_0_Z_b_1;
  R136: Z_b + F_b_1_S_Y1_2P_Y2_2P_Y3_2P_1_b_1 => S49; zap_on*Z_b*F_b_1_S_Y1_2P_Y2_2P_Y3_2P_1_b_1;
  R137: Z_b + S_Y1_2P_Y2_2P_Y3_2P_1_b_0_Z_b_1 => S51; zap_on*Z_b*S_Y1_2P_Y2_2P_Y3_2P_1_b_0_Z_b_1;
  R138: S41 => Z_b + S36; zap_off2*S41;
  R139: S42 => Z_b + S38; zap_off2*S42;
  R140: S_Y1_2P_Y2_2P_1_Y3_2P_b_0_Z_b_1 => Z_b + S_Y1_2P_Y2_2P_Y3_2P_b_0; zap_off2*S_Y1_2P_Y2_2P_1_Y3_2P_b_0_Z_b_1;
  R141: Z_b + S_Y1_2P_1_Y2_2P_Y3_2P_b_0_Z_b_1 => S50; zap_on*Z_b*S_Y1_2P_1_Y2_2P_Y3_2P_b_0_Z_b_1;
  R142: Z_b + S_Y1_2P_Y2_2P_1_Y3_2P_b_0_Z_b_1 => S51; zap_on*Z_b*S_Y1_2P_Y2_2P_1_Y3_2P_b_0_Z_b_1;
  R143: S_Y1_2P_Y2_2P_Y3_2P_1_b_0_Z_b_1 => Z_b + S_Y1_2P_Y2_2P_Y3_2P_b_0; zap_off3*S_Y1_2P_Y2_2P_Y3_2P_1_b_0_Z_b_1;
  R144: F_b + S47 => S52; fk_on*F_b*S47;
  R145: S48 => F_b + S_Y1_2P_1_Y2_2P_Y3_2P_b_0_Z_b_1; fk_off*S48;
  R146: S49 => F_b + S_Y1_2P_Y2_2P_1_Y3_2P_b_0_Z_b_1; fk_off*S49;
  R147: S48 => F_b + S_Y1_2P_1_Y2_2P_Y3_P_b_0_Z_b_1; fk_cat*S48;
  R148: S49 => F_b + S_Y1_2P_Y2_2P_1_Y3_P_b_0_Z_b_1; fk_cat*S49;
  R149: Z_b + S49 => S52; zap_on*Z_b*S49;
  R150: Z_b + S51 => S53; zap_on*Z_b*S51;
  R151: S47 => Z_b + S_Y1_2P_Y2_2P_1_Y3_2P_b_0_Z_b_1; zap_off1*S47;
  R152: S48 => Z_b + F_b_1_S_Y1_2P_Y2_2P_Y3_2P_1_b_1; zap_off1*S48;
  R153: S50 => Z_b + S_Y1_2P_Y2_2P_Y3_2P_1_b_0_Z_b_1; zap_off1*S50;
  R154: Z_b + S48 => S52; zap_on*Z_b*S48;
  R155: Z_b + S50 => S53; zap_on*Z_b*S50;
  R156: S47 => Z_b + S_Y1_2P_1_Y2_2P_Y3_2P_b_0_Z_b_1; zap_off2*S47;
  R157: S49 => Z_b + F_b_1_S_Y1_2P_Y2_2P_Y3_2P_1_b_1; zap_off2*S49;
  R158: S51 => Z_b + S_Y1_2P_Y2_2P_Y3_2P_1_b_0_Z_b_1; zap_off2*S51;
  R159: Z_b + S47 => S53; zap_on*Z_b*S47;
  R160: S50 => Z_b + S_Y1_2P_1_Y2_2P_Y3_2P_b_0_Z_b_1; zap_off3*S50;
  R161: S51 => Z_b + S_Y1_2P_Y2_2P_1_Y3_2P_b_0_Z_b_1; zap_off3*S51;
  R162: S52 => F_b + S47; fk_off*S52;
  R163: S52 => F_b + S35; fk_cat*S52;
  R164: S52 => Z_b + S49; zap_off1*S52;
  R165: S53 => Z_b + S51; zap_off1*S53;
  R166: S52 => Z_b + S48; zap_off2*S52;
  R167: S53 => Z_b + S50; zap_off2*S53;
  R168: S53 => Z_b + S47; zap_off3*S53;
end
