// SBML level 2 version 4

function _2p_Mod_MA_Inh_KO(k, M1, S, Ki, Inh, n, ko)
  k*M1*S/(1 + Ki*Inh^n)^ko;
end

function transport__rev(A, P, S, f, ks)
  f*ks*A*(S - P);
end
transport__rev is "transport (rev)";

function Modified_mass_action__irrev(k, M, S)
  k*M*S;
end
Modified_mass_action__irrev is "Modified mass action (irrev)";

function mod_sat_CF(k, M, Km)
  k*M/(Km + M);
end

function Mod_CF_KO(k, Mod, ko)
  k*Mod*ko;
end

function MA_KO(k, Sub, KO)
  k*Sub*KO;
end

function neg_auto_reg_KO(ko, k, P, Ki, n)
  ko*k/(1 + (P/Ki)^n);
end

function Mod_MA(Mod, k, Sub)
  Mod*k*Sub;
end

model MODEL1606100000()
  // Talemi2016 - Yeast osmo-homoestasis
  // This model is described in the article:
  // Systems Level Analysis of the Yeast Osmo-Stat.
  // Talemi SR, Tiger CF, Andersson M, Babazadeh R, Welkenhuysen N, Klipp E, Hohmann S, Schaber J.
  // Sci Rep 2016; 6: 30950
  // Abstract:
  // Adaptation is an important property of living organisms enabling them to cope with environmental stress and maintaining homeostasis. Adaptation is mediated by signaling pathways responding to different stimuli. Those signaling pathways might communicate in order to orchestrate the cellular response to multiple simultaneous stimuli, a phenomenon called crosstalk. Here, we investigate possible mechanisms of crosstalk between the High Osmolarity Glycerol (HOG) and the Cell Wall Integrity (CWI) pathways in yeast, which mediate adaptation to hyper- and hypo-osmotic challenges, respectively. We combine ensemble modeling with experimental investigations to test in quantitative terms different hypotheses about the crosstalk of the HOG and the CWI pathways. Our analyses indicate that for the conditions studied i) the CWI pathway activation employs an adaptive mechanism with a variable volume-dependent threshold, in contrast to the HOG pathway, whose activation relies on a fixed volume-dependent threshold, ii) there is no or little direct crosstalk between the HOG and CWI pathways, and iii) its mainly the HOG alone mediating adaptation of cellular osmotic pressure for both hyper- as well as hypo-osmotic stress. Thus, by iteratively combining mathematical modeling with experimentation we achieved a better understanding of regulatory mechanisms of yeast osmo-homeostasis and formulated new hypotheses about osmo-sensing.
  // This model is hosted on BioModels Database and identified by: MODEL1606100000.
  // To cite BioModels Database, please use: BioModels Database: An enhanced, curated and annotated resource for published quantitative kinetic models.
  // To the extent possible under law, all copyright and related or neighbouring rights to this encoded model have been dedicated to the public domain worldwide. Please refer to CC0 Public Domain Dedication for more information.
  // biomodels.db:MODEL1606100000

  // Compartments:
  compartment Vos = V0*osf;
  compartment Vex;
  compartment V;
  compartment Membrane = 1;

  // Species:
  substanceOnly species Glyin in Vos = 5310000;
  substanceOnly species $Osmin in Vos;
  substanceOnly species Hog1 in Vos = 6788*N2uM*(1 - Hog1PPrelIni*maxHog1nucf)*Vos;
  substanceOnly species Hog1PP in Vos = 6788*N2uM*Hog1PPrelIni*maxHog1nucf*Vos;
  substanceOnly species Slt2 in Vos = 3230*N2uM*(1 - Slt2PrelIni*maxHog1nucf)*Vos;
  substanceOnly species Slt2P in Vos = 3230*N2uM*Slt2PrelIni*maxHog1nucf*Vos;
  substanceOnly species Glyex in Vex = Glyin/Vos/100*Vex;
  substanceOnly species $Osmex in Vex;
  substanceOnly species Fps1 in Membrane = 907*N2uM/2*Membrane;
  substanceOnly species Fps1P in Membrane = 907*N2uM/2*Membrane;
  substanceOnly species Sensitizer in Membrane = Sensitizer_0*Membrane;

  // Parameters:
  R = 8.314;
  T = 303.15;
  mol = 6.022e23;
  c2p = 1e-9;
  tm = 10;
  Lp = 0.013;
  P0 = 0.61;
  eps = 14.3;
  minf = 0.41;
  ce0 = 260000;
  V0 = 50;
  maxHog1nucf = 0.8;
  k0 = 59.901;
  Hog1PPrelIni = 0.061;
  Km7 = v7_k*(Hog1PP/Vos)*Vos/(Fps1Open*v8_ks*Area*(Glyin/Vos - Glyex/Vex)) - Hog1PP/Vos;
  s1 = 0;
  s2 = 0;
  Slt2PrelIni = 0.246;
  ts = 800000;
  toff = 120;
  k6b = (v5_k*(Hog1PP/Vos)*(Fps1/Membrane) - v6_k*(Fps1P/Membrane)*(Slt2P/Vos))/(Fps1P/Membrane);
  k1 = 25.4711;
  k2 = 2.15338; k2 is "Vmax2";
  Km2 = 0.000939165;
  HOGSignal = (k0 - Vos*k2 - k1*Km2 + sqrt((k0 - Vos*k2 - k1*Km2)^2 + 4*k0*k1*Km2))/(2*k1);
  k9 = 0.0772144;
  k10 = 0.000131323;
  Km11 = 0.0180575;
  Slt2Signal = (k9*Vos - k11*(Sensitizer/Membrane)^SW_Sensitizer - k10*Km11 + sqrt((k11*(Sensitizer/Membrane)^SW_Sensitizer + k10*Km11 - k9*Vos)^2 + 4*k10*Vos*k9*Km11))/(2*k10);
  k4 = v3_k*HOGSignal*(Hog1/Vos)/(Hog1PP/Vos*(1 + v3_Ki*(Slt2P/Vos)^v3_n)^SW_SI);
  k11 = 0.713377; k11 is "Vmax11";
  SW_Sensitizer = 1;
  SW_HI = 0;
  SW_SI = 0;
  Sensitizer_0 = 3.42838;
  v7_k = 849.986;
  v8_ks = 0.000776772;
  v5_k = 0.12348;
  v6_k = 1.1077e-6;
  v3_k = 0.231769;
  v3_Ki = 0.1;
  v3_n = 0.1;
  v12_k = 0.00929813;
  v12_Ki = 0.1;
  v12_n = 0.1;
  v14_k = 0.113591;
  v16_k = 3.26314;
  v16_Ki = 3.08897;
  v16_n = 999.898;
  Initial_for_Sensitizer = Sensitizer;
  Initial_for_V = V;
  Initial_for_Glyex = Glyex;
  Initial_for_Vos = Vos;
  Initial_for_Glyin = Glyin;
  Initial_for_Hog1PP = Hog1PP;
  Initial_for_Hog1 = Hog1;
  Initial_for_Slt2P = Slt2P;
  Initial_for_Slt2 = Slt2;
  Initial_for_Lp = Lp;
  Initial_for_P0 = P0;
  Initial_for_R = R;
  Initial_for_SW_HI = SW_HI;
  Initial_for_SW_Sensitizer = SW_Sensitizer;
  Initial_for_Slt2Signal = Slt2Signal;
  Initial_for_T = T;
  Initial_for_V0 = V0;
  Initial_for_Vb = Vb;
  Initial_for_c2p = c2p;
  Initial_for_ce0 = ce0;
  Initial_for_ci0 = ci0;
  Initial_for_cin0 = cin0;
  Initial_for_eps = eps;
  Initial_for_maxHog1nucf = maxHog1nucf;
  Initial_for_minf = minf;
  Initial_for_mol = mol;

  // Assignment rules:
  osf := 1 - Initial_for_minf;
  Vb := Initial_for_V0*Initial_for_minf;
  N2uM := 1e21/(Initial_for_mol*Initial_for_Vos);
  ci0 := Initial_for_ce0 + Initial_for_P0/(Initial_for_c2p*Initial_for_R*Initial_for_T);
  cin0 := Initial_for_ci0 - Initial_for_Glyin;
  Fps1Open := Fps1/Membrane/(Fps1/Membrane + Fps1P/Membrane);
  FitHog1PPrel := 100*(Hog1PP/Vos)*Vos/(Initial_for_maxHog1nucf*(Initial_for_Hog1PP + Initial_for_Hog1)*Initial_for_Vos);
  v0 := k0;
  v1 := k1*HOGSignal;
  v2 := k2*Vos*HOGSignal/(Km2 + HOGSignal);
  v9 := k9*Vos;
  v10 := k10*Slt2Signal;
  v11 := k11*(Sensitizer/Membrane)^Initial_for_SW_Sensitizer*Slt2Signal/(Km11 + Slt2Signal);
  k13 := v12_k*Initial_for_Slt2Signal*Initial_for_Slt2/(Initial_for_Slt2P*(1 + v12_Ki*(Hog1PP/Vos)^v12_n)^Initial_for_SW_HI);
  k15 := Initial_for_SW_Sensitizer*((v14_k*Initial_for_Slt2P + v16_k/(1 + (Initial_for_Sensitizer/v16_Ki)^v16_n))/Initial_for_Sensitizer);
  V := Initial_for_Vb + Vos;
  VP0 := Initial_for_V*exp(-Initial_for_P0/Initial_for_eps);
  FitVrel := 100*V/Initial_for_V;
  A0 := (36*pi)^(1/3)*Initial_for_V^(2/3);
  Osmin := (Glyin/Vos + Initial_for_cin0*Initial_for_Vos/Vos)*Vos;
  Area := (36*pi)^(1/3)*V^(2/3);
  Vex := 1000*Initial_for_V0;
  FitGlyinrel := 19.64*(Glyin/Vos)*Vos/(Initial_for_Glyin*Initial_for_Vos);
  VP := Initial_for_V*(Initial_for_V/VP0)^(-Initial_for_eps/eps);
  Turgor := piecewise(Initial_for_eps*ln(V/VP), V > VP, 0);
  Turgor2Osm := Turgor/(Initial_for_R*Initial_for_T*Initial_for_c2p);
  FitSlt2Prel := 100*(Slt2P/Vos)*Vos/(maxHog1nucf*(Initial_for_Slt2 + Initial_for_Slt2P)*Initial_for_Vos);
  cen := piecewise(0, time < toff, piecewise(s1*(1 - exp(-(time - toff)/tm)), (time >= toff) && (time < ts + toff), (s1 - s2)*exp(-(time - ts - toff)/tm) + s2));
  Osmex := (ce0 + cen + Glyex/Vex - Initial_for_Glyex)*Vex;

  // Rate rules:
  Vos' = -Initial_for_Lp*Area*(Turgor + Initial_for_c2p*Initial_for_R*Initial_for_T*(Osmex/Vex - Osmin/Vos));
  HOGSignal' = v0 - v1 - v2;
  Slt2Signal' = v9 - v10 - v11;

  // Reactions:
  v6: Fps1P => Fps1; Membrane*Mod_MA(Slt2P/Vos, v6_k, Fps1P/Membrane);  // modifiers: Slt2P
  v7: => Glyin; Vos*mod_sat_CF(v7_k, Hog1PP/Vos, Km7);  // modifiers: Hog1PP
  v8: Glyin -> Glyex; transport__rev(Area, Glyex/Vex, Glyin/Vos, Fps1Open, v8_ks);
  v3: Hog1 => Hog1PP; Vos*_2p_Mod_MA_Inh_KO(v3_k, HOGSignal, Hog1/Vos, v3_Ki, Slt2P/Vos, v3_n, SW_SI);  // modifiers: Slt2P
  v4: Hog1PP => Hog1; k4*Hog1PP;
  v5: Fps1 => Fps1P; Membrane*Modified_mass_action__irrev(v5_k, Hog1PP/Vos, Fps1/Membrane);  // modifiers: Hog1PP
  v12: Slt2 => Slt2P; Vos*_2p_Mod_MA_Inh_KO(v12_k, Slt2Signal, Slt2/Vos, v12_Ki, Hog1PP/Vos, v12_n, SW_HI);  // modifiers: Hog1PP
  v13: Slt2P => Slt2; k13*Slt2P;
  v14: => Sensitizer; Membrane*Mod_CF_KO(v14_k, Slt2P/Vos, SW_Sensitizer);  // modifiers: Slt2P
  v15: Sensitizer => ; Membrane*MA_KO(k15, Sensitizer/Membrane, SW_Sensitizer);
  v16: => Sensitizer; Membrane*neg_auto_reg_KO(SW_Sensitizer, v16_k, Sensitizer/Membrane, v16_Ki, v16_n);
  v6b: Fps1P => Fps1; k6b*Fps1P;

  // Unit definitions:
  unit substance = 1e-6 mole;
end
