// SBML level 2 version 4

function Constant_flux__irreversible_0(v)
  v;
end
Constant_flux__irreversible_0 is "Constant flux (irreversible)";

function Hill_mod_CF_1(Saci1181, v1b_K, v1b_h, v1b_k1)
  v1b_k1*Saci1181^v1b_h/(v1b_K^v1b_h + Saci1181^v1b_h);
end

function mod_CF_1(saci1181, v3_k1)
  v3_k1*saci1181;
end

function _2_param_CF_1(Starvation, k)
  k*Starvation;
end

function _2_param_CF_with_Inh_1(K, Saci1181, Saci1181KO, Starvation, h, k)
  k*Starvation/(1 + Saci1181KO*K*Saci1181^h);
end

function mod_1__MA_1(arnR, k6, nFB)
  k6*nFB*arnR;
end
mod_1__MA_1 is "mod(1) MA_1";

function _2_param_mod_CF_1(Saci1181KO, arnR, v7a_k1)
  v7a_k1*Saci1181KO*arnR;
end

function Hill_mod_MA_1(ArnR, k8, nFB2, v8_K, v8_h)
  k8*ArnR*nFB2^v8_h/(v8_K^v8_h + nFB2^v8_h);
end
Hill_mod_MA_1 is "Hill-mod MA_1";

function mod_CF_2(arnR, v9_k1)
  v9_k1*arnR;
end

function _2_param_MA_1(AbfR, Starvation, k1)
  k1*Starvation*AbfR;
end

function _2_param_mod_MA_1(AbfR_P, Saci1181, Saci1181KO, v12_k1)
  v12_k1*Saci1181KO*Saci1181*AbfR_P;
end

function mod_CF_3(arnR, v7b_k1)
  v7b_k1*arnR;
end

function _2_KO_Hill_od_CF__1__1(ArnRKO, Saci1181, Saci1181KO, v13a_K, v13a_h, v13a_k1)
  v13a_k1*Saci1181KO*ArnRKO*Saci1181^v13a_h/(v13a_K^v13a_h + Saci1181^v13a_h);
end
_2_KO_Hill_od_CF__1__1 is "2 KO Hill od CF [1]_1";

function _2_param_mod_MA_2(Saci1181, Saci1181KO, flaB, v14b_k1)
  v14b_k1*Saci1181KO*Saci1181*flaB;
end

function Hill_mod_CF_2(flaB, v15_K, v15_h, v15_k1)
  v15_k1*flaB^v15_h/(v15_K^v15_h + flaB^v15_h);
end

function _2_param_mod_CF_2(ArnR, Saci1181KO, v17_k1)
  v17_k1*Saci1181KO*ArnR;
end

function _1_KO_Hill_mod_CF__1__1(AbfR_P, ArnRKO, v13b_K, v13b_h, v13b_k1)
  v13b_k1*ArnRKO*AbfR_P^v13b_h/(v13b_K^v13b_h + AbfR_P^v13b_h);
end
_1_KO_Hill_mod_CF__1__1 is "1 KO Hill mod CF [1]_1";

model MODEL1607210000()
  // Huarat2016 -Starvation-induced Ser/Thr protein kinase ArnS (Saci_1181) (Model 14)
  // This model is described in the article:
  // ArnS, a kinase involved in starvation-induced archaellum expression.
  // Haurat MF, Figueiredo AS, Hoffmann L, Li L, Herr K, J Wilson A, Beeby M, Schaber J, Albers SV.
  // Mol. Microbiol. 2016 Oct; :
  // Abstract:
  // Organisms have evolved motility organelles that allow them to move to favourable habitats. Cells integrate environmental stimuli into intracellular signals to motility machineries to direct this migration. Many motility organelles are complex surface appendages that have evolved a tight, hierarchical regulation of expression. In the crenearchaeon Sulfolobus acidocaldarius, biosynthesis of the archaellum is regulated by regulatory network proteins that control expression of archaellum components in a phosphorylation-dependent manner. A major trigger for archaellum expression is nutrient starvation, but although some components are known, the regulatory cascade triggered by starvation is poorly understood. In this work, the starvation-induced Ser/Thr protein kinase ArnS (Saci_1181) which is located proximally to the archaellum operon was identified. Deletion of arnS results in reduced motility, though the archaellum is properly assembled. Therefore, our experimental and modelling results indicate that ArnS plays an essential role in the precisely controlled expression of archaellum components during starvation-induced motility in Sulfolobus acidocaldarius. Furthermore they combined in vivo experiments and mathematical models to describe for the first time in archaea the dynamics of key regulators of archaellum expression.
  // This model is hosted on BioModels Database and identified by: MODEL1607210000.
  // To cite BioModels Database, please use: BioModels Database: An enhanced, curated and annotated resource for published quantitative kinetic models.
  // To the extent possible under law, all copyright and related or neighbouring rights to this encoded model have been dedicated to the public domain worldwide. Please refer to CC0 Public Domain Dedication for more information.
  // biomodels.db:MODEL1607210000

  // Compartments:
  compartment compartment = 1;

  // Species:
  species saci1181 in compartment = 1; saci1181 is "arnS";
  species Saci1181 in compartment = 1; Saci1181 is "ArnS";
  species arnR in compartment = 1;
  species ArnR in compartment = 1;
  species nFB in compartment = 1;
  species flaB in compartment = 1;
  species AbfR_P in compartment = 1; AbfR_P is "AbfR-P";
  species AbfR in compartment = 99;
  species FlaB in compartment = 1;
  species nFB2 in compartment = 1;

  // Parameters:
  Starvation = 0;
  k2 = (v1a_v + v1b_k1*Saci1181^v1b_h/(v1b_K^v1b_h + Saci1181^v1b_h))/saci1181;
  k4 = v3_k1*saci1181/Saci1181;
  k6 = v5a_v/arnR/nFB;
  k8 = (Saci1181KO*v7a_k1*arnR + v7b_k1*arnR)*(v8_K^v8_h + nFB2^v8_h)/(ArnR*nFB2^v8_h);
  k10 = v9_k1*ArnR/nFB;
  Saci1181KO = 1;
  k16 = v15_k1*flaB^v15_h/(v15_K^v15_h + flaB^v15_h)/FlaB;
  k18 = v17_k1*ArnR*Saci1181KO/nFB2;
  ArnRKO = 1;
  k14 = (v13a_k1*ArnRKO*Saci1181KO*Saci1181^v13a_h/(v13a_K^v13a_h + Saci1181^v13a_h) + v13b_k1*ArnRKO*AbfR_P^v13b_h/(v13b_K^v13b_h + AbfR_P^v13b_h) - v14b_k1*Saci1181KO*Saci1181*flaB)/flaB;
  k11b = v12_k1*Saci1181KO*Saci1181*AbfR_P/AbfR;
  v1a_v = 3.54354;
  v1b_k1 = 109.511;
  v1b_h = 21.8552;
  v1b_K = 7.35;
  v3_k1 = 0.479425;
  v5a_v = 0.322125;
  v7a_k1 = 0.07114316;
  v7b_k1 = 0.0007380892;
  v8_K = 1.150445;
  v8_h = 39.6031827;
  v9_k1 = 0.0190519;
  v15_k1 = 25.13335;
  v15_h = 50;
  v15_K = 129.1487;
  v17_k1 = 0.1;
  v13a_k1 = 666.162;
  v13a_h = 13.58608;
  v13a_K = 6.89542;
  v13b_k1 = 1000;
  v13b_h = 3.85354;
  v13b_K = 9.13986;
  v14b_k1 = 0.1981042;
  v12_k1 = 0.02485452;

  // Reactions:
  v1b: => saci1181; compartment*Hill_mod_CF_1(Saci1181, v1b_K, v1b_h, v1b_k1);  // modifiers: Saci1181
  v2: saci1181 => ; compartment*k2*saci1181;
  v3: => Saci1181; compartment*mod_CF_1(saci1181, v3_k1);  // modifiers: saci1181
  v4: Saci1181 => ; compartment*k4*Saci1181;
  v1c: => saci1181; compartment*_2_param_CF_1(Starvation, v1c_k);
    v1c_k = 41.8137;
  v1a: => saci1181; compartment*Constant_flux__irreversible_0(v1a_v);
  v5a: => arnR; compartment*Constant_flux__irreversible_0(v5a_v);
  v5b: => arnR; compartment*_2_param_CF_with_Inh_1(K, Saci1181, Saci1181KO, Starvation, h, v5b_k);  // modifiers: Saci1181
    K = 2.76285; h = 1; v5b_k = 743.941;
  v6: arnR => ; compartment*mod_1__MA_1(arnR, k6, nFB);  // modifiers: nFB
  v7a: => ArnR; compartment*_2_param_mod_CF_1(Saci1181KO, arnR, v7a_k1);  // modifiers: arnR
  v8: ArnR => ; compartment*Hill_mod_MA_1(ArnR, k8, nFB2, v8_K, v8_h);  // modifiers: nFB2
  v9: => nFB; compartment*mod_CF_2(arnR, v9_k1);  // modifiers: arnR
  v10: nFB => ; compartment*k10*nFB;
  v14a: flaB => ; compartment*k14*flaB;
  v11: AbfR => AbfR_P; compartment*_2_param_MA_1(AbfR, Starvation, k1);
    k1 = 0.0201938;
  v12: AbfR_P => AbfR; compartment*_2_param_mod_MA_1(AbfR_P, Saci1181, Saci1181KO, v12_k1);  // modifiers: Saci1181
  v7b: => ArnR; compartment*mod_CF_3(arnR, v7b_k1);  // modifiers: arnR
  v13a: => flaB; compartment*_2_KO_Hill_od_CF__1__1(ArnRKO, Saci1181, Saci1181KO, v13a_K, v13a_h, v13a_k1);  // modifiers: Saci1181
  v14b: flaB => ; compartment*_2_param_mod_MA_2(Saci1181, Saci1181KO, flaB, v14b_k1);  // modifiers: Saci1181
  v15: => FlaB; compartment*Hill_mod_CF_2(flaB, v15_K, v15_h, v15_k1);  // modifiers: flaB
  v16: FlaB => ; compartment*k16*FlaB;
  v17: => nFB2; compartment*_2_param_mod_CF_2(ArnR, Saci1181KO, v17_k1);  // modifiers: ArnR
  v18: nFB2 => ; compartment*k18*nFB2;
  v13b: => flaB; compartment*_1_KO_Hill_mod_CF__1__1(AbfR_P, ArnRKO, v13b_K, v13b_h, v13b_k1);  // modifiers: AbfR_P
  v11b: AbfR => AbfR_P; compartment*k11b*AbfR;

  // Unit definitions:
  unit volume = 1e-3 litre;
  unit substance = 1e-3 mole;
end
