// SBML level 2 version 4

function Constant_flux__irreversible(v)
  v;
end
Constant_flux__irreversible is "Constant flux (irreversible)";

model MODEL1608100000()
  // Aguilera2017 - Model for gene constitutive expression circuit
  // Model destription:
  // The model describes the stochastic dynamics of two variables, protein and mRNA of a gene with constitutive expression.
  // Publication:
  // A New Efficient Approach to Fit Stochastic Models on the Basis of High-throughput Experimental Data Using a Model of IRF7 Gene Expression as Case Study
  // Authors
  // Luis U. Aguilera, Christoph Zimmer and Ursula Kummer.
  // biomodels.db:MODEL1608100000

  // Compartments:
  compartment compartment = 1;

  // Species:
  species mRNA in compartment = 10;
  species Protein in compartment = 100;

  // Reactions:
  R1: => mRNA; compartment*Constant_flux__irreversible(v);
    v = 5;
  R2: mRNA => ; compartment*R2_k1*mRNA;
    R2_k1 = 0.03;
  R3: mRNA => Protein + mRNA; compartment*R3_k1*mRNA;
    R3_k1 = 0.1;
  R4: Protein => ; compartment*R4_k1*Protein;
    R4_k1 = 0.03;

  // Unit definitions:
  unit volume = dimensionless;
  unit time = 60 second;
  unit substance = item;
end
