// SBML level 2 version 4

function Hill_Cooperativity(substrate, Shalve, V, h)
  V*substrate^h/(Shalve^h + substrate^h);
end

function Prom_Inac(ki, Pa)
  ki*(1 - Pa);
end

// enzymatic rate law for irreversible non-modulated non-interacting bireactant enzymes
function BI_Modified(vmax, A, B, ka, kb, Pa)
  vmax*A*B/(ka*kb + ka*A + kb*B + A*B)*(1 - Pa);
end

model MODEL1608100001()
  // Aguilera2017 - Model for IRF7 circuit
  // Model destription:
  // The model describes the dynamics of murine IRF7 gene expression upon IFN stimulation. The present model comprises known key components and feedback mechanisms. The overall system describes the active IRF7 promoter (Pa) by the binding of IRF7 dimer and ISGF3 to the DNA binding sites ISRE and IRFE, respectively, the transcription and translation of IRF7, and its subsequent phosphorylation and dimerization. IRF7 protein binding to the IRFE binding site in the promoter results in the production of more IRF7 protein, constituting a positive feedback loop.
  // Publication:
  // A New Efficient Approach to Fit Stochastic Models on the Basis of High-throughput Experimental Data Using a Model of IRF7 Gene Expression as Case Study
  // Authors
  // Luis U. Aguilera, Christoph Zimmer and Ursula Kummer.
  // biomodels.db:MODEL1608100001

  // Compartments:
  compartment compartment = 1;

  // Species:
  species Pa in compartment = 0;
  species ISGF3 in compartment = 1;
  species IRF7 in compartment = 1;
  species IRF7phosp in compartment = 0;
  species IRF7dimer in compartment = 0;
  species mRNA in compartment = 1;
  species IFN in compartment = 1;

  // Assignment rules:
  Ptotal := IRF7dimer*compartment + IRF7phosp*compartment + IRF7*compartment;

  // Reactions:
  R2: Pa => ; compartment*R2_k1*Pa;
    R2_k1 = 0.0013;
  R3: Pa => mRNA + Pa; compartment*R3_k1*Pa;
    R3_k1 = 1.1439;
  R4: => mRNA; compartment*Prom_Inac(ki, Pa);  // modifiers: Pa
    ki = 0.0861;
  R5: mRNA => ; compartment*R5_k1*mRNA;
    R5_k1 = 0.0715;
  R6: mRNA => IRF7 + mRNA; compartment*R6_k1*mRNA;
    R6_k1 = 43.8669;
  R1: => Pa; compartment*BI_Modified(vmax, ISGF3, IRF7dimer, ka, kb, Pa);  // modifiers: ISGF3, IRF7dimer
    vmax = 522.5942; ka = 2.26870189e4; kb = 3.52819901e4;
  R7: IFN => 2 IFN; compartment*Hill_Cooperativity(IFN, Shalve, V, h);
    Shalve = 0.0055; V = 6.1349; h = 2;
  R8: IFN => ; compartment*R8_k1*IFN;
    R8_k1 = 0.0492;
  R9: IFN => ISGF3 + IFN; compartment*R9_k1*IFN;
    R9_k1 = 0.0003;
  R10: ISGF3 => ; compartment*R10_k1*ISGF3;
    R10_k1 = 0.0017;
  R11: IRF7 => IRF7phosp; compartment*R11_k1*IRF7;
    R11_k1 = 3.8773;
  R12: 2 IRF7phosp => IRF7dimer; compartment*R12_k1*IRF7phosp^2;
    R12_k1 = 0.6022;
  R13: IRF7dimer => ; compartment*R13_k1*IRF7dimer;
    R13_k1 = 0.4388;

  // Unit definitions:
  unit volume = dimensionless;
  unit time = 60 second;
  unit substance = item;
end
