// SBML level 2 version 4

model MODEL1609100001()
  // Giantsos-Adams2013 - Growth of glycocalyx under static conditions
  // This model is described in the article:
  // Heparan Sulfate Regrowth Profiles Under Laminar Shear Flow Following Enzymatic Degradation.
  // Giantsos-Adams KM, Koo AJ, Song S, Sakai J, Sankaran J, Shin JH, Garcia-Cardena G, Dewey CF.
  // Cell Mol Bioeng 2013 Jun; 6(2): 160-174
  // Abstract:
  // The local hemodynamic shear stress waveforms present in an artery dictate the endothelial cell phenotype. The observed decrease of the apical glycocalyx layer on the endothelium in atheroprone regions of the circulation suggests that the glycocalyx may have a central role in determining atherosclerotic plaque formation. However, the kinetics for the cells' ability to adapt its glycocalyx to the environment have not been quantitatively resolved. Here we report that the heparan sulfate component of the glycocalyx of HUVECs increases by 1.4-fold following the onset of high shear stress, compared to static cultured cells, with a time constant of 19 h. Cell morphology experiments show that 12 h are required for the cells to elongate, but only after 36 h have the cells reached maximal alignment to the flow vector. Our findings demonstrate that following enzymatic degradation, heparan sulfate is restored to the cell surface within 12 h under flow whereas the time required is 20 h under static conditions. We also propose a model describing the contribution of endocytosis and exocytosis to apical heparan sulfate expression. The change in HS regrowth kinetics from static to high-shear EC phenotype implies a differential in the rate of endocytic and exocytic membrane turnover.
  // This model is hosted on BioModels Database and identified by: MODEL1609100001.
  // To cite BioModels Database, please use: BioModels Database: An enhanced, curated and annotated resource for published quantitative kinetic models.
  // To the extent possible under law, all copyright and related or neighbouring rights to this encoded model have been dedicated to the public domain worldwide. Please refer to CC0 Public Domain Dedication for more information.
  // biomodels.db:MODEL1609100001

  // Compartments:
  compartment default = 1 volume;

  // Species:
  substanceOnly species HS_surface in default = 0.1;
  substanceOnly species early_endosome in default = 0.4;
  species late_endosome in default = 0.4/default;
  species s5 in default = 0;
  substanceOnly species $golgi in default = 0.05;
  species s8 in default = 0;
  species lysosome in default = 1.23/default;

  // Reactions:
  k_golgi: $golgi => HS_surface; golgi*k3; k_golgi is "k3";
    k3 = 0.96 substance;
  k_endo: HS_surface => early_endosome; HS_surface*k1; k_endo is "k1";
    k1 = 0.05 substance;
  k_exo: early_endosome => HS_surface; early_endosome*k2; k_exo is "k2";
    k2 = 0.05 substance;
  k_le: early_endosome => late_endosome; early_endosome*k6; k_le is "k6";
    k6 = 0.01 substance;
  k_lys: late_endosome => lysosome; late_endosome*k7; k_lys is "k7";
    k7 = 0.01 substance;
  k_deg: lysosome => s5; lysosome*k8; k_deg is "k8";
    k8 = 0.005 substance;
  k_shed: HS_surface => s8; HS_surface*k4; k_shed is "k4";
    k4 = 0.033 substance;

  // Unit definitions:
  unit substance = mole;
  unit volume = litre;
  unit area = metre^2;
  unit length = metre;
  unit time = second;
end
