// SBML level 3 version 1
// dcterms:bibliographicCitation: urn:miriam:doi:10.1371/journal.pone.0151086

function rm1(p, substrate, promoter)
  3*p*substrate*promoter;
end
rm1 is "rm1>";

function rm3(p, eps, substrate, promoter)
  p*eps*eps*substrate*promoter;
end
rm3 is "rm3>";

function _rm3(q, promoter)
  3*q*promoter;
end
_rm3 is "<rm3";

function _rm1(q, promoter)
  q*promoter;
end
_rm1 is "<rm1";

function _rm2(q, promoter)
  2*q*promoter;
end
_rm2 is "<rm2";

function rm2(p, eps, substrate, promoter)
  2*p*eps*substrate*promoter;
end
rm2 is "rm2>";

model MODEL1611030000()
  // Guisoni2016 - Cis-regulatory system (CRS) can drive sustained oscillations
  // This model is described in the article:
  // Promoters Architecture-Based Mechanism for Noise-Induced Oscillations in a Single-Gene Circuit.
  // Guisoni N, Monteoliva D, Diambra L.
  // PLoS ONE 2016; 11(3): e0151086
  // Abstract:
  // It is well known that single-gene circuits with negative feedback loop can lead to oscillatory gene expression when they operate with time delay. In order to generate these oscillations many processes can contribute to properly timing such delay. Here we show that the time delay coming from the transitions between internal states of the cis-regulatory system (CRS) can drive sustained oscillations in an auto-repressive single-gene circuit operating in a small volume like a cell. We found that the cooperative binding of repressor molecules is not mandatory for a oscillatory behavior if there are enough binding sites in the CRS. These oscillations depend on an adequate balance between the CRS kinetic, and the synthesis/degradation rates of repressor molecules. This finding suggest that the multi-site CRS architecture can play a key role for oscillatory behavior of gene expression. Finally, our results can also help to synthetic biologists on the design of the promoters architecture for new genetic oscillatory circuits.
  // This model is hosted on BioModels Database and identified by: MODEL1611030000.
  // To cite BioModels Database, please use: BioModels Database: An enhanced, curated and annotated resource for published quantitative kinetic models.
  // To the extent possible under law, all copyright and related or neighbouring rights to this encoded model have been dedicated to the public domain worldwide. Please refer to CC0 Public Domain Dedication for more information.
  // biomodels.db:MODEL1611030000
  // isDescribedBy doi:10.1371/journal.pone.0151086
  // model units - substance: substance, time: time, volume: volume, area: area, length: length, extent: substance

  // Compartments:
  compartment c1 = 1 volume;

  // Species:
  species r0 in c1 = 0;
  species r1 in c1 = 0;
  species r2 in c1 = 0;
  species r3 in c1 = 1;
  species ft in c1 = 10;

  // Parameters:
  eps = 9;
  p = 0.001;
  q = 0.75;
  alfa = 45;

  // Reactions:
  bind1: r0 + ft => r1; c1*rm1(p, ft, r0);
  bind2: r1 + ft => r2; c1*rm2(p, eps, ft, r1);
  bind3: r2 + ft => r3; c1*rm3(p, eps, ft, r2);
  ub1: r1 => ft + r0; c1*_rm1(q, r1);
  ub2: r2 => ft + r1; c1*_rm2(q, r2);
  ub3: r3 => ft + r2; c1*_rm3(q, r3);
  prod: r0 => r0 + ft; c1*alfa*r0;
  deg: ft => ; c1*k1*ft;
    k1 = 0.3;

  // Unit definitions:
  unit length = metre;
  unit area = metre^2;
  unit volume = 1e-3 litre;
  unit time = second;
  unit substance = item;
end
