// SBML level 2 version 4

function _1_Substrate__3_Activators(Vf, K1, K2, K3, S, A1, exp1, A2, A3, Vr, P)
  Vf*S*(A1^exp1/(A1^exp1 + K1^exp1) + A2^exp1/(A2^exp1 + K2^exp1) + A3^exp1/(A3^exp1 + K3^exp1)) - Vr*P;
end
_1_Substrate__3_Activators is "1 Substrate, 3 Activators";

function Activated_ion_transport(K1, A1, S, K2, P)
  K1*A1*S - K2*P;
end

function _1_Substrate__1_Activator(Vf, S, A1, exp1, K)
  Vf*S*(1 + A1^exp1/(A1^exp1 + K^exp1));
end
_1_Substrate__1_Activator is "1 Substrate, 1 Activator";

function _1_Substrate__2_Activators(Vf, S, A1, exp1, K1, A2, K2, Vr, P)
  Vf*S*(A1^exp1/(A1^exp1 + K1^exp1) + A2^exp1/(A2^exp1 + K2^exp1)) - Vr*P;
end
_1_Substrate__2_Activators is "1 Substrate, 2 Activators";

function _1_Substrate__1_Inhibitor__2_Activators(Vf, S, K, exp1, I1, A1, K1, A2, K2, Vr, P)
  Vf*S*(K^exp1/(I1^exp1 + K^exp1))*(A1^exp1/(A1^exp1 + K1^exp1) + A2^exp1/(A2^exp1 + K2^exp1)) - Vr*P;
end
_1_Substrate__1_Inhibitor__2_Activators is "1 Substrate, 1 Inhibitor, 2 Activators";

function Rate_Law_for_IL10_production_1(Vf, S, K, exp1, I1, A1, K1, A2, K2, A3, K3)
  Vf*S*(K^exp1/(I1^exp1 + K^exp1))*(A1^exp1/(A1^exp1 + K1^exp1) + A2^exp1/(A2^exp1 + K2^exp1) + A3^exp1/(A3^exp1 + K3^exp1));
end

function Rate_Law_for_IL1B_production(Vf, S, K, exp1, I1, K3, I2, A1, K1, A2, K2)
  Vf*S*(K^exp1/(I1^exp1 + K^exp1) + K3^exp1/(I2^exp1 + K3^exp1))*(A1^exp1/(A1^exp1 + K1^exp1) + A2^exp1/(A2^exp1 + K2^exp1));
end

function Rate_Law_for_Mreg_differentiation(K, M1, exp1, M2, exp2, M3, exp3, K1, K2, P)
  K*M1^exp1*M2^exp2*M3^exp3/(M1 + M2 + M3 + K1) - K2*P;
end

function _1_Substrate__1_Activator__revmod(Vf, S, A1, exp1, K1, Vr, P)
  Vf*S*(A1^exp1/(A1^exp1 + K1^exp1)) - Vr*P;
end
_1_Substrate__1_Activator__revmod is "1 Substrate, 1 Activator (revmod)";

function _1_S__1_A__mod(Vf, S, B, A1, exp1, K)
  Vf*S*(B + A1^exp1/(A1^exp1 + K^exp1));
end
_1_S__1_A__mod is "1 S, 1 A (mod)";

function _1_S__1A__revmod(Vf, S, B, A1, exp1, K1, Vr, P)
  Vf*S*(B + A1^exp1/(A1^exp1 + K1^exp1)) - Vr*P;
end
_1_S__1A__revmod is "1 S, 1A (revmod)";

function _1_S__1_A__1_I__mod(Vf, S, K, exp1, I1, B, A1, K1, Vr, P)
  Vf*S*(K^exp1/(I1^exp1 + K^exp1))*(B + A1^exp1/(A1^exp1 + K1^exp1)) - Vr*P;
end
_1_S__1_A__1_I__mod is "1 S, 1 A, 1 I (mod)";

function _1_S__2_A__mod2(Vf, A1, exp1, K1, A2, K2, Vr, P)
  Vf*(A1^exp1/(A1^exp1 + K1^exp1) + A2^exp1/(A2^exp1 + K2^exp1)) - Vr*P;
end
_1_S__2_A__mod2 is "1 S, 2 A (mod2)";

function Rate_Law_for_IL10R_activation(Vf, K, exp1, I1, B, A1, K1, Vr, P)
  Vf*(K^exp1/(I1^exp1 + K^exp1))*(B + A1^exp1/(A1^exp1 + K1^exp1)) - Vr*P;
end

model MODEL1611160001()
  // Leber2016 - Regulatory macrophage differentiation - H.pylori infection
  // The model is the second model of the publication "Modeling the role of lanthionine synthetase C-like 2 (LANCL2) in the modulation of immune responses to Helicobacter pylori infection" published in PlosOne by Leber, Bassaganya-Riera, Tubau-Juni, Zoccoli-Rodriguez, Viladomiu, Abedi, Lu, and Hontecillas.
  // Abstract:
  // Immune responses to Helicobacter pylori are orchestrated through complex balances of host-bacterial interactions, including inflammatory and regulatory immune responses across scales that can lead to the development of the gastric disease or the promotion of beneficial systemic effects. While inflammation in response to the bacterium has been reasonably characterized, the regulatory pathways that contribute to preventing inflammatory events during H. pylori infection are incompletely understood. To aid in this effort, we have generated a computational model incorporating recent developments in the understanding of H. pylori-host interactions. Sensitivity analysis of this model reveals that a regulatory macrophage population is critical in maintaining high H. pylori colonization without the generation of an inflammatory response. To address how this myeloid cell subset arises, we developed a second model describing an intracellular signaling network for the differentiation of macrophages. Modeling studies predicted that LANCL2 is a central regulator of inflammatory and effector pathways and its activation promotes regulatory responses characterized by IL-10 production while suppressing effector responses. The predicted impairment of regulatory macrophage differentiation by the loss of LANCL2 was simulated based on multiscale linkages between the tissue-level gastric mucosa and the intracellular models. The simulated deletion of LANCL2 resulted in a greater clearance of H. pylori, but also greater IFNγ responses and damage to the epithelium. The model predictions were validated within a mouse model of H. pylori colonization in wild-type (WT), LANCL2 whole body KO and myeloid-specific LANCL2-/- (LANCL2Myeloid) mice, which displayed similar decreases in H. pylori burden, CX3CR1+ IL-10-producing macrophages, and type 1 regulatory (Tr1) T cells. This study shows the importance of LANCL2 in the induction of regulatory responses in macrophages and T cells during H. pylori infection.
  // biomodels.db:MODEL1611160001

  // Compartments:
  compartment default = 1;

  // Species:
  species CX3CR1 in default = 0;
  species DAP12 in default = 0;
  species ERK in default = 0;
  species Ca2 in default = 0; Ca2 is "Ca2+";
  species $AC in default = 1;
  species cAMP in default = 0;
  species PKA in default = 0;
  species CREB in default = 0;
  species IL10 in default = 0;
  species IL10R in default = 0;
  species Akt in default = 0;
  species M_CSF in default = 0; M_CSF is "M-CSF";
  species CSF1R in default = 0;
  species $SIRPb1 in default = 1;
  species NFAT in default = 0;
  species LANCL2 in default = 0;
  species Mreg in default = 0;
  species HP in default = 25;
  species Traf2 in default = 0;
  species Fbxo7 in default = 0;
  species NCOR2 in default = 0;
  species FOXP1 in default = 0;
  species NFkB in default = 0;
  species $ABA in default = 1;
  species pAkt in default = 1;
  species eCa2 in default = 1; eCa2 is "eCa2+";
  species iCa2 in default = 0.5; iCa2 is "iCa2+";
  species pCREB in default = 1;
  species pCX3CR1 in default = 1;
  species pERK in default = 1;
  species pFbxo7 in default = 1;
  species pFOXP1 in default = 1;
  species $pIL10 in default = 1;
  species pLANCL2 in default = 1;
  species $pM_CSF in default = 1; pM_CSF is "pM-CSF";
  species pNCOR2 in default = 1;
  species pNFAT in default = 1;
  species pNFkB in default = 1;
  species pPKA in default = 1;
  species pTraf2 in default = 1;
  species pIL10R in default = 1;
  species pCSF1R in default = 1;
  species Mono in default = 1;
  species KLF4 in default = 0;
  species pKLF4 in default = 1;
  species CX3CL1 in default = 0;
  species $pCX3CL1 in default = 1;
  species IFNg in default = 0;
  species $pIFNg in default = 1;

  // Reactions:
  ERK_activation: pERK -> ERK; default*_1_Substrate__2_Activators(ERK_activation_Vf, pERK, CX3CR1, ERK_activation_exp1, ERK_activation_K1, DAP12, ERK_activation_K2, ERK_activation_Vr, ERK);  // modifiers: CX3CR1, DAP12
    ERK_activation_Vf = 0.0487012; ERK_activation_exp1 = 1; ERK_activation_K1 = 0.1043; ERK_activation_K2 = 0.0851; ERK_activation_Vr = 0.1607;
  Ca2_transport: eCa2 -> iCa2; default*Activated_ion_transport(Ca2_transport_K1, ERK, eCa2, Ca2_transport_K2, iCa2); Ca2_transport is "Ca2+ transport";  // modifiers: ERK
    Ca2_transport_K1 = 0.3076; Ca2_transport_K2 = 0.1292;
  cAMP_production: $AC => cAMP; default*_1_Substrate__1_Activator(cAMP_production_Vf, AC, LANCL2, cAMP_production_exp1, cAMP_production_K);  // modifiers: LANCL2
    cAMP_production_Vf = 0.029; cAMP_production_exp1 = 1; cAMP_production_K = 0.185;
  PKA_activation: pPKA -> PKA; default*_1_S__1A__revmod(PKA_activation_Vf, pPKA, PKA_activation_B, cAMP, PKA_activation_exp1, PKA_activation_K1, PKA_activation_Vr, PKA);  // modifiers: cAMP
    PKA_activation_Vf = 0.1199; PKA_activation_B = 0.1; PKA_activation_exp1 = 1; PKA_activation_K1 = 0.0515; PKA_activation_Vr = 0.18635;
  CREB_activation: pCREB -> CREB; default*_1_Substrate__2_Activators(CREB_activation_Vf, pCREB, PKA, CREB_activation_exp1, CREB_activation_K1, iCa2, CREB_activation_K2, CREB_activation_Vr, CREB);  // modifiers: PKA, iCa2
    CREB_activation_Vf = 0.1493; CREB_activation_exp1 = 2; CREB_activation_K1 = 0.0635; CREB_activation_K2 = 0.0728; CREB_activation_Vr = 0.19685;
  IL10_production: $pIL10 => IL10; default*Rate_Law_for_IL10_production_1(IL10_production_Vf, pIL10, IL10_production_K, IL10_production_exp1, IFNg, CREB, IL10_production_K1, FOXP1, IL10_production_K2, Mreg, IL10_production_K3);  // modifiers: IFNg, CREB, FOXP1, Mreg
    IL10_production_Vf = 1.6680788; IL10_production_K = 0.0536; IL10_production_exp1 = 1; IL10_production_K1 = 0.0593; IL10_production_K2 = 0.09815; IL10_production_K3 = 0.01589;
  IL10R_activation: pIL10R -> IL10R; default*Rate_Law_for_IL10R_activation(IL10R_activation_Vf, IL10R_activation_K, IL10R_activation_exp1, IFNg, IL10R_activation_B, IL10, IL10R_activation_K1, IL10R_activation_Vr, IL10R);  // modifiers: IFNg, IL10
    IL10R_activation_Vf = 0.169468775; IL10R_activation_K = 40; IL10R_activation_exp1 = 1; IL10R_activation_B = 0; IL10R_activation_K1 = 0.463615; IL10R_activation_Vr = 0.188;
  NFAT_activation: pNFAT -> NFAT; default*_1_S__1_A__1_I__mod(NFAT_activation_Vf, pNFAT, NFAT_activation_K, NFAT_activation_exp1, Akt, NFAT_activation_B, DAP12, NFAT_activation_K1, NFAT_activation_Vr, NFAT);  // modifiers: Akt, DAP12
    NFAT_activation_Vf = 0.11105; NFAT_activation_K = 0.1307; NFAT_activation_exp1 = 2; NFAT_activation_B = 0.1; NFAT_activation_K1 = 0.1586; NFAT_activation_Vr = 0.18755;
  CSF1R_activation: pCSF1R -> CSF1R; default*_1_Substrate__2_Activators(CSF1R_activation_Vf, pCSF1R, FOXP1, CSF1R_activation_exp1, CSF1R_activation_K1, M_CSF, CSF1R_activation_K2, CSF1R_activation_Vr, CSF1R);  // modifiers: FOXP1, M_CSF
    CSF1R_activation_Vf = 0.185; CSF1R_activation_exp1 = 2; CSF1R_activation_K1 = 0.36647; CSF1R_activation_K2 = 0.0551; CSF1R_activation_Vr = 0.2;
  CX3CR1_activation: pCX3CR1 -> CX3CR1; default*_1_S__2_A__mod2(CX3CR1_activation_Vf, NFAT, CX3CR1_activation_exp1, CX3CR1_activation_K1, CX3CL1, CX3CR1_activation_K2, CX3CR1_activation_Vr, CX3CR1);  // modifiers: NFAT, CX3CL1
    CX3CR1_activation_Vf = 0.13385; CX3CR1_activation_exp1 = 2; CX3CR1_activation_K1 = 0.19115; CX3CR1_activation_K2 = 0.05; CX3CR1_activation_Vr = 0.1715;
  DAP12_activation: $SIRPb1 => DAP12; default*DAP12_activation_k1*SIRPb1;
    DAP12_activation_k1 = 0.03843595;
  Akt_activation: pAkt -> Akt; default*_1_Substrate__3_Activators(Akt_activation_Vf, Akt_activation_K1, Akt_activation_K2, Akt_activation_K3, pAkt, LANCL2, Akt_activation_exp1, CX3CR1, DAP12, Akt_activation_Vr, Akt);  // modifiers: LANCL2, CX3CR1, DAP12
    Akt_activation_Vf = 0.1115; Akt_activation_K1 = 0.01779; Akt_activation_K2 = 0.11105; Akt_activation_K3 = 0.1328; Akt_activation_exp1 = 1; Akt_activation_Vr = 0.1922;
  LANCL2_activation: pLANCL2 -> LANCL2; default*_1_S__1A__revmod(LANCL2_activation_Vf, pLANCL2, LANCL2_activation_B, ABA, LANCL2_activation_exp1, LANCL2_activation_K1, LANCL2_activation_Vr, LANCL2);  // modifiers: ABA
    LANCL2_activation_Vf = 0.1328; LANCL2_activation_B = 0.1; LANCL2_activation_exp1 = 2; LANCL2_activation_K1 = 0.06395; LANCL2_activation_Vr = 0.1835;
  M_CSF_production: $pM_CSF => M_CSF; default*_1_S__1_A__mod(M_CSF_production_Vf, pM_CSF, M_CSF_production_B, NFAT, M_CSF_production_exp1, M_CSF_production_K); M_CSF_production is "M-CSF production";  // modifiers: NFAT
    M_CSF_production_Vf = 0.03888; M_CSF_production_B = 0.1; M_CSF_production_exp1 = 1; M_CSF_production_K = 0.13325;
  IFNg_production: $pIFNg => IFNg; default*Rate_Law_for_IL1B_production(IFNg_production_Vf, pIFNg, IFNg_production_K, IFNg_production_exp1, IL10R, IFNg_production_K3, Mreg, NFkB, IFNg_production_K1, NFAT, IFNg_production_K2);  // modifiers: IL10R, Mreg, NFkB, NFAT
    IFNg_production_Vf = 0.4675751; IFNg_production_K = 0.06035; IFNg_production_exp1 = 1; IFNg_production_K3 = 0.0692; IFNg_production_K1 = 0.06755; IFNg_production_K2 = 0.0785;
  Mreg_differentiation: Mono => Mreg; default*Rate_Law_for_Mreg_differentiation(Mreg_differentiation_K, CX3CR1, Mreg_differentiation_exp1, IL10R, exp2, CSF1R, exp3, Mreg_differentiation_K1, Mreg_differentiation_K2, Mreg);  // modifiers: CX3CR1, IL10R, CSF1R
    Mreg_differentiation_K = 1.89275; Mreg_differentiation_exp1 = 1; exp2 = 3; exp3 = 1; Mreg_differentiation_K1 = 0.08075; Mreg_differentiation_K2 = 0.1589;
  Fbxo7_activation: pFbxo7 -> Fbxo7; default*_1_S__1A__revmod(Fbxo7_activation_Vf, pFbxo7, Fbxo7_activation_B, LANCL2, Fbxo7_activation_exp1, Fbxo7_activation_K1, Fbxo7_activation_Vr, Fbxo7);  // modifiers: LANCL2
    Fbxo7_activation_Vf = 0.1235; Fbxo7_activation_B = 0.1; Fbxo7_activation_exp1 = 1; Fbxo7_activation_K1 = 0.1536; Fbxo7_activation_Vr = 0.19115;
  Traf2_activation: pTraf2 -> Traf2; default*_1_Substrate__1_Inhibitor__2_Activators(Traf2_activation_Vf, pTraf2, Traf2_activation_K, Traf2_activation_exp1, Fbxo7, IFNg, Traf2_activation_K1, HP, Traf2_activation_K2, Traf2_activation_Vr, Traf2);  // modifiers: Fbxo7, IFNg, HP
    Traf2_activation_Vf = 0.984948625; Traf2_activation_K = 0.09545; Traf2_activation_exp1 = 2; Traf2_activation_K1 = 0.06815; Traf2_activation_K2 = 0.01646; Traf2_activation_Vr = 0.262;
  NCOR2_activation: pNCOR2 -> NCOR2; default*_1_S__1A__revmod(NCOR2_activation_Vf, pNCOR2, NCOR2_activation_B, LANCL2, NCOR2_activation_exp1, NCOR2_activation_K1, NCOR2_activation_Vr, NCOR2);  // modifiers: LANCL2
    NCOR2_activation_Vf = 0.124465; NCOR2_activation_B = 0.1; NCOR2_activation_exp1 = 2; NCOR2_activation_K1 = 0.05315; NCOR2_activation_Vr = 0.59075;
  FOXP1_activation: pFOXP1 -> FOXP1; default*_1_Substrate__1_Activator__revmod(FOXP1_activation_Vf, pFOXP1, NCOR2, FOXP1_activation_exp1, FOXP1_activation_K1, FOXP1_activation_Vr, FOXP1);  // modifiers: NCOR2
    FOXP1_activation_Vf = 0.10955; FOXP1_activation_exp1 = 1; FOXP1_activation_K1 = 0.0836; FOXP1_activation_Vr = 0.31685;
  NFkB_activation: pNFkB -> NFkB; default*_1_S__1_A__1_I__mod(NFkB_activation_Vf, pNFkB, NFkB_activation_K, NFkB_activation_exp1, NCOR2, NFkB_activation_B, Traf2, NFkB_activation_K1, NFkB_activation_Vr, NFkB);  // modifiers: NCOR2, Traf2
    NFkB_activation_Vf = 0.13978945; NFkB_activation_K = 0.316436725; NFkB_activation_exp1 = 2; NFkB_activation_B = 0.1; NFkB_activation_K1 = 0.015346; NFkB_activation_Vr = 0.4815115;
  cAMP_degradation: cAMP => ; default*cAMP_degradation_k1*cAMP;
    cAMP_degradation_k1 = 0.1;
  DAP12_degradation: DAP12 => ; default*DAP12_degradation_k1*DAP12;
    DAP12_degradation_k1 = 0.1;
  IL10_degradation: IL10 => ; default*IL10_degradation_k1*IL10;
    IL10_degradation_k1 = 0.1;
  IFNg_degradation: IFNg => ; default*IFNg_degradation_k1*IFNg;
    IFNg_degradation_k1 = 0.1;
  M_CSF_degradation: M_CSF => ; default*M_CSF_degradation_k1*M_CSF; M_CSF_degradation is "M-CSF degradation";
    M_CSF_degradation_k1 = 0.1;
  KLF4_activation: pKLF4 -> KLF4; default*_1_S__1A__revmod(KLF4_activation_Vf, pKLF4, KLF4_activation_B, PKA, KLF4_activation_exp1, KLF4_activation_K1, KLF4_activation_Vr, KLF4);  // modifiers: PKA
    KLF4_activation_Vf = 0.1; KLF4_activation_B = 0.1; KLF4_activation_exp1 = 1; KLF4_activation_K1 = 0.0743; KLF4_activation_Vr = 0.114;
  CX3CL1_activation: $pCX3CL1 => CX3CL1; default*_1_S__1_A__mod(CX3CL1_activation_Vf, pCX3CL1, CX3CL1_activation_B, KLF4, CX3CL1_activation_exp1, CX3CL1_activation_K);  // modifiers: KLF4
    CX3CL1_activation_Vf = 0.126; CX3CL1_activation_B = 0.1; CX3CL1_activation_exp1 = 1; CX3CL1_activation_K = 0.0678;
  CX3CL1_degradation: CX3CL1 => ; default*CX3CL1_degradation_k1*CX3CL1;
    CX3CL1_degradation_k1 = 0.1;
end
