// SBML level 2 version 4

model MODEL1704110000()
  // Proctor2017 - Identifying microRNA for muscle regeneration during ageing (Mir1_in_muscle)
  // This model is described in the article:
  // Using computer simulation models to investigate the most promising microRNAs to improve muscle regeneration during ageing
  // Carole J. Proctor & Katarzyna Goljanek-Whysall
  // Nature Scientific Reports
  // Abstract:
  // MicroRNAs (miRNAs) regulate gene expression through interactions with target sites within mRNAs, leading to enhanced degradation of the mRNA or inhibition of translation. Skeletal muscle expresses many different miRNAs with important roles in adulthood myogenesis (regeneration) and myofibre hypertrophy and atrophy, processes associated with muscle ageing. However, the large number of miRNAs and their targets mean that a complex network of pathways exists, making it difficult to predict the effect of selected miRNAs on age-related muscle wasting. Computational modelling has the potential to aid this process as it is possible to combine models of individual miRNA:target interactions to form an integrated network. As yet, no models of these interactions in muscle exist. We created the first model of miRNA:target interactions in myogenesis based on experimental evidence of individual miRNAs which were next validated and used to make testable predictions. Our model confirms that miRNAs regulate key interactions during myogenesis and can act by promoting the switch between quiescent/proliferating/differentiating myoblasts and by maintaining the differentiation process. We propose that a threshold level of miR-1 acts in the initial switch to differentiation, with miR-181 keeping the switch on and miR-378 maintaining the differentiation and miR-143 inhibiting myogenesis.
  // This model is hosted on BioModels Database and identified by: MODEL1704110000.
  // To cite BioModels Database, please use: Chelliah V et al. BioModels: ten-year anniversary. Nucl. Acids Res. 2015, 43(Database issue):D542-8.
  // To the extent possible under law, all copyright and related or neighbouring rights to this encoded model have been dedicated to the public domain worldwide. Please refer to CC0 Public Domain Dedication for more information.
  // biomodels.db:MODEL1704110000

  // Compartments:
  compartment cell = 1;

  // Species:
  substanceOnly species miR1 in cell = 20;
  substanceOnly species miR1_Pax3_mRNA in cell = 0;
  substanceOnly species miR1_gene in cell = 2;
  substanceOnly species miR1_gene_MyoD in cell = 0;
  substanceOnly species MyoD in cell = 100;
  substanceOnly species MyoD_gene in cell = 2;
  substanceOnly species MyoD_gene_Pax3 in cell = 0;
  substanceOnly species Pax3 in cell = 10;
  substanceOnly species Pax3_mRNA in cell = 10;
  substanceOnly species $Sink in cell = 0;
  substanceOnly species $Source in cell = 1;

  // Parameters:
  kbinmiR1geneMyoD = 1e-5;
  kbinmiR1Pax3 = 1e-5;
  kbinMyoDgenePax3 = 1e-5;
  kdegmiR1 = 1.6e-6;
  kdegMyoD = 0.00026;
  kdegPax3 = 2e-5;
  kdegPax3mRNA = 0.0002;
  kdegPax3mRNAmiR1 = 0.0004;
  krelmiR1geneMyoD = 0.001;
  krelmiR1Pax3 = 0.001;
  krelMyoDgenePax3 = 0.0005;
  ksynmiR1 = 1e-8;
  ksynmiR1MyoD = 0.0005;
  ksynMyoD = 0.1;
  ksynPax3 = 3e-5;
  ksynPax3miR1 = 5e-7;
  ksynPax3mRNA = 0.002;

  // Reactions:
  miR1_gene_MyoD_binding: miR1_gene + MyoD => miR1_gene_MyoD; kbinmiR1geneMyoD*miR1_gene*MyoD;
  miR1_gene_MyoD_release: miR1_gene_MyoD => miR1_gene + MyoD; krelmiR1geneMyoD*miR1_gene_MyoD;
  miR1_synthesis_by_MyoD: miR1_gene_MyoD => miR1_gene_MyoD + miR1; ksynmiR1MyoD*miR1_gene_MyoD;
  miR1_synthesis: miR1_gene => miR1_gene + miR1; ksynmiR1*miR1_gene;
  miR1_degradation: miR1 => $Sink; kdegmiR1*miR1;
  Pax3_transcription: $Source => Pax3_mRNA; ksynPax3mRNA*Source;
  Pax3_mRNA_degradation: Pax3_mRNA => $Sink; kdegPax3mRNA*Pax3_mRNA;
  miR1_Pax3mRNA_binding: miR1 + Pax3_mRNA => miR1_Pax3_mRNA; kbinmiR1Pax3*miR1*Pax3_mRNA;
  miR1_Pax3mRNA_release: miR1_Pax3_mRNA => miR1 + Pax3_mRNA; krelmiR1Pax3*miR1_Pax3_mRNA;
  Pax3_mRNA_degradation_by_miR1: miR1_Pax3_mRNA => miR1; kdegPax3mRNAmiR1*miR1_Pax3_mRNA;
  Pax3_translation: Pax3_mRNA => Pax3_mRNA + Pax3; ksynPax3*Pax3_mRNA;
  Pax3_translation2: miR1_Pax3_mRNA => miR1_Pax3_mRNA + Pax3; ksynPax3miR1*miR1_Pax3_mRNA;
  Pax3_degradation: Pax3 => $Sink; kdegPax3*Pax3;
  MyoD_gene_Pax3_binding: Pax3 + MyoD_gene => MyoD_gene_Pax3; kbinMyoDgenePax3*Pax3*MyoD_gene;
  MyoD_gene_Pax3_release: MyoD_gene_Pax3 => Pax3 + MyoD_gene; krelMyoDgenePax3*MyoD_gene_Pax3;
  MyoD_synthesis: MyoD_gene => MyoD_gene + MyoD; ksynMyoD*MyoD_gene;
  MyoD_degradation: MyoD => $Sink; kdegMyoD*MyoD;

  // Unit definitions:
  unit substance = item;
end
