// SBML level 2 version 4

model MODEL1704110004()
  // Proctor2017 - Identifying microRNA for muscle regeneration during ageing (Mirs_in_muscle)
  // This model is described in the article:
  // Using computer simulation models to investigate the most promising microRNAs to improve muscle regeneration during ageing
  // Carole J. Proctor & Katarzyna Goljanek-Whysall
  // Nature Scientific Reports
  // Abstract:
  // MicroRNAs (miRNAs) regulate gene expression through interactions with target sites within mRNAs, leading to enhanced degradation of the mRNA or inhibition of translation. Skeletal muscle expresses many different miRNAs with important roles in adulthood myogenesis (regeneration) and myofibre hypertrophy and atrophy, processes associated with muscle ageing. However, the large number of miRNAs and their targets mean that a complex network of pathways exists, making it difficult to predict the effect of selected miRNAs on age-related muscle wasting. Computational modelling has the potential to aid this process as it is possible to combine models of individual miRNA:target interactions to form an integrated network. As yet, no models of these interactions in muscle exist. We created the first model of miRNA:target interactions in myogenesis based on experimental evidence of individual miRNAs which were next validated and used to make testable predictions. Our model confirms that miRNAs regulate key interactions during myogenesis and can act by promoting the switch between quiescent/proliferating/differentiating myoblasts and by maintaining the differentiation process. We propose that a threshold level of miR-1 acts in the initial switch to differentiation, with miR-181 keeping the switch on and miR-378 maintaining the differentiation and miR-143 inhibiting myogenesis.
  // This model is hosted on BioModels Database and identified by: MODEL1704110004.
  // To cite BioModels Database, please use: Chelliah V et al. BioModels: ten-year anniversary. Nucl. Acids Res. 2015, 43(Database issue):D542-8.
  // To the extent possible under law, all copyright and related or neighbouring rights to this encoded model have been dedicated to the public domain worldwide. Please refer to CC0 Public Domain Dedication for more information.
  // biomodels.db:MODEL1704110004

  // Compartments:
  compartment cell = 1;

  // Species:
  substanceOnly species miR1 in cell = 20;
  substanceOnly species miR1_Pax3_mRNA in cell = 0;
  substanceOnly species miR1_gene in cell = 2;
  substanceOnly species miR1_gene_MyoD in cell = 0;
  substanceOnly species MyoD in cell = 500;
  substanceOnly species MyoD_gene in cell = 2;
  substanceOnly species MyoD_gene_Pax3 in cell = 0;
  substanceOnly species Pax3 in cell = 10;
  substanceOnly species Pax3_mRNA in cell = 10;
  substanceOnly species $Sink in cell = 0;
  substanceOnly species $Source in cell = 1;
  substanceOnly species FoxO3 in cell = 400;
  substanceOnly species FoxO3_Sirt1 in cell = 100;
  substanceOnly species HoxA11 in cell = 500;
  substanceOnly species HoxA11_mRNA in cell = 100;
  substanceOnly species Mafbx in cell = 0;
  substanceOnly species miR181 in cell = 10;
  substanceOnly species miR181_HoxA11_mRNA in cell = 0;
  substanceOnly species miR181_Sirt1_mRNA in cell = 0;
  substanceOnly species miR181_gene in cell = 2;
  substanceOnly species MyoD_gene_FoxO3 in cell = 0;
  substanceOnly species MyoD_gene_HoxA11 in cell = 0;
  substanceOnly species Sirt1 in cell = 400;
  substanceOnly species Sirt1_mRNA in cell = 100;
  substanceOnly species miR378 in cell = 20;
  substanceOnly species miR378_gene in cell = 2;
  substanceOnly species miR378_gene_MyoD in cell = 0;
  substanceOnly species miR378_gene_Msc in cell = 0;
  substanceOnly species miR378_Msc_mRNA in cell = 0;
  substanceOnly species MyoD_mRNA in cell = 20;
  substanceOnly species Msc in cell = 500;
  substanceOnly species Msc_gene in cell = 2;
  substanceOnly species Msc_mRNA in cell = 50;
  substanceOnly species Akt in cell = 100;
  substanceOnly species Akt_P in cell = 0;
  substanceOnly species Igf2 in cell = 500;
  substanceOnly species Igf2_Igfbp5 in cell = 0;
  substanceOnly species Igfbp5 in cell = 100;
  substanceOnly species Igfbp5_mRNA in cell = 20;
  substanceOnly species Igfbp5_mRNA_miR143 in cell = 0;
  substanceOnly species IL6 in cell = 500;
  substanceOnly species miR143 in cell = 200;
  substanceOnly species miR143_gene in cell = 2;
  substanceOnly species miR143_gene_IL6 in cell = 0;
  substanceOnly species miR143_gene_MyoD in cell = 0;
  substanceOnly species Myogenin in cell = 0;
  substanceOnly species miR1_gene_Msc in cell = 0;
  substanceOnly species miR143_gene_Msc in cell = 0;

  // Parameters:
  kbinmiR1geneMyoD = 1e-5;
  kbinmiR1Pax3 = 1e-5;
  kbinMyoDgenePax3 = 1e-5;
  kdegmiR1 = 1.6e-6;
  kdegMyoD = 0.00026;
  kdegPax3 = 2e-5;
  kdegPax3mRNA = 0.0002;
  kdegPax3mRNAmiR1 = 0.0004;
  krelmiR1geneMyoD = 0.001;
  krelmiR1Pax3 = 0.001;
  krelMyoDgenePax3 = 0.0005;
  ksynmiR1 = 1e-8;
  ksynmiR1MyoD = 0.001;
  ksynPax3 = 3e-5;
  ksynPax3miR1 = 5e-7;
  ksynPax3mRNA = 0.002;
  kbinFoxO3Sirt1 = 1e-5;
  kbinmiR181Sirt1 = 5e-5;
  kbinmiR181HoxA11 = 5e-5;
  kbinMyoDgeneFoxO3 = 1e-5;
  kbinMyoDgeneHoxA11 = 1e-5;
  kdegFoxO3 = 4.8e-5;
  kdegFoxO3Sirt1 = 9.6e-5;
  kdegHoxA11 = 6.4e-6;
  kdegHoxA11mRNA = 2e-5;
  kdegHoxA11mRNAmiR181 = 2e-5;
  kdegMafbx = 0.0002;
  kdegmiR181 = 1.6e-6;
  kdegMyoDmRNA = 0.0002;
  kdegSirt1 = 2.4e-5;
  kdegSirt1mRNA = 2e-5;
  kdegSirt1mRNAmiR181 = 2e-5;
  krelFoxO3Sirt1 = 0.001;
  krelmiR181HoxA11 = 0.001;
  krelmiR181Sirt1 = 0.001;
  krelMyoDgeneFoxO3 = 0.001;
  krelMyoDgeneHoxA11 = 0.0005;
  ksynFoxO3 = 0.038;
  ksynHoxA11 = 3.2e-5;
  ksynHoxA11mRNA = 0.002;
  ksynMafbx = 0.0001;
  ksynmiR181 = 6e-6;
  ksynMyoD = 0.002;
  ksynMyoDmRNA = 0.005;
  ksynSirt1 = 2e-5;
  ksynSirt1mRNA = 0.005;
  kbinmiR378geneMsc = 5e-5;
  kbinmiR378geneMyoD = 1e-5;
  kbinmiR378MscmRNA = 0.0001;
  kdegmiR378 = 1.6e-6;
  kdegMsc = 5e-5;
  kdegMscmRNA = 1e-5;
  kdegMscmRNAmiR378 = 4e-5;
  krelmiR378geneMsc = 0.001;
  krelmiR378geneMyoD = 0.001;
  krelmiR378MscmRNA = 0.001;
  ksynmiR378 = 0.0001;
  ksynMsc = 0.0005;
  ksynMscmRNA = 0.00025;
  kbinIgf2Igfbp5 = 5e-6;
  kbinmiR143geneIL6 = 0.001;
  kbinmiR143geneMyoD = 1e-5;
  kbinmiR143Igfbp5mRNA = 0.0001;
  kdegIgfbp5 = 5e-5;
  kdegIgfbp5mRNA = 1e-5;
  kdegIgfbp5mRNAmiR143 = 5e-5;
  kdegIL6 = 8e-6;
  kdegmiR143 = 5e-6;
  kdegMyogenin = 1e-5;
  kdephosAkt = 0.01;
  kphosAkt = 0.0005;
  krelIgf2Igfbp5 = 0.001;
  krelmiR143geneIL6 = 0.0005;
  krelmiR143geneMyoD = 0.001;
  krelmiR143Igfbp5mRNA = 0.001;
  ksynIgfbp5 = 8e-5;
  ksynIgfbp5mRNA = 0.001;
  ksynIL6 = 0;
  ksynmiR143 = 0.0005;
  ksynMyogenin = 1e-5;
  kbinmiR1geneMsc = 5e-5;
  krelmiR1geneMsc = 0.001;
  kbinmiR143geneMsc = 5e-5;
  krelmiR143geneMsc = 0.001;

  // Reactions:
  miR1_gene_MyoD_binding: miR1_gene + MyoD => miR1_gene_MyoD; kbinmiR1geneMyoD*miR1_gene*MyoD;
  miR1_gene_MyoD_release: miR1_gene_MyoD => miR1_gene + MyoD; krelmiR1geneMyoD*miR1_gene_MyoD;
  miR1_synthesis_by_MyoD: miR1_gene_MyoD => miR1_gene_MyoD + miR1; ksynmiR1MyoD*miR1_gene_MyoD;
  miR1_synthesis: miR1_gene => miR1_gene + miR1; ksynmiR1*miR1_gene;
  miR1_degradation: miR1 => $Sink; kdegmiR1*miR1;
  Pax3_transcription: $Source => Pax3_mRNA; ksynPax3mRNA*Source;
  Pax3_mRNA_degradation: Pax3_mRNA => $Sink; kdegPax3mRNA*Pax3_mRNA;
  miR1_Pax3mRNA_binding: miR1 + Pax3_mRNA => miR1_Pax3_mRNA; kbinmiR1Pax3*miR1*Pax3_mRNA;
  miR1_Pax3mRNA_release: miR1_Pax3_mRNA => miR1 + Pax3_mRNA; krelmiR1Pax3*miR1_Pax3_mRNA;
  Pax3_mRNA_degradation_by_miR1: miR1_Pax3_mRNA => miR1; kdegPax3mRNAmiR1*miR1_Pax3_mRNA;
  Pax3_translation: Pax3_mRNA => Pax3_mRNA + Pax3; ksynPax3*Pax3_mRNA;
  Pax3_translation2: miR1_Pax3_mRNA => miR1_Pax3_mRNA + Pax3; ksynPax3miR1*miR1_Pax3_mRNA;
  Pax3_degradation: Pax3 => $Sink; kdegPax3*Pax3;
  MyoD_gene_Pax3_binding: Pax3 + MyoD_gene => MyoD_gene_Pax3; kbinMyoDgenePax3*Pax3*MyoD_gene;
  MyoD_gene_Pax3_release: MyoD_gene_Pax3 => Pax3 + MyoD_gene; krelMyoDgenePax3*MyoD_gene_Pax3;
  MyoD_degradation: MyoD => $Sink; kdegMyoD*MyoD;
  miR181_synthesis: miR181_gene => miR181_gene + miR181; ksynmiR181*miR181_gene;
  miR181_degradation: miR181 => $Sink; kdegmiR181*miR181;
  Sirt1_transcription: $Source => Sirt1_mRNA; ksynSirt1mRNA*Source;
  Sirt1_mRNA_degradation: Sirt1_mRNA => $Sink; kdegSirt1mRNA*Sirt1_mRNA;
  Sirt1_translation: Sirt1_mRNA => Sirt1_mRNA + Sirt1; ksynSirt1*Sirt1_mRNA;
  Sirt1_degradation: Sirt1 => $Sink; kdegSirt1*Sirt1;
  miR181_Sirt1mRNA_binding: miR181 + Sirt1_mRNA => miR181_Sirt1_mRNA; kbinmiR181Sirt1*miR181*Sirt1_mRNA;
  miR181_Sirt1mRNA_release: miR181_Sirt1_mRNA => miR181 + Sirt1_mRNA; krelmiR181Sirt1*miR181_Sirt1_mRNA;
  Sirt1_mRNA_degradation_by_miR181: miR181_Sirt1_mRNA => miR181; kdegSirt1mRNAmiR181*miR181_Sirt1_mRNA;
  HoxA11_transcription: $Source => HoxA11_mRNA; ksynHoxA11mRNA*Source;
  HoxA11_mRNA_degradation: HoxA11_mRNA => $Sink; kdegHoxA11mRNA*HoxA11_mRNA;
  miR181_HoxA11mRNA_binding: miR181 + HoxA11_mRNA => miR181_HoxA11_mRNA; kbinmiR181HoxA11*miR181*HoxA11_mRNA;
  miR181_HoxA11mRNA_release: miR181_HoxA11_mRNA => miR181 + HoxA11_mRNA; krelmiR181HoxA11*miR181_HoxA11_mRNA;
  HoxA11_mRNA_degradation_by_miR181: miR181_HoxA11_mRNA => miR181; kdegHoxA11mRNAmiR181*miR181_HoxA11_mRNA;
  HoxA11_translation: HoxA11_mRNA => HoxA11_mRNA + HoxA11; ksynHoxA11*HoxA11_mRNA;
  HoxA11_degradation: HoxA11 => $Sink; kdegHoxA11*HoxA11;
  MyoD_gene_FoxO3_binding: MyoD_gene + FoxO3 => MyoD_gene_FoxO3; kbinMyoDgeneFoxO3*MyoD_gene*FoxO3;
  MyoD_gene_FoxO3_release: MyoD_gene_FoxO3 => MyoD_gene + FoxO3; krelMyoDgeneFoxO3*MyoD_gene_FoxO3;
  MyoD_transcription_by_FoxO3: MyoD_gene_FoxO3 => MyoD_gene_FoxO3 + MyoD_mRNA; ksynMyoDmRNA*MyoD_gene_FoxO3;
  MyoD_gene_HoxA11_binding: HoxA11 + MyoD_gene => MyoD_gene_HoxA11; kbinMyoDgeneHoxA11*HoxA11*MyoD_gene;
  MyoD_gene_HoxA11_release: MyoD_gene_HoxA11 => HoxA11 + MyoD_gene; krelMyoDgeneHoxA11*MyoD_gene_HoxA11;
  MyoD_translation: MyoD_mRNA => MyoD_mRNA + MyoD; ksynMyoD*MyoD_mRNA;
  MyoD_mRNA_degradation: MyoD_mRNA => $Sink; kdegMyoDmRNA*MyoD_mRNA;
  FoxO3_Sirt1_binding: FoxO3 + Sirt1 => FoxO3_Sirt1; kbinFoxO3Sirt1*FoxO3*Sirt1;
  FoxO3_Sirt1_release: FoxO3_Sirt1 => FoxO3 + Sirt1; krelFoxO3Sirt1*FoxO3_Sirt1;
  Fox3_degradation_via_Sirt1: FoxO3_Sirt1 => Sirt1; kdegFoxO3Sirt1*FoxO3_Sirt1;
  Fox3_degradation: FoxO3 => $Sink; kdegFoxO3*FoxO3;
  Fox3_synthesis: $Source => FoxO3; ksynFoxO3*Source;
  Mafbx_synthesis: FoxO3 => FoxO3 + Mafbx; ksynMafbx*FoxO3;
  Mafbx_degradation: Mafbx => $Sink; kdegMafbx*Mafbx;
  miR378_gene_MyoD_binding: miR378_gene + MyoD => miR378_gene_MyoD; kbinmiR378geneMyoD*miR378_gene*MyoD;
  miR_gene_MyoD_release: miR378_gene_MyoD => miR378_gene + MyoD; krelmiR378geneMyoD*miR378_gene_MyoD;
  miR378_synthesis: miR378_gene_MyoD => miR378_gene_MyoD + miR378; ksynmiR378*miR378_gene_MyoD;
  miR378_degradation: miR378 => $Sink; kdegmiR378*miR378;
  MyoD_transcription: MyoD_gene => MyoD_gene + MyoD_mRNA; ksynMyoDmRNA*MyoD_gene;
  Msc_transcription: Msc_gene => Msc_gene + Msc_mRNA; ksynMscmRNA*Msc_gene;
  Msc_translation: Msc_mRNA => Msc_mRNA + Msc; ksynMsc*Msc_mRNA;
  Msc_mRNA_degradation: Msc_mRNA => $Sink; kdegMscmRNA*Msc_mRNA;
  miR378_Msc_binding: miR378 + Msc_mRNA => miR378_Msc_mRNA; kbinmiR378MscmRNA*miR378*Msc_mRNA;
  miR378_Msc_release: miR378_Msc_mRNA => miR378 + Msc_mRNA; krelmiR378MscmRNA*miR378_Msc_mRNA;
  Msc_mRNA_degradation_by_miR378: miR378_Msc_mRNA => miR378; kdegMscmRNAmiR378*miR378_Msc_mRNA;
  miR378_gene_Msc_binding: miR378_gene + Msc => miR378_gene_Msc; kbinmiR378geneMsc*miR378_gene*Msc;
  miR378_gene_Msc_release: miR378_gene_Msc => miR378_gene + Msc; krelmiR378geneMsc*miR378_gene_Msc;
  Msc_degradation: Msc => $Sink; kdegMsc*Msc;
  miR143_gene_MyoD_binding: miR143_gene + MyoD => miR143_gene_MyoD; kbinmiR143geneMyoD*miR143_gene*MyoD;
  miR143_gene_MyoD_release: miR143_gene_MyoD => miR143_gene + MyoD; krelmiR143geneMyoD*miR143_gene_MyoD;
  miR143_synthesis: miR143_gene_MyoD => miR143_gene_MyoD + miR143; ksynmiR143*miR143_gene_MyoD;
  miR143_degradation: miR143 => $Sink; kdegmiR143*miR143;
  IL6_synthesis: $Source => IL6; ksynIL6*Source;
  IL6_degradation: IL6 => $Sink; kdegIL6*IL6;
  miR143_gene_IL6_binding: miR143_gene + IL6 => miR143_gene_IL6; kbinmiR143geneIL6*miR143_gene*IL6;
  miR143_gene_IL6_release: miR143_gene_IL6 => miR143_gene + IL6; krelmiR143geneIL6*miR143_gene_IL6;
  Igfbp5_transcription: $Source => Igfbp5_mRNA; ksynIgfbp5mRNA*Source;
  Igfbp5_mRNA_degradation: Igfbp5_mRNA => $Sink; kdegIgfbp5mRNA*Igfbp5_mRNA;
  Igfbp5_mRNA_miR143_binding: Igfbp5_mRNA + miR143 => Igfbp5_mRNA_miR143; kbinmiR143Igfbp5mRNA*Igfbp5_mRNA*miR143;
  Igfbp5_mRNA_miR143_release: Igfbp5_mRNA_miR143 => Igfbp5_mRNA + miR143; krelmiR143Igfbp5mRNA*Igfbp5_mRNA_miR143;
  Igfbp5_mRNA_degradation_by_miR143: Igfbp5_mRNA_miR143 => miR143; kdegIgfbp5mRNAmiR143*Igfbp5_mRNA_miR143;
  Igfbp5_translation: Igfbp5_mRNA => Igfbp5_mRNA + Igfbp5; ksynIgfbp5*Igfbp5_mRNA;
  Igfbp5_degradation: Igfbp5 => $Sink; kdegIgfbp5*Igfbp5;
  Igf2_Igfbp5_binding: Igf2 + Igfbp5 => Igf2_Igfbp5; kbinIgf2Igfbp5*Igf2*Igfbp5;
  Igf2_Igfbp5_release: Igf2_Igfbp5 => Igf2 + Igfbp5; krelIgf2Igfbp5*Igf2_Igfbp5;
  Akt_phosphorylation: Igf2_Igfbp5 + Akt => Igf2_Igfbp5 + Akt_P; kphosAkt*Igf2_Igfbp5*Akt;
  Akt_dephosphorylation: Akt_P => Akt; kdephosAkt*Akt_P;
  Myogenin_synthesis: Akt_P => Akt_P + Myogenin; ksynMyogenin*Akt_P;
  Myogenin_degradation: Myogenin => $Sink; kdegMyogenin*Myogenin;
  miR1_gene_Msc_binding: miR1_gene + Msc => miR1_gene_Msc; kbinmiR1geneMsc*miR1_gene*Msc;
  miR1_gene_Msc_release: miR1_gene_Msc => miR1_gene + Msc; krelmiR1geneMsc*miR1_gene_Msc;
  miR143_gene_Msc_binding: miR143_gene + Msc => miR143_gene_Msc; kbinmiR143geneMsc*miR143_gene*Msc;
  miR143_gene_Msc_release: miR143_gene_Msc => miR143_gene + Msc; krelmiR143geneMsc*miR143_gene_Msc;

  // Unit definitions:
  unit substance = item;
end
