// SBML level 2 version 4

model MODEL1705170000()
  // Proctor2017- Role of microRNAs in osteoarthritis (miR140-SMAD3 double negative feedback)
  // This model is described in the article:
  // Computer simulation models as a tool to investigate the role of microRNAs in osteoarthritis.
  // Proctor CJ, Smith GR.
  // PLoS ONE 2017; 12(11): e0187568
  // Abstract:
  // The aim of this study was to show how computational models can be used to increase our understanding of the role of microRNAs in osteoarthritis (OA) using miR-140 as an example. Bioinformatics analysis and experimental results from the literature were used to create and calibrate models of gene regulatory networks in OA involving miR-140 along with key regulators such as NF-?B, SMAD3, and RUNX2. The individual models were created with the modelling standard, Systems Biology Markup Language, and integrated to examine the overall effect of miR-140 on cartilage homeostasis. Down-regulation of miR-140 may have either detrimental or protective effects for cartilage, indicating that the role of miR-140 is complex. Studies of individual networks in isolation may therefore lead to different conclusions. This indicated the need to combine the five chosen individual networks involving miR-140 into an integrated model. This model suggests that the overall effect of miR-140 is to change the response to an IL-1 stimulus from a prolonged increase in matrix degrading enzymes to a pulse-like response so that cartilage degradation is temporary. Our current model can easily be modified and extended as more experimental data become available about the role of miR-140 in OA. In addition, networks of other microRNAs that are important in OA could be incorporated. A fully integrated model could not only aid our understanding of the mechanisms of microRNAs in ageing cartilage but could also provide a useful tool to investigate the effect of potential interventions to prevent cartilage loss.
  // This model is hosted on BioModels Database and identified by: MODEL1705170000.
  // To cite BioModels Database, please use: Chelliah V et al. BioModels: ten-year anniversary. Nucl. Acids Res. 2015, 43(Database issue):D542-8.
  // To the extent possible under law, all copyright and related or neighbouring rights to this encoded model have been dedicated to the public domain worldwide. Please refer to CC0 Public Domain Dedication for more information.
  // biomodels.db:MODEL1705170000

  // Compartments:
  compartment cell = 1;
  compartment nucleus = 1;
  compartment membrane = 1;
  compartment ecm = 1;

  // Species:
  substanceOnly species miR140 in cell = 450;
  substanceOnly species miR140_gene in cell = 2;
  substanceOnly species miR140_gene_SMAD3_P in cell = 0;
  substanceOnly species miR140_SMAD3_mRNA in cell = 50;
  substanceOnly species SMAD3 in cell = 250;
  substanceOnly species SMAD3_mRNA in cell = 10;
  substanceOnly species SMAD3_P in cell = 0;
  substanceOnly species SMAD7 in cell = 0;
  substanceOnly species TGFb_A in cell = 500;
  substanceOnly species TGFb_I in ecm = 0;
  substanceOnly species $Sink in cell = 0;
  substanceOnly species $Source in cell = 1;

  // Parameters:
  kbinmiR140geneSMAD3 = 0.005;
  kbinSMAD3mRNAmiR140 = 0.0008;
  kdegmiR140 = 8e-6;
  kdegSMAD3 = 0.00043;
  kdegSMAD3mRNA = 0.0002;
  kdegSMAD7 = 5e-5;
  kdephosSMAD3 = 6e-5;
  kinactTGFb = 0.0005;
  kphosSMAD3 = 5e-5;
  krelmiR140geneSMAD3 = 0.01;
  krelSMAD3mRNAmiR140 = 0.001;
  ksynmiR140 = 0.0018;
  ksynSMAD3 = 0.004;
  ksynSMAD3mRNA = 0.004;
  ksynSMAD7 = 0.0005;

  // Reactions:
  SMAD3_phosphorylation: TGFb_A + SMAD3 => TGFb_A + SMAD3_P; kphosSMAD3*TGFb_A*SMAD3;
  SMAD3_dephosphorylation: SMAD3_P => SMAD3; kdephosSMAD3*SMAD3_P;
  SMAD3_transcription: $Source => SMAD3_mRNA; ksynSMAD3mRNA*Source;
  SMAD3mRNA_degradation: SMAD3_mRNA => $Sink; kdegSMAD3mRNA*SMAD3_mRNA;
  SMAD3mRNA_degradation_by_miR140: miR140_SMAD3_mRNA => miR140; kdegSMAD3mRNA*miR140_SMAD3_mRNA;
  SMAD3_translation: SMAD3_mRNA => SMAD3_mRNA + SMAD3; ksynSMAD3*SMAD3_mRNA;
  SMAD3_degradation: SMAD3 => $Sink; kdegSMAD3*SMAD3;
  SMAD3_mRNA_binding_by_miR140: SMAD3_mRNA + miR140 => miR140_SMAD3_mRNA; kbinSMAD3mRNAmiR140*SMAD3_mRNA*miR140;
  SMAD3_mRNA_miR140_release: miR140_SMAD3_mRNA => miR140 + SMAD3_mRNA; krelSMAD3mRNAmiR140*miR140_SMAD3_mRNA;
  miR140_synthesis: miR140_gene => miR140_gene + miR140; ksynmiR140*miR140_gene;
  miR140_degradation: miR140 => $Sink; kdegmiR140*miR140;
  SMAD3_miR140_gene_binding: SMAD3_P + miR140_gene => miR140_gene_SMAD3_P; kbinmiR140geneSMAD3*SMAD3_P*miR140_gene;
  SMAD3_miR140_gene_release: miR140_gene_SMAD3_P => miR140_gene + SMAD3_P; krelmiR140geneSMAD3*miR140_gene_SMAD3_P;
  SMAD7_synthesis: SMAD3_P => SMAD3_P + SMAD7; ksynSMAD7*SMAD3_P;
  SMAD7_degradation: SMAD7 => $Sink; kdegSMAD7*SMAD7;
  TGFb_inactivation: TGFb_A + SMAD7 => TGFb_I; kinactTGFb*TGFb_A*SMAD7;

  // Unit definitions:
  unit substance = item;
end
