// SBML level 2 version 4

model MODEL1705170002()
  // Proctor2017- Role of microRNAs in osteoarthritis (miR140-IL1 incoherent feed forward)
  // This model is described in the article:
  // Computer simulation models as a tool to investigate the role of microRNAs in osteoarthritis.
  // Proctor CJ, Smith GR.
  // PLoS ONE 2017; 12(11): e0187568
  // Abstract:
  // The aim of this study was to show how computational models can be used to increase our understanding of the role of microRNAs in osteoarthritis (OA) using miR-140 as an example. Bioinformatics analysis and experimental results from the literature were used to create and calibrate models of gene regulatory networks in OA involving miR-140 along with key regulators such as NF-?B, SMAD3, and RUNX2. The individual models were created with the modelling standard, Systems Biology Markup Language, and integrated to examine the overall effect of miR-140 on cartilage homeostasis. Down-regulation of miR-140 may have either detrimental or protective effects for cartilage, indicating that the role of miR-140 is complex. Studies of individual networks in isolation may therefore lead to different conclusions. This indicated the need to combine the five chosen individual networks involving miR-140 into an integrated model. This model suggests that the overall effect of miR-140 is to change the response to an IL-1 stimulus from a prolonged increase in matrix degrading enzymes to a pulse-like response so that cartilage degradation is temporary. Our current model can easily be modified and extended as more experimental data become available about the role of miR-140 in OA. In addition, networks of other microRNAs that are important in OA could be incorporated. A fully integrated model could not only aid our understanding of the mechanisms of microRNAs in ageing cartilage but could also provide a useful tool to investigate the effect of potential interventions to prevent cartilage loss.
  // This model is hosted on BioModels Database and identified by: MODEL1705170002.
  // To cite BioModels Database, please use: Chelliah V et al. BioModels: ten-year anniversary. Nucl. Acids Res. 2015, 43(Database issue):D542-8.
  // To the extent possible under law, all copyright and related or neighbouring rights to this encoded model have been dedicated to the public domain worldwide. Please refer to CC0 Public Domain Dedication for more information.

  // Compartments:
  compartment cell = 1;

  // Species:
  substanceOnly species IL1 in cell = 500;
  substanceOnly species miR140 in cell = 10;
  substanceOnly species miR140_gene in cell = 2;
  substanceOnly species miR140_gene_NFkB in cell = 0;
  substanceOnly species MMP13_mRNA in cell = 25;
  substanceOnly species MMP13_mRNA_miR140 in cell = 0;
  substanceOnly species NFkB in cell = 10;
  substanceOnly species $Sink in cell = 0;

  // Parameters:
  kactNFkB = 0.0005;
  kbinmiR140geneNFkB = 5e-5;
  kbinMMP13mRNAmiR140 = 5e-5;
  kdegMMP13mRNAmiR140 = 8e-5;
  kdegIL1 = 0.0004;
  kdegmiR140 = 8e-6;
  kinactNFkB = 5e-6;
  krelmiR140geneNFkB = 0.001;
  krelMMP13mRNAmiR140 = 0.01;
  ksynMMP13mRNA = 1e-5;
  ksynmiR140NFkB = 0.0018;

  // Reactions:
  IL1_degradation: IL1 => $Sink; kdegIL1*IL1;
  NFkB_activation: IL1 => IL1 + NFkB; kactNFkB*IL1;
  NFkB_inactivation: NFkB => $Sink; kinactNFkB*NFkB;
  NFkB_miR140_gene_binding: NFkB + miR140_gene => miR140_gene_NFkB; kbinmiR140geneNFkB*NFkB*miR140_gene;
  NFkB_miR140_gene_release: miR140_gene_NFkB => miR140_gene + NFkB; krelmiR140geneNFkB*miR140_gene_NFkB;
  miR140_synthesis: miR140_gene_NFkB => miR140_gene_NFkB + miR140; ksynmiR140NFkB*miR140_gene_NFkB;
  MMP13_mRNA_synthesis: NFkB => NFkB + MMP13_mRNA; ksynMMP13mRNA*NFkB;
  MMP13_mRNA_binding_by_miR140: MMP13_mRNA + miR140 => MMP13_mRNA_miR140; kbinMMP13mRNAmiR140*MMP13_mRNA*miR140;
  MMP13_mRNA_miR140_release: MMP13_mRNA_miR140 => MMP13_mRNA + miR140; krelMMP13mRNAmiR140*MMP13_mRNA_miR140;
  MMP13_mRNA_degradation_by_miR140: MMP13_mRNA_miR140 => miR140; kdegMMP13mRNAmiR140*MMP13_mRNA_miR140;
  miR140_degradation: miR140 => $Sink; kdegmiR140*miR140;

  // Unit definitions:
  unit substance = item;
end
