// SBML level 2 version 4

model MODEL1705170003()
  // Proctor2017- Role of microRNAs in osteoarthritis (miR140-SOX9 incoherent feed forward)
  // This model is described in the article:
  // Computer simulation models as a tool to investigate the role of microRNAs in osteoarthritis.
  // Proctor CJ, Smith GR.
  // PLoS ONE 2017; 12(11): e0187568
  // Abstract:
  // The aim of this study was to show how computational models can be used to increase our understanding of the role of microRNAs in osteoarthritis (OA) using miR-140 as an example. Bioinformatics analysis and experimental results from the literature were used to create and calibrate models of gene regulatory networks in OA involving miR-140 along with key regulators such as NF-?B, SMAD3, and RUNX2. The individual models were created with the modelling standard, Systems Biology Markup Language, and integrated to examine the overall effect of miR-140 on cartilage homeostasis. Down-regulation of miR-140 may have either detrimental or protective effects for cartilage, indicating that the role of miR-140 is complex. Studies of individual networks in isolation may therefore lead to different conclusions. This indicated the need to combine the five chosen individual networks involving miR-140 into an integrated model. This model suggests that the overall effect of miR-140 is to change the response to an IL-1 stimulus from a prolonged increase in matrix degrading enzymes to a pulse-like response so that cartilage degradation is temporary. Our current model can easily be modified and extended as more experimental data become available about the role of miR-140 in OA. In addition, networks of other microRNAs that are important in OA could be incorporated. A fully integrated model could not only aid our understanding of the mechanisms of microRNAs in ageing cartilage but could also provide a useful tool to investigate the effect of potential interventions to prevent cartilage loss.
  // This model is hosted on BioModels Database and identified by: MODEL1705170003.
  // To cite BioModels Database, please use: Chelliah V et al. BioModels: ten-year anniversary. Nucl. Acids Res. 2015, 43(Database issue):D542-8.
  // To the extent possible under law, all copyright and related or neighbouring rights to this encoded model have been dedicated to the public domain worldwide. Please refer to CC0 Public Domain Dedication for more information.

  // Compartments:
  compartment cell = 1;

  // Species:
  substanceOnly species HDAC4 in cell = 500;
  substanceOnly species HDAC4_mRNA in cell = 10;
  substanceOnly species HDAC4_mRNA_miR140 in cell = 0;
  substanceOnly species HDAC4_RUNX2 in cell = 0;
  substanceOnly species HDAC4_RUNX2_gene in cell = 0;
  substanceOnly species miR140 in cell = 10;
  substanceOnly species miR140_gene in cell = 2;
  substanceOnly species miR140_gene_SOX9 in cell = 0;
  substanceOnly species MMP13_mRNA in cell = 0;
  substanceOnly species RUNX2 in cell = 500;
  substanceOnly species RUNX2_gene in cell = 2;
  substanceOnly species SOX9 in cell = 500;
  substanceOnly species $Sink in cell = 0;
  substanceOnly species $Source in cell = 1;

  // Parameters:
  kbinHDAC4RUNX2 = 4e-5;
  kbinHDAC4mRNAmiR140 = 0.0002;
  kbinmiR140geneSOX9 = 0.002;
  kdegHDAC4mRNA = 0.001;
  kdegHDAC4 = 0.001;
  kdegmiR140 = 8e-6;
  kdegMMP13mRNA = 6.4e-6;
  kdegRUNX2 = 1e-5;
  kinhibRUNX2 = 4e-6;
  krelHDAC4mRNAmiR140 = 0.001;
  krelHDAC4RUNX2 = 0.005;
  krelmiR140geneSOX9 = 0.001;
  krelRUNX2gene = 0.001;
  ksynHDAC4mRNA = 0.05;
  ksynHDAC4 = 0.05;
  ksynmiR140SOX9 = 0.0018;
  ksynMMP13mRNAbyRUNX2 = 4e-6;
  ksynRUNX2 = 0.15;

  // Reactions:
  SOX9_miR140_gene_binding: SOX9 + miR140_gene => miR140_gene_SOX9; kbinmiR140geneSOX9*SOX9*miR140_gene;
  SOX9_miR140_gene_release: miR140_gene_SOX9 => miR140_gene + SOX9; krelmiR140geneSOX9*miR140_gene_SOX9;
  miR140_synthesis_by_SOX9: miR140_gene_SOX9 => miR140_gene_SOX9 + miR140; ksynmiR140SOX9*miR140_gene_SOX9;
  RUNX2_inhibition_by_SOX9: RUNX2 + SOX9 => SOX9; kdegRUNX2*RUNX2*SOX9;
  RUNX2gene_inhibition_by_HDAC4: RUNX2_gene + HDAC4 => HDAC4_RUNX2_gene; kinhibRUNX2*RUNX2_gene*HDAC4;
  RUNX2gene_HDAC4_release: HDAC4_RUNX2_gene => RUNX2_gene + HDAC4; krelRUNX2gene*HDAC4_RUNX2_gene;
  RUNX2_synthesis: RUNX2_gene => RUNX2_gene + RUNX2; ksynRUNX2*RUNX2_gene;
  miR140_degradation: miR140 => $Sink; kdegmiR140*miR140;
  HDAC4mRNA_inhibition_by_miR140: HDAC4_mRNA + miR140 => HDAC4_mRNA_miR140; kbinHDAC4mRNAmiR140*HDAC4_mRNA*miR140;
  HDAC4_mRNA_miR140_release: HDAC4_mRNA_miR140 => HDAC4_mRNA + miR140; krelHDAC4mRNAmiR140*HDAC4_mRNA_miR140;
  HDAC4_transcription: $Source => HDAC4_mRNA; ksynHDAC4mRNA*Source;
  HDAC4_mRNA_degradation: HDAC4_mRNA => $Sink; kdegHDAC4mRNA*HDAC4_mRNA;
  HDAC4_mRNA_degradation_by_miR140: HDAC4_mRNA_miR140 => miR140; kdegHDAC4mRNA*HDAC4_mRNA_miR140;
  HDAC4_translation: HDAC4_mRNA => HDAC4 + HDAC4_mRNA; ksynHDAC4*HDAC4_mRNA;
  HDAC4_degradation: HDAC4 => $Sink; kdegHDAC4*HDAC4;
  HDAC4_RUNX2_binding: HDAC4 + RUNX2 => HDAC4_RUNX2; kbinHDAC4RUNX2*HDAC4*RUNX2;
  HDAC4_RUNX2_release: HDAC4_RUNX2 => HDAC4 + RUNX2; krelHDAC4RUNX2*HDAC4_RUNX2;
  MMP13_mRNA_synthesis_by_RUNX2: RUNX2 => RUNX2 + MMP13_mRNA; ksynMMP13mRNAbyRUNX2*RUNX2;
  MMP13_mRNA_degradation: MMP13_mRNA => $Sink; kdegMMP13mRNA*MMP13_mRNA;

  // Unit definitions:
  unit substance = item;
end
