// SBML level 2 version 4

model MODEL1705170004()
  // Proctor2017- Role of microRNAs in osteoarthritis (Mir140-IGFBP5 incoherent feed forward)
  // This model is described in the article:
  // Computer simulation models as a tool to investigate the role of microRNAs in osteoarthritis.
  // Proctor CJ, Smith GR.
  // PLoS ONE 2017; 12(11): e0187568
  // Abstract:
  // The aim of this study was to show how computational models can be used to increase our understanding of the role of microRNAs in osteoarthritis (OA) using miR-140 as an example. Bioinformatics analysis and experimental results from the literature were used to create and calibrate models of gene regulatory networks in OA involving miR-140 along with key regulators such as NF-?B, SMAD3, and RUNX2. The individual models were created with the modelling standard, Systems Biology Markup Language, and integrated to examine the overall effect of miR-140 on cartilage homeostasis. Down-regulation of miR-140 may have either detrimental or protective effects for cartilage, indicating that the role of miR-140 is complex. Studies of individual networks in isolation may therefore lead to different conclusions. This indicated the need to combine the five chosen individual networks involving miR-140 into an integrated model. This model suggests that the overall effect of miR-140 is to change the response to an IL-1 stimulus from a prolonged increase in matrix degrading enzymes to a pulse-like response so that cartilage degradation is temporary. Our current model can easily be modified and extended as more experimental data become available about the role of miR-140 in OA. In addition, networks of other microRNAs that are important in OA could be incorporated. A fully integrated model could not only aid our understanding of the mechanisms of microRNAs in ageing cartilage but could also provide a useful tool to investigate the effect of potential interventions to prevent cartilage loss.
  // This model is hosted on BioModels Database and identified by: MODEL1705170004.
  // To cite BioModels Database, please use: Chelliah V et al. BioModels: ten-year anniversary. Nucl. Acids Res. 2015, 43(Database issue):D542-8.
  // To the extent possible under law, all copyright and related or neighbouring rights to this encoded model have been dedicated to the public domain worldwide. Please refer to CC0 Public Domain Dedication for more information.

  // Compartments:
  compartment cell = 1;

  // Species:
  substanceOnly species ACAN in cell = 0;
  substanceOnly species AKT in cell = 100;
  substanceOnly species AKT_P in cell = 0;
  substanceOnly species IGF1 in cell = 500;
  substanceOnly species IGF1_IGFBP5 in cell = 0;
  substanceOnly species IGFBP5 in cell = 100;
  substanceOnly species IGFBP5_mRNA in cell = 20;
  substanceOnly species IGFBP5_mRNA_miR140 in cell = 0;
  substanceOnly species IkB in cell = 0;
  species IkB_NFkB in cell = 500/cell;
  substanceOnly species JNK in cell = 100;
  substanceOnly species JNK_P in cell = 0;
  substanceOnly species miR140 in cell = 200;
  substanceOnly species miR140_gene in cell = 2;
  substanceOnly species miR140_gene_NFkB in cell = 0;
  substanceOnly species NFkB in cell = 0;
  substanceOnly species TNFa in cell = 500;
  substanceOnly species $Sink in cell = 0;
  substanceOnly species $Source in cell = 1;

  // Parameters:
  kactNFkB = 0.0001;
  kbinIGF1IGFBP5 = 5e-6;
  kbinIkBNFkB = 0.001;
  kbinmiR140geneNFkB = 5e-5;
  kbinmiR140IGFBP5mRNA = 5e-5;
  kdegIGFBP5 = 5e-5;
  kdegIGFBP5mRNA = 1e-5;
  kdegIGFBP5mRNAmiR140 = 0.0005;
  kdegmiR140 = 5e-6;
  kdegTNFa = 0.002;
  kdephosAKT = 0.01;
  kdephosJNK = 0.05;
  kphosAKT = 0.0005;
  kphosJNK = 0.05;
  krelIGF1IGFBP5 = 0.001;
  krelmiR140geneNFkB = 0.001;
  krelmiR140IGFBP5mRNA = 0.001;
  ksynACAN = 1e-7;
  ksynIGFBP5 = 8e-5;
  ksynIGFBP5mRNA = 0.02;
  ksynIGFBP5mRNAJNK = 0.0006;
  ksynIkB = 0.005;
  ksynmiR140 = 0.0001;
  ksynmiR140NFkB = 0.0015;
  ksynTNFa = 0.001;

  // Reactions:
  miR140_synthesis: miR140_gene => miR140_gene + miR140; ksynmiR140*miR140_gene;
  NFkB_activation: TNFa + IkB_NFkB => TNFa + NFkB; kactNFkB*TNFa*IkB_NFkB;
  NFkB_miR140_gene_binding: NFkB + miR140_gene => miR140_gene_NFkB; kbinmiR140geneNFkB*NFkB*miR140_gene;
  NFkB_miR140_gene_release: miR140_gene_NFkB => miR140_gene + NFkB; krelmiR140geneNFkB*miR140_gene_NFkB;
  miR140_synthesis_via_NFkB: miR140_gene_NFkB => miR140_gene_NFkB + miR140; ksynmiR140NFkB*miR140_gene_NFkB;
  miR140_degradation: miR140 => $Sink; kdegmiR140*miR140;
  IGFBP5_transcription: $Source => IGFBP5_mRNA; ksynIGFBP5mRNA*Source;
  IGFBP5_transcription_via_JNK: JNK_P => IGFBP5_mRNA + JNK_P; ksynIGFBP5mRNAJNK*JNK_P;
  IGFBP5_mRNA_degradation: IGFBP5_mRNA => $Sink; kdegIGFBP5mRNA*IGFBP5_mRNA;
  IGFBP5_mRNA_miR140_binding: IGFBP5_mRNA + miR140 => IGFBP5_mRNA_miR140; kbinmiR140IGFBP5mRNA*IGFBP5_mRNA*miR140;
  IGFBP5_mRNA_miR140_release: IGFBP5_mRNA_miR140 => IGFBP5_mRNA + miR140; krelmiR140IGFBP5mRNA*IGFBP5_mRNA_miR140;
  IGFBP5_mRNA_degradation_by_miR140: IGFBP5_mRNA_miR140 => miR140; kdegIGFBP5mRNAmiR140*IGFBP5_mRNA_miR140;
  IGFBP5_translation: IGFBP5_mRNA => IGFBP5_mRNA + IGFBP5; ksynIGFBP5*IGFBP5_mRNA;
  IGFBP5_degradation: IGFBP5 => $Sink; kdegIGFBP5*IGFBP5;
  IGF1_IGFBP5_binding: IGF1 + IGFBP5 => IGF1_IGFBP5; kbinIGF1IGFBP5*IGF1*IGFBP5;
  IGF1_IGFBP5_release: IGF1_IGFBP5 => IGF1 + IGFBP5; krelIGF1IGFBP5*IGF1_IGFBP5;
  AKT_phosphorylation: IGF1_IGFBP5 + AKT => IGF1_IGFBP5 + AKT_P; kphosAKT*IGF1_IGFBP5*AKT;
  AKT_dephosphorylation: AKT_P => AKT; kdephosAKT*AKT_P;
  ACAN_transcription: AKT_P => AKT_P + ACAN; ksynACAN*AKT_P;
  JNK_phosphorylation: TNFa + JNK => TNFa + JNK_P; kphosJNK*TNFa*JNK;
  JNK_dephosphorylation: JNK_P => JNK; kdephosJNK*JNK_P;
  TNFa_degradation: TNFa => $Sink; kdegTNFa*TNFa;
  TNFa_synthesis: NFkB => NFkB + TNFa; ksynTNFa*NFkB;
  IkB_synthesis: NFkB => NFkB + IkB; ksynIkB*NFkB;
  IkB_NFkB_binding: NFkB + IkB => IkB_NFkB; kbinIkBNFkB*IkB*NFkB;

  // Unit definitions:
  unit substance = item;
end
