// SBML level 2 version 4

model MODEL1705170005()
  // Proctor2017- Role of microRNAs in osteoarthritis (miR140 in osteoarthritis)
  // This model is described in the article:
  // Computer simulation models as a tool to investigate the role of microRNAs in osteoarthritis.
  // Proctor CJ, Smith GR.
  // PLoS ONE 2017; 12(11): e0187568
  // Abstract:
  // The aim of this study was to show how computational models can be used to increase our understanding of the role of microRNAs in osteoarthritis (OA) using miR-140 as an example. Bioinformatics analysis and experimental results from the literature were used to create and calibrate models of gene regulatory networks in OA involving miR-140 along with key regulators such as NF-?B, SMAD3, and RUNX2. The individual models were created with the modelling standard, Systems Biology Markup Language, and integrated to examine the overall effect of miR-140 on cartilage homeostasis. Down-regulation of miR-140 may have either detrimental or protective effects for cartilage, indicating that the role of miR-140 is complex. Studies of individual networks in isolation may therefore lead to different conclusions. This indicated the need to combine the five chosen individual networks involving miR-140 into an integrated model. This model suggests that the overall effect of miR-140 is to change the response to an IL-1 stimulus from a prolonged increase in matrix degrading enzymes to a pulse-like response so that cartilage degradation is temporary. Our current model can easily be modified and extended as more experimental data become available about the role of miR-140 in OA. In addition, networks of other microRNAs that are important in OA could be incorporated. A fully integrated model could not only aid our understanding of the mechanisms of microRNAs in ageing cartilage but could also provide a useful tool to investigate the effect of potential interventions to prevent cartilage loss.
  // This model is hosted on BioModels Database and identified by: MODEL1705170005.
  // To cite BioModels Database, please use: Chelliah V et al. BioModels: ten-year anniversary. Nucl. Acids Res. 2015, 43(Database issue):D542-8.
  // To the extent possible under law, all copyright and related or neighbouring rights to this encoded model have been dedicated to the public domain worldwide. Please refer to CC0 Public Domain Dedication for more information.

  // Compartments:
  compartment cell = 1;
  compartment nucleus = 1;
  compartment membrane = 1;
  compartment ecm = 1;

  // Species:
  substanceOnly species miR140 in cell = 450;
  substanceOnly species miR140_SMAD3_mRNA in cell = 50;
  substanceOnly species miR140_gene in cell = 2;
  substanceOnly species miR140_gene_SMAD3_P in cell = 0;
  substanceOnly species SMAD3 in cell = 250;
  substanceOnly species SMAD3_mRNA in cell = 10;
  substanceOnly species SMAD3_P in cell = 0;
  substanceOnly species SMAD7 in cell = 0;
  substanceOnly species TGFb_A in cell = 500;
  substanceOnly species TGFb_I in ecm = 0;
  substanceOnly species $Sink in cell = 0;
  substanceOnly species $Source in cell = 1;
  substanceOnly species IL1 in cell = 500;
  substanceOnly species ADAMTS5_mRNA in cell = 0;
  substanceOnly species ADAMTS5_mRNA_miR140 in cell = 0;
  substanceOnly species miR140_gene_NFkB in cell = 0;
  substanceOnly species MMP13_mRNA in cell = 25;
  substanceOnly species MMP13_mRNA_miR140 in cell = 0;
  substanceOnly species NFkB in cell = 10;
  substanceOnly species HDAC4 in cell = 500;
  substanceOnly species HDAC4_mRNA in cell = 10;
  substanceOnly species HDAC4_mRNA_miR140 in cell = 0;
  substanceOnly species HDAC4_RUNX2 in cell = 0;
  substanceOnly species HDAC4_RUNX2_gene in cell = 0;
  substanceOnly species miR140_gene_SOX9 in cell = 0;
  substanceOnly species RUNX2 in cell = 500;
  substanceOnly species RUNX2_gene in cell = 2;
  substanceOnly species SOX9 in cell = 500;
  substanceOnly species ACAN in cell = 0;
  substanceOnly species AKT in cell = 100;
  substanceOnly species AKT_P in cell = 0;
  substanceOnly species IGF1 in cell = 500;
  substanceOnly species IGF1_IGFBP5 in cell = 0;
  substanceOnly species IGFBP5 in cell = 100;
  substanceOnly species IGFBP5_mRNA in cell = 20;
  substanceOnly species IGFBP5_mRNA_miR140 in cell = 0;
  substanceOnly species IkB in cell = 0;
  species IkB_NFkB in cell = 500/cell;
  substanceOnly species JNK in cell = 100;
  substanceOnly species JNK_P in cell = 0;
  substanceOnly species TNFa in cell = 500;
  substanceOnly species ADAMTS5 in cell = 0;
  substanceOnly species COL2A1 in cell = 0;
  substanceOnly species anti_miR140 in cell = 0;
  substanceOnly species miR140_anti_miR140 in cell = 0;
  substanceOnly species MMP13 in cell = 0;
  substanceOnly species SOX9_A in cell = 0;
  substanceOnly species AggFrag in ecm = 0;
  substanceOnly species Aggrecan in ecm = 0;
  substanceOnly species Aggrecan_Collagen2 in ecm = 1000;
  substanceOnly species ColFrag in ecm = 0;
  substanceOnly species Collagen2 in ecm = 0;

  // Parameters:
  kbinmiR140geneSMAD3 = 0.005;
  kbinSMAD3mRNAmiR140 = 0.0008;
  kdegmiR140 = 8e-6;
  kdegSMAD3 = 0.00043;
  kdegSMAD3mRNA = 0.0002;
  kdegSMAD7 = 5e-5;
  kdephosSMAD3 = 6e-5;
  kinactTGFb = 0.0005;
  kphosSMAD3 = 5e-5;
  krelmiR140geneSMAD3 = 0.01;
  krelSMAD3mRNAmiR140 = 0.001;
  ksynmiR140 = 0.0018;
  ksynSMAD3 = 0.004;
  ksynSMAD3mRNA = 0.004;
  ksynSMAD7 = 0.0005;
  kbinADAMTS5mRNAmir140 = 5e-5;
  kdegADAMTS5mRNA = 0.00014;
  kdegIL1 = 0.0004;
  kdegmiR140byIL1 = 8e-7;
  krelADAMTS5mRNAmir140 = 0.01;
  ksynADAMTS5mRNA = 0.001;
  kactNFkBIL1 = 0.0005;
  kbinmiR140geneNFkB = 5e-5;
  kbinMMP13mRNAmir140 = 5e-5;
  kdegMMP13mRNAmiR140 = 8e-5;
  kinactNFkB = 5e-6;
  krelmiR140geneNFkB = 0.001;
  krelMMP13mRNAmir140 = 0.01;
  ksynMMP13mRNA = 1e-5;
  ksynmiR140NFkB = 0.0018;
  kbinHDAC4RUNX2 = 4e-5;
  kbinHDAC4mRNAmiR140 = 0.0002;
  kbinmiR140geneSOX9 = 0.002;
  kdegHDAC4mRNA = 0.001;
  kdegHDAC4 = 0.001;
  kdegRUNX2 = 1e-5;
  kinhibRUNX2 = 4e-6;
  krelHDAC4mRNAmiR140 = 0.001;
  krelHDAC4RUNX2 = 0.005;
  krelmiR140geneSOX9 = 0.001;
  krelRUNX2gene = 0.001;
  ksynHDAC4mRNA = 0.05;
  ksynHDAC4 = 0.05;
  ksynmiR140SOX9 = 0.0018;
  ksynMMP13mRNAbyRUNX2 = 4e-6;
  ksynRUNX2 = 0.15;
  kactNFkBTNFa = 0.0001;
  kbinIGF1IGFBP5 = 5e-6;
  kbinIkBNFkB = 0.001;
  kbinmiR140IGFBP5mRNA = 5e-5;
  kdegIGFBP5 = 5e-5;
  kdegIGFBP5mRNA = 1e-5;
  kdegIGFBP5mRNAmiR140 = 0.0005;
  kdegTNFa = 0.002;
  kdephosAKT = 0.01;
  kdephosJNK = 0.05;
  kphosAKT = 0.0005;
  kphosJNK = 0.05;
  krelIGF1IGFBP5 = 0.001;
  krelmiR140IGFBP5mRNA = 0.001;
  ksynACAN = 1e-7;
  ksynIGFBP5 = 8e-5;
  ksynIGFBP5mRNA = 0.02;
  ksynIGFBP5mRNAJNK = 0.0006;
  ksynIkB = 0.005;
  ksynTNFa = 0.001;
  kactSOX9 = 5e-6;
  kbinAggCol2 = 0.001;
  kdegADAMTS5 = 5e-5;
  kdegAggrecan = 1e-9;
  kdegCollagen = 1e-8;
  kdegMMP13 = 6.4e-6;
  kexportACAN = 0.0001;
  kexportCOL2A1 = 0.0001;
  kinactSOX9 = 0.0015;
  kinhibmiR140 = 0.001;
  ksynACANSMAD3 = 1e-6;
  ksynACANSOX9 = 1e-6;
  ksynADAMTS5 = 1e-5;
  ksynMMP13 = 8e-6;
  ksynCOL2A1 = 1e-8;
  ksynCOL2A1SMAD3 = 1e-7;
  ksynCOL2A1SOX9 = 1e-7;

  // Reactions:
  SMAD3_phosphorylation: TGFb_A + SMAD3 => TGFb_A + SMAD3_P; kphosSMAD3*TGFb_A*SMAD3;
  SMAD3_dephosphorylation: SMAD3_P => SMAD3; kdephosSMAD3*SMAD3_P;
  SMAD3_transcription: $Source => SMAD3_mRNA; ksynSMAD3mRNA*Source;
  SMAD3mRNA_degradation: SMAD3_mRNA => $Sink; kdegSMAD3mRNA*SMAD3_mRNA;
  SMAD3mRNA_degradation_viaMir140: miR140_SMAD3_mRNA => miR140; kdegSMAD3mRNA*miR140_SMAD3_mRNA;
  SMAD3_translation: SMAD3_mRNA => SMAD3_mRNA + SMAD3; ksynSMAD3*SMAD3_mRNA;
  SMAD3_degradation: SMAD3 => $Sink; kdegSMAD3*SMAD3;
  SMAD3_mRNA_binding_by_miR140: SMAD3_mRNA + miR140 => miR140_SMAD3_mRNA; kbinSMAD3mRNAmiR140*SMAD3_mRNA*miR140;
  SMAD3_mRNA_miR140_release: miR140_SMAD3_mRNA => miR140 + SMAD3_mRNA; krelSMAD3mRNAmiR140*miR140_SMAD3_mRNA;
  miR140_synthesis: miR140_gene => miR140_gene + miR140; ksynmiR140*miR140_gene;
  miR140_degradation: miR140 => $Sink; kdegmiR140*miR140;
  SMAD3_miR140_gene_binding: SMAD3_P + miR140_gene => miR140_gene_SMAD3_P; kbinmiR140geneSMAD3*SMAD3_P*miR140_gene;
  SMAD3_miR140_gene_release: miR140_gene_SMAD3_P => miR140_gene + SMAD3_P; krelmiR140geneSMAD3*miR140_gene_SMAD3_P;
  SMAD7_synthesis: SMAD3_P => SMAD3_P + SMAD7; ksynSMAD7*SMAD3_P;
  SMAD7_degradation: SMAD7 => $Sink; kdegSMAD7*SMAD7;
  TGFb_inactivation: TGFb_A + SMAD7 => TGFb_I; kinactTGFb*TGFb_A*SMAD7;
  IL1_degradation: IL1 => $Sink; kdegIL1*IL1;
  ADAMTS5_mRNA_synthesis: IL1 => IL1 + ADAMTS5_mRNA; ksynADAMTS5mRNA*IL1;
  ADAMTS5_mRNA_binding_by_miR140: ADAMTS5_mRNA + miR140 => ADAMTS5_mRNA_miR140; kbinADAMTS5mRNAmir140*ADAMTS5_mRNA*miR140;
  ADAMTS5_mRNA_miR140_release: ADAMTS5_mRNA_miR140 => ADAMTS5_mRNA + miR140; krelADAMTS5mRNAmir140*ADAMTS5_mRNA_miR140;
  ADAMTS5_mRNA_degradation: ADAMTS5_mRNA_miR140 => miR140; kdegADAMTS5mRNA*ADAMTS5_mRNA_miR140;
  miR140_degradation_via_IL1: miR140 + IL1 => IL1; kdegmiR140byIL1*miR140*IL1;
  NFkB_activation_by_IL1: IL1 => IL1 + NFkB; kactNFkBIL1*IL1;
  NFkB_inactivation: NFkB => $Sink; kinactNFkB*NFkB;
  NFkB_miR140_gene_binding: NFkB + miR140_gene => miR140_gene_NFkB; kbinmiR140geneNFkB*NFkB*miR140_gene;
  NFkB_miR140_gene_release: miR140_gene_NFkB => miR140_gene + NFkB; krelmiR140geneNFkB*miR140_gene_NFkB;
  miR140_synthesis_by_NFkB: miR140_gene_NFkB => miR140_gene_NFkB + miR140; ksynmiR140NFkB*miR140_gene_NFkB;
  MMP13_mRNA_synthesis: NFkB => NFkB + MMP13_mRNA; ksynMMP13mRNA*NFkB;
  MMP13_mRNA_binding_by_miR140: MMP13_mRNA + miR140 => MMP13_mRNA_miR140; kbinMMP13mRNAmir140*MMP13_mRNA*miR140;
  MMP13_mRNA_miR140_release: MMP13_mRNA_miR140 => MMP13_mRNA + miR140; krelMMP13mRNAmir140*MMP13_mRNA_miR140;
  MMP13_mRNA_degradation_by_miR140: MMP13_mRNA_miR140 => miR140; kdegMMP13mRNAmiR140*MMP13_mRNA_miR140;
  SOX9_miR140_gene_binding: SOX9_A + miR140_gene => miR140_gene_SOX9; kbinmiR140geneSOX9*SOX9_A*miR140_gene;
  SOX9_miR140_gene_release: miR140_gene_SOX9 => miR140_gene + SOX9_A; krelmiR140geneSOX9*miR140_gene_SOX9;
  miR140_synthesis_by_SOX9: miR140_gene_SOX9 => miR140_gene_SOX9 + miR140; ksynmiR140SOX9*miR140_gene_SOX9;
  RUNX2_inhibition_by_SOX9: RUNX2 + SOX9 => SOX9; kdegRUNX2*RUNX2*SOX9;
  RUNX2gene_inhibition_by_HDAC4: RUNX2_gene + HDAC4 => HDAC4_RUNX2_gene; kinhibRUNX2*RUNX2_gene*HDAC4;
  RUNX2gene_HDAC4_release: HDAC4_RUNX2_gene => RUNX2_gene + HDAC4; krelRUNX2gene*HDAC4_RUNX2_gene;
  RUNX2_synthesis: RUNX2_gene => RUNX2_gene + RUNX2; ksynRUNX2*RUNX2_gene;
  HDAC4mRNA_inhibition_by_miR140: HDAC4_mRNA + miR140 => HDAC4_mRNA_miR140; kbinHDAC4mRNAmiR140*HDAC4_mRNA*miR140;
  HDAC4_mRNA_miR140_release: HDAC4_mRNA_miR140 => HDAC4_mRNA + miR140; krelHDAC4mRNAmiR140*HDAC4_mRNA_miR140;
  HDAC4_transcription: $Source => HDAC4_mRNA; ksynHDAC4mRNA*Source;
  HDAC4_mRNA_degradation: HDAC4_mRNA => $Sink; kdegHDAC4mRNA*HDAC4_mRNA;
  HDAC4_mRNA_degradation2: HDAC4_mRNA_miR140 => miR140; kdegHDAC4mRNA*HDAC4_mRNA_miR140;
  HDAC4_translation: HDAC4_mRNA => HDAC4 + HDAC4_mRNA; ksynHDAC4mRNA*HDAC4_mRNA;
  HDAC4_degradation: HDAC4 => $Sink; kdegHDAC4*HDAC4;
  HDAC4_RUNX2_binding: HDAC4 + RUNX2 => HDAC4_RUNX2; kbinHDAC4RUNX2*HDAC4*RUNX2;
  HDAC4_RUNX2_release: HDAC4_RUNX2 => HDAC4 + RUNX2; krelHDAC4RUNX2*HDAC4_RUNX2;
  MMP13_mRNA_synthesis_by_RUNX2: RUNX2 => RUNX2 + MMP13_mRNA; ksynMMP13mRNAbyRUNX2*RUNX2;
  NFkB_activation_by_TNFa: TNFa + IkB_NFkB => TNFa + NFkB; kactNFkBTNFa*TNFa*IkB_NFkB;
  IGFBP5_transcription: $Source => IGFBP5_mRNA; ksynIGFBP5mRNA*Source;
  IGFBP5_transcription_via_JNK: JNK_P => IGFBP5_mRNA + JNK_P; ksynIGFBP5mRNAJNK*JNK_P;
  IGFBP5_mRNA_degradation: IGFBP5_mRNA => $Sink; kdegIGFBP5mRNA*IGFBP5_mRNA;
  IGFBP5_mRNA_miR140_binding: IGFBP5_mRNA + miR140 => IGFBP5_mRNA_miR140; kbinmiR140IGFBP5mRNA*IGFBP5_mRNA*miR140;
  IGFBP5_mRNA_miR140_release: IGFBP5_mRNA_miR140 => IGFBP5_mRNA + miR140; krelmiR140IGFBP5mRNA*IGFBP5_mRNA_miR140;
  IGFBP5_mRNA_degradation_by_miR140: IGFBP5_mRNA_miR140 => miR140; kdegIGFBP5mRNAmiR140*IGFBP5_mRNA_miR140;
  IGFBP5_translation: IGFBP5_mRNA => IGFBP5_mRNA + IGFBP5; ksynIGFBP5*IGFBP5_mRNA;
  IGFBP5_degradation: IGFBP5 => $Sink; kdegIGFBP5*IGFBP5;
  IGF1_IGFBP5_binding: IGF1 + IGFBP5 => IGF1_IGFBP5; kbinIGF1IGFBP5*IGF1*IGFBP5;
  IGF1_IGFBP5_release: IGF1_IGFBP5 => IGF1 + IGFBP5; krelIGF1IGFBP5*IGF1_IGFBP5;
  AKT_phosphorylation: IGF1_IGFBP5 + AKT => IGF1_IGFBP5 + AKT_P; kphosAKT*IGF1_IGFBP5*AKT;
  AKT_dephosphorylation: AKT_P => AKT; kdephosAKT*AKT_P;
  ACAN_transcription: AKT_P => AKT_P + ACAN; ksynACAN*AKT_P;
  JNK_phosphorylation: TNFa + JNK => TNFa + JNK_P; kphosJNK*TNFa*JNK;
  JNK_dephosphorylation: JNK_P => JNK; kdephosJNK*JNK_P;
  TNFa_degradation: TNFa => $Sink; kdegTNFa*TNFa;
  TNFa_synthesis: NFkB => NFkB + TNFa; ksynTNFa*NFkB;
  IkB_synthesis: NFkB => NFkB + IkB; ksynIkB*NFkB;
  IkB_NFkB_binding: NFkB + IkB => IkB_NFkB; kbinIkBNFkB*IkB*NFkB;
  ACAN_synthesis_by_SMAD3: SMAD3_P => SMAD3_P + ACAN; ksynACANSMAD3*SMAD3_P;
  COL2A1_synthesis_by_SMAD3: SMAD3_P => SMAD3_P + COL2A1; ksynCOL2A1SMAD3*SMAD3_P;
  SOX9_activation: SMAD3_P + SOX9 => SMAD3_P + SOX9_A; kactSOX9*SMAD3_P*SOX9;
  SOX9_inactivation: SOX9_A => SOX9; kinactSOX9*SOX9_A;
  ACAN_synthesis_by_SOX9: SOX9_A => SOX9_A + ACAN; ksynACANSOX9*SOX9_A;
  COL2A1_synthesis_by_SOX9: SOX9_A => SOX9_A + COL2A1; ksynCOL2A1SOX9*SOX9_A;
  COL2A1_synthesis_by_IGF1: AKT_P => AKT_P + COL2A1; ksynCOL2A1*AKT_P;
  COL2A1_to_ECM: COL2A1 => Collagen2; kexportCOL2A1*COL2A1;
  ACAN_to_ECM: ACAN => Aggrecan; kexportACAN*ACAN;
  Aggrecan_Collagen2_binding: Aggrecan + Collagen2 => Aggrecan_Collagen2; kbinAggCol2*Aggrecan*Collagen2;
  ADAMTS5_translation: ADAMTS5_mRNA => ADAMTS5_mRNA + ADAMTS5; ksynADAMTS5*ADAMTS5_mRNA;
  ADAMTS5_removal: ADAMTS5 => $Sink; kdegADAMTS5*ADAMTS5;
  MMP13_translation: MMP13_mRNA => MMP13_mRNA + MMP13; ksynMMP13*MMP13_mRNA;
  MMP13_removal: MMP13 => $Sink; kdegMMP13*MMP13;
  Aggrecan_degradation: Aggrecan_Collagen2 + ADAMTS5 => Collagen2 + ADAMTS5 + AggFrag; kdegAggrecan*Aggrecan_Collagen2*ADAMTS5;
  Collagen_degradation: Collagen2 + MMP13 => MMP13 + ColFrag; kdegCollagen*Collagen2*MMP13;
  Inhibit_miR140: anti_miR140 + miR140 => miR140_anti_miR140; kinhibmiR140*anti_miR140*miR140;

  // Unit definitions:
  unit substance = item;
end
