// SBML level 3 version 1
// dcterms:bibliographicCitation: urn:miriam:pubmed:19636014

model MODEL1708310001()
  // Claret2009 - Predicting phase III overall survival in colorectal cancer
  // This model is described in the article:
  // Model-based prediction of phase III overall survival in colorectal cancer on the basis of phase II tumor dynamics.
  // Claret L, Girard P, Hoff PM, Van Cutsem E, Zuideveld KP, Jorga K, Fagerberg J, Bruno R.
  // J. Clin. Oncol. 2009 Sep; 27(25): 4103-4108
  // Abstract:
  // PURPOSE: We developed a drug-disease simulation model to predict antitumor response and overall survival in phase III studies from longitudinal tumor size data in phase II trials. METHODS: We developed a longitudinal exposure-response tumor-growth inhibition (TGI) model of drug effect (and resistance) using phase II data of capecitabine (n = 34) and historical phase III data of fluorouracil (FU; n = 252) in colorectal cancer (CRC); and we developed a parametric survival model that related change in tumor size and patient characteristics to survival time using historical phase III data (n = 245). The models were validated in simulation of antitumor response and survival in an independent phase III study (n = 1,000 replicates) of capecitabine versus FU in CRC. RESULTS: The TGI model provided a good fit of longitudinal tumor size data. A lognormal distribution best described the survival time, and baseline tumor size and change in tumor size from baseline at week 7 were predictors (P < .00001). Predicted change of tumor size and survival time distributions in the phase III study for both capecitabine and FU were consistent with observed values, for example, 431 days (90% prediction interval, 362 to 514 days) versus 401 days observed for survival in the capecitabine arm. A modest survival improvement of 39 days (90% prediction interval, -21 to 110 days) versus 35 days observed was predicted for capecitabine. CONCLUSION: The modeling framework successfully predicted survival in a phase III trial on the basis of capecitabine phase II data in CRC. It is a useful tool to support end-of-phase II decisions and design of phase III studies.
  // This model is hosted on BioModels Database and identified by: MODEL1708310001.
  // To cite BioModels Database, please use: BioModels Database: An enhanced, curated and annotated resource for published quantitative kinetic models.
  // To the extent possible under law, all copyright and related or neighbouring rights to this encoded model have been dedicated to the public domain worldwide. Please refer to CC0 Public Domain Dedication for more information.
  // biomodels.db:MODEL1708310001
  // isDescribedBy pubmed:19636014
  // model units - substance: substance, time: time, volume: volume, area: area, length: length, extent: substance

  // Compartments:
  compartment compartment = 1 volume;

  // Species:
  species $y in compartment = y0;

  // Parameters:
  K_L = 0.021;
  lamda = 0.053;
  y0 = 200;
  K_D_0 = 0.025; K_D_0 is "K_D,0";
  Dose = 12;
  cycle_int = 21;
  N_cycle = 3;
  Dose_int1 = 0;
  Dose_int2 = 0.5;
  treatment_int = 14;
  conversion_factor = 86400;
  dose_length = 0.0625;

  // Assignment rules:
  K_D := K_D_0*exp(-lamda*time);
  rem_time := (time*conversion_factor - floor(time*conversion_factor/(cycle_int*conversion_factor))*cycle_int*conversion_factor)/conversion_factor;
  treatment_day := piecewise(1, rem_time < treatment_int, 0);
  exposure := piecewise(Dose, ((time < cycle_int*N_cycle) && (treatment_day == 1)) && ((Dose_int1 < rem_time - floor(rem_time)) && (rem_time - floor(rem_time) < dose_length)), piecewise(Dose, ((time < cycle_int*N_cycle) && (treatment_day == 1)) && ((Dose_int2 < rem_time - floor(rem_time)) && (rem_time - floor(rem_time) < Dose_int2 + dose_length)), 0));
  prediction := (y - y0)/y0;

  // Rate rules:
  y' = K_L*y - K_D*exposure*y;

  // Unit definitions:
  unit length = metre;
  unit area = metre^2;
  unit volume = litre;
  unit time = 86400 second;
  unit substance = mole;
end
