// SBML level 2 version 4
// dcterms:bibliographicCitation: http://identifiers.org/pubmed/24402117

function Rate_Law_for_reaction_for_Venom_plasma_induction_1(Venom_Absorption1, k_a_Brown)
  k_a_Brown*Venom_Absorption1;
end

function Rate_Law_for_reaction_for_Fibrinogen_decay_1(Fibrinogen1, IIa1, K_m_Fg, v_max_Fg)
  v_max_Fg*Fibrinogen1*IIa1/(K_m_Fg + IIa1);
end

function Rate_Law_for_reaction_for_Venom_plasma_decay_1(Antivenom, Venom_plasma1, d_Brown)
  d_Brown*Venom_plasma1*Antivenom;
end

function Rate_Law_for_reaction_for_IIa_production_1(BSV_K_m_lumped, Lumped1, Venom_plasma1, v_max_Lumped)
  v_max_Lumped*Lumped1*Venom_plasma1/(BSV_K_m_lumped + Venom_plasma1);
end

function Rate_Law_for_reaction_for_Fibrinogen_production_1(Fibrinogen1, d_Fg, p_Fg)
  p_Fg - d_Fg*Fibrinogen1;
end

function Rate_Law_for_reaction_for_Lumped_1(K_m_lumped, Lumped1, Venom_plasma1, d_lumped, p_lumped, v_max_Lumped)
  p_lumped - d_lumped*Lumped1 - v_max_Lumped*Lumped1*Venom_plasma1/(K_m_lumped + Venom_plasma1);
end

model Gulati2014___Simplified_model_of_fibrinogen_recovery_following_brown_snake_bite_1()
  // Gulati2014 - Simplified model of fibrinogen recovery following brown snake bite_1
  // Bridging systems biology and pharmacokinetics–pharmacodynamics has resulted in models that are highly complex and complicated. They usually contain large numbers of states and parameters and describe multiple input–output relationships. Based on any given data set relating to a specific input–output process, it is possible that some states of the system are either less important or have no influence at all. In this study, we explore a simplification of a systems pharmacology model of the coagulation network for use in describing the time course of fibrinogen recovery after a brown snake bite. The technique of proper lumping is used to simplify the 62-state systems model to a 5-state model that describes the brown snake venom–fibrinogen relationship while maintaining an appropriate mechanistic relationship. The simplified 5-state model explains the observed decline and recovery in fibrinogen concentrations well. The techniques used in this study can be applied to other multiscale models.
  // isDerivedFrom pubmed:19516255
  // isDescribedBy pubmed:24402117
  // occursIn BTO:0000089
  // hasProperty UBERON:0013076 GO:0005577 GO:0050817 mamo:MAMO_0000046
  // biomodels.db:MODEL1805090001
  // hasProperty UBERON:0013076

  // Compartments:
  compartment compartment = 1;

  // Species:
  species $Antivenom in compartment = 1;
  species $Fibrinogen_g_l in compartment; Fibrinogen_g_l is "Fibrinogen(g/l)";
  species Fibrinogen1 in compartment = 8945.5;  // isVersionOf GO:0005577
  species IIa1 in compartment = 0;  // isVersionOf EFO:0003183; isVersionOf uniprot:P00734
  species Lumped1 in compartment = 1394.4;
  species Venom_Absorption1 in compartment = 0.0075;  // isVersionOf BTO:0001439
  species Venom_plasma1 in compartment = 0;  // isVersionOf BTO:0001439

  // Parameters:
  d_IIa = 58.3;
  v_max_Lumped = 1940;
  K_m_lumped = 1.38;
  d_Fg = 0.0174;
  p_Fg = 216;
  v_max_Fg = 8.88;
  K_m_Fg = 22.9;
  d_Brown = 0.744;
  k_a_Brown = 0.854;
  BSV_d_IIa = 0.005;
  BSV_v_max_lumped = 2.1;
  BSV_K_m_lumped = 0.99;
  BSV_d_Fg = 0.53;
  BSV_F_venom = 1.4;
  sigma_prop = 0.39;
  sigma_add = 0.001;
  p_lumped = 147;
  d_lumped = 0.01;

  // Assignment rules:
  Fibrinogen_g_l := Fibrinogen1*1e-6*340;

  // Reactions:
  reaction_for_Fibrinogen_production: => Fibrinogen1; compartment*Rate_Law_for_reaction_for_Fibrinogen_production_1(Fibrinogen1, d_Fg, p_Fg);  // modifiers: IIa1
  reaction_for_IIa_production: => IIa1; compartment*Rate_Law_for_reaction_for_IIa_production_1(BSV_K_m_lumped, Lumped1, Venom_plasma1, v_max_Lumped);  // modifiers: Lumped1, Venom_plasma1
  reaction_for_Lumped: => Lumped1; compartment*Rate_Law_for_reaction_for_Lumped_1(K_m_lumped, Lumped1, Venom_plasma1, d_lumped, p_lumped, v_max_Lumped);  // modifiers: Venom_plasma1
  reaction_Venom_Absorption: Venom_Absorption1 => ; compartment*k_a_Brown*Venom_Absorption1;
  reaction_for_Venom_plasma_induction: => Venom_plasma1; compartment*Rate_Law_for_reaction_for_Venom_plasma_induction_1(Venom_Absorption1, k_a_Brown);  // modifiers: Venom_Absorption1
  reaction_for_IIa_consumbtion: IIa1 => ; compartment*d_IIa*IIa1;
  reaction_for_Venom_plasma_decay: Venom_plasma1 => ; compartment*Rate_Law_for_reaction_for_Venom_plasma_decay_1(Antivenom, Venom_plasma1, d_Brown);  // modifiers: Antivenom
  reaction_for_Fibrinogen_decay: Fibrinogen1 => ; compartment*Rate_Law_for_reaction_for_Fibrinogen_decay_1(Fibrinogen1, IIa1, K_m_Fg, v_max_Fg);  // modifiers: IIa1

  // Unit definitions:
  unit time = 3600 second;
  unit substance = 1e-9 mole;
end
