// SBML level 2 version 4
// dcterms:bibliographicCitation: urn:miriam:pubmed:15767116

model Xu2005___Blood_Coagulation_Model_of_Activated_Factors_of_Extrinsic_Pathway_and_TFPI()
  // Xu2005 - Blood Coagulation Model of Activated Factors of Extrinsic Pathway and TFPI
  // System of ODEs to describe the behaviour of the activated factors of the extrinsic pathway of blood coagulation with the addition of the TFPI-Xa complex. Mass-action kinetics used with the only exception of factor IIa production (Michaelis-Menten rate law).
  // isVersionOf GO:0007596
  // hasTaxon taxonomy:9606
  // isDescribedBy pubmed:15767116

  // Compartments:
  compartment compartment = 1;

  // Species:
  species $x1 in compartment = 0;
  species $x2 in compartment = 0;
  species $x3 in compartment = 0;
  species $x4 in compartment = 0;
  species $x5 in compartment = 0;
  species $x6 in compartment = 0;
  species $x7 in compartment = 0;

  // Parameters:
  k1 = 500;
  h1 = 0.02;
  k2 = 10;
  h2 = 3.2;
  k3 = 7;
  k31 = 7;
  h3 = 20;
  k4 = 2.2;
  h4 = 700;
  h4_prime = 0.02;
  k5 = 10;
  h5 = 3.5;
  k6 = 1200;
  km = 0.1;
  h6 = 1.3;
  k7 = 3;
  h7 = 3.5;
  beta = 0.014;

  // Rate rules:
  x1' = k1*beta - h1*x1*x4;
  x2' = k2*x1 - h2*x2;
  x3' = k3*x1 + k31*x2*x7 - h3*x3;
  x4' = k4*x3 - h4*x1*x4 - h4_prime*x4;
  x5' = k5*x6 - h5*x5;
  x6' = k6*x3*x5/(km + x5) - h6*x6;
  x7' = k7*x7 - h7*x7;

  // Unit definitions:
  unit volume = 1e-3 litre;
  unit substance = 1e-3 mole;
end
