// SBML level 2 version 4
// dcterms:bibliographicCitation: urn:miriam:doi:10.1080/17513750902829393

function Constant_flux__irreversible(v)
  v;
end
Constant_flux__irreversible is "Constant flux (irreversible)";

function Function_for_Reaction_3(rho_e, i_e)
  rho_e*i_e;
end

function Function_for_Rate__Modifier__Product(rate, modifier, product)
  rate*modifier*product;
end
Function_for_Rate__Modifier__Product is "Function for Rate, Modifier, Product";

function Function_for_Reaction_6(gamma_e, i_e, e_e)
  gamma_e*i_e*e_e;
end

function Function_for_k_a(k_a, modifier)
  k_a*modifier;
end

function Function_for_Reaction_15(gamma_e, i_e, e_a)
  gamma_e*i_e*e_a;
end

function Function_for_Rate_and_Modifier(rate, modifier)
  rate*modifier;
end

function Function_for_Reaction_18(gamma_e, i_e)
  gamma_e*i_e^2;
end

function Function_for_Rate_and_Product(rate, product)
  rate*product;
end

function Function_for_Rate_Modifier_and_Substrate(rate, modifier, substrate)
  rate*modifier*substrate;
end
Function_for_Rate_Modifier_and_Substrate is "Function for Rate,Modifier and Substrate";

model New_Model()
  // Ducrot2009 - Malaria transmission in two host types
  // The main purpose of this article is to formulate a deterministic mathematical model for the transmission of malaria that considers two host types in the human population. The first type is called "non-immune" comprising all humans who have never acquired immunity against malaria and the second type is called "semi-immune". Non-immune are divided into susceptible, exposed and infectious and semi-immune are divided into susceptible, exposed, infectious and immune. We obtain an explicit formula for the reproductive number, R(0) which is a function of the weight of the transmission semi-immune-mosquito-semi-immune, R(0a), and the weight of the transmission non-immune-mosquito-non-immune, R(0e). Then, we study the existence of endemic equilibria by using bifurcation analysis. We give a simple criterion when R(0) crosses one for forward and backward bifurcation. We explore the possibility of a control for malaria through a specific sub-group such as non-immune or semi-immune or mosquitoes
  // biomodels.db:MODEL1808280013
  // isDescribedBy doi:10.1080/17513750902829393
  // hasProperty mamo:MAMO_0000046

  // Compartments:
  compartment compartment = 1;

  // Species:
  species s_e in compartment = 0.688;
  species e_e in compartment = 0;
  species e_a in compartment = 0;
  species i_e in compartment = 0.0051;
  species i_a in compartment = 0.0025;
  species r_a in compartment = 0.0729;
  species e_v in compartment = 0.0015;
  species i_v in compartment = 0.001;
  species N_h in compartment = 396;
  species N_v in compartment = 12000;

  // Parameters:
  LAMBDA_H = 0.033;
  lambda_h = 0.00011;
  lambda_v = 0.13;
  c_ve = 0.07;
  c_va = 0.022;
  c_ev = 0.45;
  c_av = 0.35;
  ctilda_av = 0.002;
  v_e = 0.1;
  v_a = 0.009;
  v_v = 0.083;
  alpha_a = 0.01;
  alpha_e = 0.001;
  gamma_e = 1.8e-5;
  rho_e = 0.033;
  beta_a = 0.0027;
  mu_h = 1.6e-5;
  mu_2h = 3e-7;
  mu_v = 0.033;
  mu_2v = 1.28e-7;
  n_a = 0.38;
  p = 0.3;

  // Assignment rules:
  M1 := LAMBDA_H/N_h*p + lambda_h;
  M2 := LAMBDA_H/N_h + lambda_h;
  M3 := LAMBDA_H/N_h + v_e + lambda_h;
  M4 := LAMBDA_H/N_h + v_a + lambda_h;
  M5 := LAMBDA_H/N_h + lambda_h + alpha_e + gamma_e + rho_e;
  M6 := LAMBDA_H/N_h + lambda_h + alpha_a;
  M7 := LAMBDA_H/N_h + lambda_h + beta_a;
  M8 := v_v + lambda_v;
  k_a := c_va*n_a*i_v*(N_v/N_h);
  k_e := c_ve*n_a*i_v*(N_v/N_h);
  k_v := c_av*n_a*i_a + c_ev*n_a*i_e + ctilda_av*n_a*r_a;
  fh_Nh := mu_h + mu_2h*N_h;
  fv_Nv := mu_v + mu_2v*N_v;

  // Reactions:
  reaction_1: => s_e; compartment*Constant_flux__irreversible(M1);
  reaction_2: s_e => ; compartment*M2*s_e;
  reaction_3: => s_e; compartment*Function_for_Reaction_3(rho_e, i_e);  // modifiers: i_e
  reaction_4: => s_e; compartment*Function_for_Rate__Modifier__Product(gamma_e, i_e, s_e);  // modifiers: i_e
  reaction_5: s_e => e_e; compartment*k_e*s_e;
  reaction_6: => e_e; compartment*Function_for_Reaction_6(gamma_e, i_e, e_e);  // modifiers: i_e
  reaction_7: e_e => ; compartment*M3*e_e;
  reaction_8: => e_a; compartment*Constant_flux__irreversible(k_a);
  reaction_9: e_a => ; compartment*Function_for_k_a(k_a, s_e);  // modifiers: s_e
  reaction_10: e_a => ; compartment*Function_for_k_a(k_a, e_e);  // modifiers: e_e
  reaction_11: e_a => ; compartment*k_a*e_a;
  reaction_12: e_a => ; compartment*Function_for_k_a(k_a, i_e);  // modifiers: i_e
  reaction_13: e_a => ; compartment*Function_for_k_a(k_a, i_a);  // modifiers: i_a
  reaction_14: e_a => ; compartment*Function_for_k_a(k_a, r_a);  // modifiers: r_a
  reaction_15: => e_a; compartment*Function_for_Reaction_15(gamma_e, i_e, e_a);  // modifiers: i_e
  reaction_16: e_a => ; compartment*M4*e_a;
  reaction_17: => i_e; compartment*Function_for_Rate_and_Modifier(v_e, e_e);  // modifiers: e_e
  reaction_18: => i_e; compartment*Function_for_Reaction_18(gamma_e, i_e);
  reaction_19: i_e => ; compartment*M5*i_e;
  reaction_20: => i_a; compartment*Function_for_Rate_and_Modifier(v_a, e_a);  // modifiers: e_a
  reaction_21: => i_a; compartment*Function_for_Rate__Modifier__Product(gamma_e, i_e, i_a);  // modifiers: i_e
  reaction_22: i_a => ; compartment*M6*i_a;
  reaction_23: => r_a; compartment*Function_for_Rate_and_Modifier(alpha_e, i_e);  // modifiers: i_e
  reaction_24: => r_a; compartment*Function_for_Rate_and_Modifier(alpha_a, i_a);  // modifiers: i_a
  reaction_25: => r_a; compartment*Function_for_Rate__Modifier__Product(gamma_e, i_e, r_a);  // modifiers: i_e
  reaction_26: r_a => ; compartment*M7*r_a;
  reaction_27: => e_v; compartment*Constant_flux__irreversible(k_v);
  reaction_28: e_v => ; compartment*k_v*e_v;
  reaction_29: => e_v; compartment*Function_for_Rate_and_Modifier(k_v, i_v);  // modifiers: i_v
  reaction_30: e_v => ; compartment*M8*e_v;
  reaction_31: => i_v; compartment*Function_for_Rate_and_Modifier(v_v, e_v);  // modifiers: e_v
  reaction_32: i_v => ; compartment*lambda_v*i_v;
  reaction_33: => N_h; compartment*Constant_flux__irreversible(LAMBDA_H);
  reaction_34: => N_h; compartment*Function_for_Rate_and_Product(lambda_h, N_h);
  reaction_35: N_h => ; compartment*fh_Nh*N_h;
  reaction_36: N_h => ; compartment*Function_for_Rate_Modifier_and_Substrate(gamma_e, i_e, N_h);  // modifiers: i_e
  reaction_37: => N_v; compartment*Function_for_Rate_and_Product(lambda_v, N_v);
  reaction_38: N_v => ; compartment*fv_Nv*N_v;

  // Unit definitions:
  unit volume = 1e-3 litre;
  unit time = 86400 second;
  unit substance = 1e-3 mole;
end
