// SBML level 2 version 4

model New_Model()
  // Nampala2013 - Liver enzyme elevation in HIV mono-infection
  // the model depicts a unique endemic equilibrium with a transcritical bifurcation when the basic reproductive number is unity.
  // hasProperty mamo:MAMO_0000046

  // Compartments:
  compartment compartment = 1;

  // Species:
  species $T_c in compartment = 500;
  species $E in compartment = 10;
  species $I_c in compartment = 0;
  species $T_h in compartment = 5000;
  species $I_h in compartment = 0;
  species $L in compartment = 5;
  species $V in compartment = 1;
  species $A in compartment = 0;

  // Parameters:
  lambda1 = 10;
  d1 = 0.01;
  p = 0.3;
  beta1 = 0.005;
  alpha = 0.01;
  pi = 0.23;
  d2 = 0.5;
  k2 = 0.4;
  lambda2 = 100;
  d3 = 0.002;
  beta2 = 0.005;
  d4 = 0.05;
  k3 = 1;
  k4 = 2.5;
  d5 = 0.15;
  xi = 1;
  n = 100;
  d6 = 2;
  k5 = 1000;
  d7 = 0.25;

  // Rate rules:
  T_c' = lambda1 - d1*T_c - (1 - p)*beta1*T_c*V + alpha*E;
  E' = (1 - p)*beta1*T_c*V - d1*E - (alpha + pi)*E;
  I_c' = pi*E - (d1 + d2 + k2*L)*I_c;
  T_h' = lambda2 - d3*T_h - p*beta2*T_h*V;
  I_h' = p*beta2*T_h*V - d4*I_h - k3*I_h*L;
  L' = k4*I_c*L/(1 + xi*L) - d5*L;
  V' = n*d2*I_c - d6*V;
  A' = k5*(d4*I_h + k3*I_h*L) - d7*A;

  // Unit definitions:
  unit volume = 1e-3 litre;
  unit time = 86400 second;
  unit substance = 1e-3 mole;
end
