// SBML level 2 version 4
// dcterms:bibliographicCitation: urn:miriam:pubmed:27679506

model Smith2016_Combination_therapy_to_prevent_bacterial_coinfection_during_influenza()
  // Smith2016-Combination therapy to prevent bacterial coinfection during influenza.
  // Secondary bacterial infections (SBIs) exacerbate influenza-associated disease and mortality. Antimicrobial agents can reduce the severity of SBIs, but many have limited efficacy or cause adverse effects. Thus, new treatment strategies are needed. Kinetic models describing the infection process can help determine optimal therapeutic targets, the time scale on which a drug will be most effective, and how infection dynamics will change under therapy. To understand how different therapies perturb the dynamics of influenza infection and bacterial coinfection and to quantify the benefit of increasing a drug’s efficacy or targeting a different infection process, I analyzed data from mice treated with an antiviral, an antibiotic, or an immune modulatory agent with kinetic models. The results suggest that antivirals targeting the viral life cycle are most efficacious in the first 2 days of infection, potentially because of an improved immune response, and that increasing the clearance of infected cells is important for treatment later in the infection. For a coinfection, immunotherapy could control low bacterial loads with as little as 20 % efficacy, but more effective drugs would be necessary for high bacterial loads. Antibiotics targeting bacterial replication and administered 10 h after infection would require 100 % efficacy, which could be reduced to 40 % with prophylaxis. Combining immunotherapy with antibiotics could substantially increase treatment success. Taken together, the results suggest when and why some therapies fail, determine the efficacy needed for successful treatment, identify potential immune effects, and show how the regulation of underlying mechanisms can be used to design new therapeutic strategies.
  // Model is encoded by Ruby and submitted to BioModels by Ahmad Zyoud
  // biomodels.db:MODEL1812040005
  // occursIn BTO:0005810
  // hasTaxon taxonomy:9606
  // isDescribedBy pubmed:27679506
  // hasProperty ncit:C15262 ncit:C258 ncit:C281 omit:0027719 ncit:C53482 mamo:MAMO_0000046

  // Compartments:
  compartment compartment = 1;

  // Species:
  species $T in compartment = 10000000;
  species $I1 in compartment = 0;
  species $I2 in compartment = 0;
  species $V in compartment = 2;
  species $P in compartment = 0;

  // Parameters:
  beta = 2.8e-6;
  k = 4;
  delta = 0.89;
  p = 25.1;
  c = 28.4;
  r = 27;
  K_P = 230000000;
  gamma_MA = 0.000135;
  n = 5;
  x = 2;
  M_Astar = 1000000;
  phi = 0.87;
  K_PV = 1800;
  a = 0.0012;
  z = 0.5;
  psi = 1.2e-8;
  mu = 5.2e-10;
  epsilon_v = 0;
  epsilon_t = 0.68;
  epsilon_g = 0;
  epsilon_c = 0;
  epsilon_a = 11.35;
  epsilon_i = 3;

  // Assignment rules:
  f_P_MAstar := n^x*M_Astar/(P^x + n^x*M_Astar);
  phi_hat := phi*V/(K_PV + V);
  a_hat := a*P^z;

  // Rate rules:
  T' = -beta*T*V;
  I1' = beta*T*V - k*I1 - mu*P*I1;
  I2' = k*I1 - delta*I2 - mu*P*I2;
  V' = p*I2*(1 + a_hat) - c*V;
  P' = r*P*(1 - P/(K_P*(1 + psi*V))) - gamma_MA*f_P_MAstar*M_Astar*P*(1 - phi_hat);

  // Unit definitions:
  unit volume = 1e-3 litre;
  unit time = 86400 second;
  unit substance = 1e-3 mole;
end
