// SBML level 2 version 4

model New_Model()
  // Mwasa2011 - Cholera model with public health interventions
  // Mathematical analysis of a cholera model with public health interventions
  // hasProperty mamo:MAMO_0000046

  // Compartments:
  compartment compartment = 1;

  // Species:
  species $S in compartment = 1000;
  species $E in compartment = 900;
  species $V in compartment = 800;
  species $I in compartment = 500;
  species $Q in compartment = 390;
  species $T in compartment = 150;
  species $R in compartment = 0;
  species $B in compartment = 1000000;

  // Parameters:
  LAMBDA = 15.18535;
  mu = 0.185;
  beta = 0.2143;
  sigma1 = 0.015;
  sigma2 = 0.0001;
  alpha = 0.2;
  theta = 0.005;
  H = 1000000000;
  delta = 0.005;
  a = 0.003;
  phi = 0.07;
  omega = 0.003;
  gamma = 0.005;
  p = 0.15;
  epsilon = 0.003;
  q = 0.002;
  psi = 0.008;
  tau = 0.002;
  e = 100;
  K_B = 10000000;
  n = 0.73;

  // Assignment rules:
  m := n + 0.33;

  // Rate rules:
  S' = LAMBDA + omega*V + epsilon*E + a*R - (mu + psi + phi + beta*B/(H + B))*S;
  E' = psi*S - (mu + epsilon + gamma + q*beta*(1 - tau)*B/(H + B))*E;
  V' = phi*S - (omega + mu + p*beta*B/(H + B))*V;
  I' = theta*Q + gamma*E + (S + p*V)*(beta*B/(H + B)) - (delta + mu + sigma1)*I;
  Q' = q*beta*(1 - tau)*B/(H + B)*E - (theta + mu)*Q;
  T' = delta*I - (mu + alpha + sigma2)*T;
  R' = alpha*T - (a + mu)*R;
  B' = (n*(1 - B/K_B) - m)*B + e*I;

  // Unit definitions:
  unit volume = 1e-3 litre;
  unit time = 86400 second;
  unit substance = 1e-3 mole;
end
