// SBML level 2 version 4

function Constant_flux__irreversible(v)
  v;
end
Constant_flux__irreversible is "Constant flux (irreversible)";

function Association_and_nuclear_import_of_MCM_and_CDT1_0(k, C1, C2, KM1)
  k*C1*C2/(KM1 + C1);
end

function Association_of_CDC45_and_Pre_RC(k, C1, C2, C3, KM2)
  k*C1*C2*C3/(KM2 + C2);
end
Association_of_CDC45_and_Pre_RC is "Association of CDC45 and Pre-RC";

function Phosphorylation_of_ORC_0(k1, C, cat, k2)
  k1*C/(1 + (cat/k2)^5);
end

model A_quantitative_model_of_the_initiation_of_DNA_replication_in_Saccharomyces_cerevisiae_predicts_the_effects_of_system_perturbations()
  // Requires input from Chen2004(BIOMD0000000056) model but did not work correctly even after integrating both models.
  // hasProperty mamo:MAMO_0000046

  // Compartments:
  compartment Nucleus = 1;
  compartment Cytosol = 1;

  // Species:
  species CDC6 in Nucleus = 1;
  species DBF4 in Nucleus = 1;
  species $ORC in Nucleus;
  species ORC_CDC6 in Nucleus = 0;
  species CDT1 in Nucleus = 1;
  species MCM in Nucleus = 1;
  species MCM_CDT1 in Nucleus = 0;
  species ORC_CDC6_MCM in Nucleus = 0;
  species ORC_MCM in Nucleus = 0;
  species ORC_MCM_DBF4 in Nucleus = 0;
  species $CDC45 in Nucleus;
  species ORC_MCM_DBF4_CDC45 in Nucleus = 0;
  species CDC45_MCM in Nucleus = 0;
  species ORC_P in Nucleus = 300;
  species $ORC_Total in Nucleus = 332; ORC_Total is "ORC-Total";
  species $CDT1_Total in Nucleus = 332; CDT1_Total is "CDT1-Total";
  species $MCM_Total in Nucleus = 332; MCM_Total is "MCM-Total";
  species $CDC45_Total in Nucleus = 332; CDC45_Total is "CDC45-Total";
  species $CDT1c in Cytosol;
  species $MCMc in Cytosol;
  species CLB5 in Nucleus = 1;

  // Parameters:
  k1 = 15.982;
  k2 = 0.001;
  k3 = 1368.22;
  k4 = 2.44;
  k5 = 0.016;
  k6 = 1.015;
  k7 = 275.675;
  k8 = 1.732;
  k9 = 100.881;
  k9r = 1042.739;
  k10 = 936.745;
  k10r = 352.504;
  k11 = 885.147;
  k12 = 0.568;
  k12r = 192.628;
  k13 = 0.0528;
  k14 = 0.237;
  k15 = 0.097;
  k16 = 3.196;
  k17 = 13.313;
  k18 = 2.497;
  k5r = 675.422;
  KM1 = 195.302;
  KM2 = 8.248;

  // Assignment rules:
  ORC := ORC_Total - ORC_CDC6 - ORC_CDC6_MCM - ORC_MCM - ORC_MCM_DBF4 - ORC_MCM_DBF4_CDC45 - ORC_P;
  CDC45 := CDC45_Total - ORC_MCM_DBF4_CDC45 - CDC45_MCM;
  CDT1c := CDT1_Total - CDT1;
  MCMc := MCM_Total - MCM - ORC_CDC6_MCM - ORC_MCM - ORC_MCM_DBF4 - ORC_MCM_DBF4_CDC45 - CDC45_MCM - MCM_CDT1;

  // Reactions:
  Expression_of_CDC6: => CDC6; Nucleus*Constant_flux__irreversible(k1);
  Degradation_of_CDC6: CDC6 + CLB5 => CLB5; Nucleus*k2*CDC6*CLB5;
  Expression_of_DBF4: => DBF4; Nucleus*Constant_flux__irreversible(k3);
  Degradation_of_DBF4: DBF4 => ; Nucleus*k4*DBF4;
  Association_of_ORC_and_CDC6: $ORC + CDC6 -> ORC_CDC6; Nucleus*(k5*ORC*CDC6 - k5r*ORC_CDC6);
  Association_and_nuclear_import_of_MCM_and_CDT1: $MCMc + $CDT1c => MCM_CDT1; Association_and_nuclear_import_of_MCM_and_CDT1_0(k6, MCMc, CDT1c, KM1);
  Loading_of_MCM_by_CDT1: MCM_CDT1 + ORC_CDC6 => ORC_CDC6_MCM + CDT1; Nucleus*k7*MCM_CDT1*ORC_CDC6;
  Nuclear_export_of_CDT1: CDT1 + CLB5 => $CDT1c + CLB5; k8*CDT1*CLB5;
  Dissociation_of_nuclear_MCM_CDT1_complex: MCM_CDT1 -> MCM + CDT1; Nucleus*(k9*MCM_CDT1 - k9r*MCM*CDT1); Dissociation_of_nuclear_MCM_CDT1_complex is "Dissociation of nuclear MCM-CDT1 complex";
  Dissociation_of_CDC6_from_Pre_RC: ORC_CDC6_MCM -> CDC6 + ORC_MCM; Nucleus*(k10*ORC_CDC6_MCM - k10r*CDC6*ORC_MCM); Dissociation_of_CDC6_from_Pre_RC is "Dissociation of CDC6 from Pre-RC";
  Dissociatino_of_ORC_and_MCM_from_Pre_RC: ORC_MCM => $ORC + MCM; Nucleus*k11*ORC_MCM; Dissociatino_of_ORC_and_MCM_from_Pre_RC is "Dissociatino of ORC and MCM from Pre-RC";
  Association_of_DBF4_and_the_Pre_RC: ORC_MCM + DBF4 -> ORC_MCM_DBF4; Nucleus*(k12*ORC_MCM*DBF4 - k12r*ORC_MCM_DBF4); Association_of_DBF4_and_the_Pre_RC is "Association of DBF4 and the Pre-RC";
  Association_of_CDC45_and_the_Pre_RC: $CDC45 + ORC_MCM_DBF4 => ORC_MCM_DBF4_CDC45; Nucleus*Association_of_CDC45_and_Pre_RC(k13, ORC_MCM_DBF4, CDC45, CLB5, KM2); Association_of_CDC45_and_the_Pre_RC is "Association of CDC45 and the Pre-RC";  // modifiers: CLB5
  Origin_firing: ORC_MCM_DBF4_CDC45 => DBF4 + CDC45_MCM + ORC_P; Nucleus*k14*ORC_MCM_DBF4_CDC45;
  Breakup_of_the_elongation_fork: CDC45_MCM => MCM + $CDC45; Nucleus*k15*CDC45_MCM;
  Nuclear_export_of_MCM: MCM + CLB5 => $MCMc + CLB5; k16*MCM*CLB5;
  Phosphorylation_of_ORC: ORC_P => $ORC; Nucleus*Phosphorylation_of_ORC_0(k17, ORC_P, CLB5, k18);  // modifiers: CLB5

  // Unit definitions:
  unit volume = 1e-3 litre;
  unit time = 60 second;
  unit substance = item;
end
