// SBML level 2 version 4
// dcterms:bibliographicCitation: Reduced model of blood coagulation urn:miriam:pubmed:31161687

model New_Model()
  // Hansen2019 - Seven species reduced model of blood coagulation
  // its a seven species reduced model of Hockin 2002. Model uses different level of reduction (5,7,9,11) and testing the best alignment with Hockin model results).
  // isDescribedBy pubmed:31161687
  // hasProperty GO:0007596
  // hasProperty mamo:MAMO_0000046
  // hasTaxon taxonomy:9606

  // Compartments:
  compartment compartment = 1;

  // Species:
  species Xa_Va in compartment = 0;
  species IIa in compartment = 0;
  species TF in compartment = 1e-11;
  species V in compartment = 2e-8;
  species X in compartment = 1.6e-7;
  species II in compartment = 1.4e-6;
  species IIa_ATIII in compartment = 0;

  // Parameters:
  IIa_nM has unit_0;

  // Assignment rules:
  IIa_nM := IIa*1000000000;

  // Reactions:
  Reaction_1: TF + IIa + X + V => Xa_Va; compartment*Reaction_1_k1*TF*IIa*X*V;
    Reaction_1_k1 = 6.93938e20;
  Reaction_2: TF + X + II => TF + X + IIa; compartment*Reaction_2_k1*TF*X*II;
    Reaction_2_k1 = 3494.44;
  Reaction_3: Xa_Va + II => Xa_Va + IIa; compartment*Reaction_3_k1*Xa_Va*II;
    Reaction_3_k1 = 148266000;
  Reaction_4: IIa => IIa_ATIII; compartment*Reaction_4_k1*IIa;
    Reaction_4_k1 = 0.0282183;

  // Unit definitions:
  unit volume = 1e-3 litre;
  unit unit_0 = 1e-9 mole; unit_0 is "nmol";
end
