// SBML level 2 version 4
// dcterms:bibliographicCitation: urn:miriam:pubmed:16140967

function Constant_flux__irreversible(v)
  v;
end
Constant_flux__irreversible is "Constant flux (irreversible)";

function Function_for_Tumor_Growth(a, T, b)
  a*T*(1 - b*T);
end

function Function_for_L_Inactivation_Tumor(q, L, T)
  q*L*T;
end

function Function_for_L_Recruitment_Tumor(L, j, D, k)
  L*j*(D^2/(k + D^2));
end

function Function_for_NK_Recruitment_Tumor(N, g, T, h)
  N*g*T^2/(h + T^2);
end

function Function_for_NK_Inactivation_Tumor(p, N, T)
  p*N*T;
end

function Function_for_Tumor_Killing_NK(c, N, T)
  c*N*T;
end

function Function_for_L_Formation_Tumor_Stimulated(r, N, T)
  r*N*T;
end

model dePillis2005___A_validated_mathematical_model_of_cell_mediated_immune_response_to_tumor_growth()
  // dePillis2005 - A validated mathematical model of cell-mediated immune response to tumor growth
  // This model describes interactions between a tumour and the immune system, with specific emphasis on the role of natural killer and CD8-positive T cells in tumor surveillance. The model features descriptions of tumor-immune cell interactions using ODEs, which allow the prediction of tumor growth, response, and interaction rates.
  // isVersionOf GO:0002424
  // isVersionOf mamo:MAMO_0000046
  // hasTaxon taxonomy:10090
  // isDescribedBy pubmed:16140967

  // Compartments:
  compartment compartment = 1;  // isVersionOf ncit:C94498

  // Species:
  species T in compartment = 100;  // ncit:C12922
  species N in compartment = 1000;  // CL:0000623
  species L in compartment = 0;  // isVersionOf ncit:C12542

  // Parameters:
  a = 0.514;
  b = 1.02e-9;
  c = 3.23e-7;
  d = 1.43;
  lambda = 0.58;
  s = 2.73;
  sigma = 13000;
  f = 0.0412;
  g = 0.025;
  h = 20200000;
  p = 1e-7;
  m = 0.02;
  j = 0.0375;
  k = 20200000;
  q = 3.42e-10;
  r = 1.1e-7;
  Tumor_Cell_Surface_Area = 3e-7;
  ModelValue_17_0 = Tumor_Cell_Surface_Area; ModelValue_17_0 is "Initial for Tumor_Cell_Surface_Area";
  ModelValue_3_0 = d; ModelValue_3_0 is "Initial for d";
  ModelValue_4_0 = lambda; ModelValue_4_0 is "Initial for lambda";
  ModelValue_5_0 = s; ModelValue_5_0 is "Initial for s";

  // Assignment rules:
  Tumor_Killing_CD8_Term := ModelValue_3_0*T*((L/T)^ModelValue_4_0/(ModelValue_5_0 + (L/T)^ModelValue_4_0));
  Mean_Tumor_Surface := T*ModelValue_17_0;

  // Reactions:
  Tumor_Growth: => T; compartment*Function_for_Tumor_Growth(a, T, b);  // isVersionOf ncit:C18081
  Tumor_Killing_NK: T => ; compartment*Function_for_Tumor_Killing_NK(c, N, T);  // modifiers: N; GO:0042267
  Tumor_Killing_CD8: T => ; compartment*Constant_flux__irreversible(Tumor_Killing_CD8_Term);  // modifiers: L; isVersionOf ncit:C18243; isVersionOf GO:0001906
  NK_Formation_Constant: => N; compartment*Constant_flux__irreversible(sigma);  // isVersionOf GO:0045123
  NK_Death_Natural: N => ; compartment*f*N;  // isVersionOf GO:0008219
  NK_Inactivation_Tumor: N => ; compartment*Function_for_NK_Inactivation_Tumor(p, N, T);  // modifiers: T; isVersionOf GO:0051134
  NK_Recruitment_Tumor: => N; compartment*Function_for_NK_Recruitment_Tumor(N, g, T, h);  // modifiers: T; isVersionOf GO:0035747
  L_Death_Natural: L => ; compartment*m*L;  // isVersionOf GO:0008219
  L_Recruitment_Tumor: => L; compartment*Function_for_L_Recruitment_Tumor(L, j, Tumor_Killing_CD8_Term, k);  // isVersionOf GO:0072683
  L_Inactivation_Tumor: L => ; compartment*Function_for_L_Inactivation_Tumor(q, L, T);  // modifiers: T; isVersionOf GO:0050868
  L_Formation_Tumor_Stimulated: => L; compartment*Function_for_L_Formation_Tumor_Stimulated(r, N, T);  // modifiers: N, T; isVersionOf GO:0072683

  // Unit definitions:
  unit volume = 1e-3 litre;
  unit substance = 1e-3 mole;
end
