// SBML level 2 version 4
// dcterms:bibliographicCitation: urn:miriam:doi:10.3934/dcdsb.2004.4.39

function Function_for_Tumor_Clearance_Immune(a, E, T, g_2)
  a*E*T/(g_2 + T);
end

function Function_for_IL_2_Production(p_3, E, T, g_4, alpha, S)
  p_3*E*T/((g_4 + T)*(1 + alpha*S));
end
Function_for_IL_2_Production is "Function_for_IL-2_Production";

function Function_for_Tumour_Growth(r, T, K)
  r*T*(1 - T/K);
end

function Function_for_Tumour_Growth_Stimulation_TGF_B(p_2, S, T, g_3)
  p_2*S*T/(g_3 + S);
end
Function_for_Tumour_Growth_Stimulation_TGF_B is "Function_for_Tumour_Growth_Stimulation_TGF-B";

function Function_for_Effector_Cell_Proliferation(E, I, g_1, p_1, q_1, S, q_2)
  E*I/(g_1 + I)*(p_1 - q_1*S/(q_2 + S));
end

function Function_for_TGF_B_Production(p_4, T, tau_c)
  p_4*T^2/(tau_c^2 + T^2);
end
Function_for_TGF_B_Production is "Function_for_TGF-B_Production";

function Function_for_Effector_Recruitment(c, T, gamma, S)
  c*T/(1 + gamma*S);
end

model Arciero2004___A_mathematical_model_of_tumor_immune_evasion_and_siRNA_treatment()
  // Arciero2004 - A mathematical model of tumor-immune evasion and siRNA treatment
  // This is a mathematical model consisting of a system of nonlinear ordinary differential equations describing tumor cells and immune effectors, as well as the immuno-stimulatory and suppressive cytokines IL-2 and TGF-Beta.
  // isDescribedBy doi:10.3934/dcdsb.2004.4.39
  // isDerivedFrom pubmed:9785481
  // hasProperty mamo:MAMO_0000046
  // hasProperty ncit:C17930
  // hasProperty ncit:C2191
  // hasProperty ncit:C98275

  // Compartments:
  compartment compartment = 1;

  // Species:
  species E in compartment = 1000;
  species T in compartment = 1;
  species I in compartment = 1000;
  species S in compartment = 0;

  // Parameters:
  mu_1 = 0.03;
  p_1 = 0.1245;
  g_1 = 20000000;
  c = 5e-6;
  q_1 = 0.1121;
  q_2 = 2000000;
  r = 0.18;
  K = 1000000000;
  a = 1;
  g_2 = 100000;
  p_2 = 0.27;
  g_3 = 20000000;
  p_3 = 5;
  g_4 = 1000;
  mu_2 = 10;
  alpha = 0.001;
  mu_3 = 10;
  tau_c = 1000000;
  p_4 = 5e-5;
  gamma = 1;

  // Reactions:
  Effector_Recruitment: => E; compartment*Function_for_Effector_Recruitment(c, T, gamma, S);  // modifiers: T, S
  Effector_Cell_Death: E => ; compartment*mu_1*E;
  Effector_Cell_Proliferation: => E; compartment*Function_for_Effector_Cell_Proliferation(E, I, g_1, p_1, q_1, S, q_2);  // modifiers: I, S
  Tumour_Growth: => T; compartment*Function_for_Tumour_Growth(r, T, K);
  Tumor_Clearance_Immune: T => ; compartment*Function_for_Tumor_Clearance_Immune(a, E, T, g_2);  // modifiers: E
  Tumour_Growth_Stimulation_TGF_B: => T; compartment*Function_for_Tumour_Growth_Stimulation_TGF_B(p_2, S, T, g_3); Tumour_Growth_Stimulation_TGF_B is "Tumour_Growth_Stimulation_TGF-B";  // modifiers: S
  IL_2_Production: => I; compartment*Function_for_IL_2_Production(p_3, E, T, g_4, alpha, S); IL_2_Production is "IL-2_Production";  // modifiers: E, T, S
  IL_2_Decay: I => ; compartment*mu_2*I; IL_2_Decay is "IL-2_Decay";
  TGF_B_Production: => S; compartment*Function_for_TGF_B_Production(p_4, T, tau_c); TGF_B_Production is "TGF-B_Production";  // modifiers: T
  TGF_B_Decay: S => ; compartment*mu_3*S; TGF_B_Decay is "TGF-B_Decay";

  // Unit definitions:
  unit volume = 1e-3 litre;
  unit substance = 1e-3 mole;
end
