// SBML level 2 version 4
// dcterms:bibliographicCitation: urn:miriam:pubmed:17486138

function Function_for_txn_a(cell, tr2a)
  tr2a/cell;
end

function Function_for_mdeg_a(IkBa_mRNA, cell, tr3a)
  tr3a*IkBa_mRNA*cell/cell;
end

function Function_for_int_ai(IKK, IkBaIKK, IkBa_cytoplasm, a1, cell, d1_1)
  (a1*IkBa_cytoplasm*cell*IKK*cell - d1_1*IkBaIKK*cell)/cell;
end

function Function_for_int_an(IkBaNFkB_cytoplasm, IkBa_cytoplasm, NFkB_cytoplasm, a4_1, cell, d4_1)
  (a4_1*IkBa_cytoplasm*cell*NFkB_cytoplasm*cell - d4_1*IkBaNFkB_cytoplasm*cell)/cell;
end

function Function_for_int_an_n(IkBaNFkB_nucleus, IkBa_nucleus, NFkB_nucleus, a4_2, cell, d4_2)
  (a4_2*IkBa_nucleus*cell*NFkB_nucleus*cell - d4_2*IkBaNFkB_nucleus*cell)/cell;
end

function Function_for_tsl_a(IkBa_mRNA, cell, tr1a)
  tr1a*IkBa_mRNA*cell/cell;
end

function Function_for_deg_a(IkBa_cytoplasm, cell, deg1_c)
  deg1_c*IkBa_cytoplasm*cell/cell;
end

function Function_for_deg_a_n(IkBa_nucleus, cell, deg1_n)
  deg1_n*IkBa_nucleus*cell/cell;
end

function Function_for_deg_ain(IkBaIKKNFkB, cell, r4)
  r4*IkBaIKKNFkB*cell/cell;
end

function Function_for_loc_an(IkBaNFkB_nucleus, cell, k2_a)
  k2_a*IkBaNFkB_nucleus*cell/cell;
end

function Function_for_deg_an_n(IkBaNFkB_nucleus, cell, deg4_n)
  deg4_n*IkBaNFkB_nucleus*cell/cell;
end

function Function_for_deg_ai(IkBaIKK, cell, r1)
  r1*IkBaIKK*cell/cell;
end

function Function_for_loc_b(IkBb_cytoplasm, IkBb_nucleus, cell, tp1b, tp2b)
  (tp1b*IkBb_cytoplasm*cell - tp2b*IkBb_nucleus*cell)/cell;
end

function Function_for_deg_bi(IkBbIKK, cell, r2)
  r2*IkBbIKK*cell/cell;
end

function Function_for_loc_bn(IkBbNFkB_nucleus, cell, k2_b)
  k2_b*IkBbNFkB_nucleus*cell/cell;
end

function Function_for_int_2bin(IkBbIKK, IkBbIKKNFkB, NFkB_cytoplasm, a5_3, cell, d5_3)
  (a5_3*IkBbIKK*cell*NFkB_cytoplasm*cell - d5_3*IkBbIKKNFkB*cell)/cell;
end

function Function_for_tsl_b(IkBb_mRNA, cell, tr1b)
  tr1b*IkBb_mRNA*cell/cell;
end

function Function_for_int_bn_n(IkBbNFkB_nucleus, IkBb_nucleus, NFkB_nucleus, a5_2, cell, d5_2)
  (a5_2*IkBb_nucleus*cell*NFkB_nucleus*cell - d5_2*IkBbNFkB_nucleus*cell)/cell;
end

function Function_for_deg_b_n(IkBb_nucleus, cell, deg2_n)
  deg2_n*IkBb_nucleus*cell/cell;
end

function Function_for_int_2bni(IKK, IkBbIKKNFkB, IkBbNFkB_cytoplasm, a8, cell, d2_2)
  (a8*IkBbNFkB_cytoplasm*cell*IKK*cell - d2_2*IkBbIKKNFkB*cell)/cell;
end

function Function_for_int_bi(IKK, IkBbIKK, IkBb_cytoplasm, a2, cell, d2_1)
  (a2*IkBb_cytoplasm*cell*IKK*cell - d2_1*IkBbIKK*cell)/cell;
end

function Function_for_loc_n(NFkB_cytoplasm, NFkB_nucleus, cell, k1_1, k1_2)
  (k1_2*NFkB_cytoplasm*cell - k1_1*NFkB_nucleus*cell)/cell;
end

function Function_for_deg_an(IkBaNFkB_cytoplasm, cell, deg4_c)
  deg4_c*IkBaNFkB_cytoplasm*cell/cell;
end

function Function_for_int_2ain(IkBaIKK, IkBaIKKNFkB, NFkB_cytoplasm, a4_3, cell, d4_3)
  (a4_3*IkBaIKK*cell*NFkB_cytoplasm*cell - d4_3*IkBaIKKNFkB*cell)/cell;
end

function Function_for_int_2ani(IKK, IkBaIKKNFkB, IkBaNFkB_cytoplasm, a7, cell, d1_2)
  (a7*IkBaNFkB_cytoplasm*cell*IKK*cell - d1_2*IkBaIKKNFkB*cell)/cell;
end

function Function_for_loc_a(IkBa_cytoplasm, IkBa_nucleus, cell, tp1a, tp2a)
  (tp1a*IkBa_cytoplasm*cell - tp2a*IkBa_nucleus*cell)/cell;
end

function Function_for_deg_bn_n(IkBbNFkB_nucleus, cell, deg5_n)
  deg5_n*IkBbNFkB_nucleus*cell/cell;
end

function Function_for_int_bn(IkBbNFkB_cytoplasm, IkBb_cytoplasm, NFkB_cytoplasm, a5_1, cell, d5_1)
  (a5_1*IkBb_cytoplasm*cell*NFkB_cytoplasm*cell - d5_1*IkBbNFkB_cytoplasm*cell)/cell;
end

function Function_for_mdeg_b(IkBb_mRNA, cell, tr3b)
  tr3b*IkBb_mRNA*cell/cell;
end

function Function_for_deg_bin(IkBbIKKNFkB, cell, r5)
  r5*IkBbIKKNFkB*cell/cell;
end

function Function_for_deg_b(IkBb_cytoplasm, cell, deg2_c)
  deg2_c*IkBb_cytoplasm*cell/cell;
end

function Function_for_deg_bn(IkBbNFkB_cytoplasm, cell, deg5_c)
  deg5_c*IkBbNFkB_cytoplasm*cell/cell;
end

function Function_for_txn_b(cell, tr2b)
  tr2b/cell;
end

function Function_for_int_2ein(IkBeIKK, IkBeIKKNFkB, NFkB_cytoplasm, a6_3, cell, d6_3)
  (a6_3*IkBeIKK*cell*NFkB_cytoplasm*cell - d6_3*IkBeIKKNFkB*cell)/cell;
end

function Function_for_deg_en_n(IkBeNFkB_nucleus, cell, deg6_n)
  deg6_n*IkBeNFkB_nucleus*cell/cell;
end

function Function_for_loc_en(IkBeNFkB_nucleus, cell, k2_e)
  k2_e*IkBeNFkB_nucleus*cell/cell;
end

function Function_for_loc_e(IkBe_cytoplasm, IkBe_nucleus, cell, tp1e, tp2e)
  (tp1e*IkBe_cytoplasm*cell - tp2e*IkBe_nucleus*cell)/cell;
end

function Function_for_int_en(IkBeNFkB_cytoplasm, IkBe_cytoplasm, NFkB_cytoplasm, a6_1, cell, d6_1)
  (a6_1*IkBe_cytoplasm*cell*NFkB_cytoplasm*cell - d6_1*IkBeNFkB_cytoplasm*cell)/cell;
end

function Function_for_int_ei(IKK, IkBeIKK, IkBe_cytoplasm, a3, cell, d3_1)
  (a3*IkBe_cytoplasm*cell*IKK*cell - d3_1*IkBeIKK*cell)/cell;
end

function Function_for_deg_en(IkBeNFkB_cytoplasm, cell, deg6_c)
  deg6_c*IkBeNFkB_cytoplasm*cell/cell;
end

function Function_for_mdeg_e(IkBe_mRNA, cell, tr3e)
  tr3e*IkBe_mRNA*cell/cell;
end

function Function_for_int_2eni(IKK, IkBeIKKNFkB, IkBeNFkB_cytoplasm, a9, cell, d3_2)
  (a9*IkBeNFkB_cytoplasm*cell*IKK*cell - d3_2*IkBeIKKNFkB*cell)/cell;
end

function Function_for_deg_ei(IkBeIKK, cell, r3)
  r3*IkBeIKK*cell/cell;
end

function Function_for_tsl_e(IkBe_mRNA, cell, tr1e)
  tr1e*IkBe_mRNA*cell/cell;
end

function Function_for_int_en_n(IkBeNFkB_nucleus, IkBe_nucleus, NFkB_nucleus, a6_2, cell, d6_2)
  (a6_2*IkBe_nucleus*cell*NFkB_nucleus*cell - d6_2*IkBeNFkB_nucleus*cell)/cell;
end

function Function_for_IKK_deg(IKK, IKK_deg_IKK_deg, cell)
  IKK_deg_IKK_deg*IKK*cell/cell;
end

function Function_for_deg_e_n(IkBe_nucleus, cell, deg3_n)
  deg3_n*IkBe_nucleus*cell/cell;
end

function Function_for_itxn_a(NFkB_nucleus, cell, tr2a_i)
  tr2a_i*(NFkB_nucleus*cell)^2/cell;
end

function Function_for_txn_e(cell, tr2e)
  tr2e/cell;
end

function Function_for_deg_ein(IkBeIKKNFkB, cell, r6)
  r6*IkBeIKKNFkB*cell/cell;
end

function Function_for_deg_e(IkBe_cytoplasm, cell, deg3_c)
  deg3_c*IkBe_cytoplasm*cell/cell;
end

model P1()
  // ODea2007 - A homeostatic model of IκB metabolism to control constitutive NF-κB activity
  // Insert Citation
  // Questions concerning the paper should be addressed to the corresponding author. Alexander Hoffmann (ahoffmann@ucsd.edu)
  // The original model was written and simulated within MathWorks MatLab 2006a using the ode15s (stiff/NDF) solver. It is highly recommended that those wanting to model this system use the MatLab version which we will freely provide upon request. As always, simulation results vary according to the numerical solver used.
  // Translation to SBML Level 2.1 was performed via reconstruction of the model within MathWorks SimBiology Desktop (version 2.1) followed by an Export to SBML.
  // hasProperty ncit:C39163
  // hasProperty mamo:MAMO_0000046
  // isDescribedBy pubmed:17486138

  // Compartments:
  compartment cell = 1;  // 2-D

  // Species:
  species IkBa_mRNA in cell = 0; IkBa_mRNA is "IkBat";
  species IkBa_cytoplasm in cell = 0;
  species IkBa_nucleus in cell = 0; IkBa_nucleus is "IkBan";
  species IkBaIKK in cell = 0; IkBaIKK is "IkBa_IKK";
  species IkBaNFkB_cytoplasm in cell = 0.06; IkBaNFkB_cytoplasm is "IkBa_NFkB";
  species IkBaNFkB_nucleus in cell = 0; IkBaNFkB_nucleus is "IkBa_NFkBn";
  species IkBaIKKNFkB in cell = 0; IkBaIKKNFkB is "IkBa_IKK_NFkB";
  species NFkB_cytoplasm in cell = 0;
  species IKK in cell = 0.001;
  species NFkB_nucleus in cell = 0; NFkB_nucleus is "NFkBn";
  species IkBbIKK in cell = 0; IkBbIKK is "IkBb_IKK";
  species IkBbIKKNFkB in cell = 0; IkBbIKKNFkB is "IkBb_IKK_NFkB";
  species IkBbNFkB_nucleus in cell = 0; IkBbNFkB_nucleus is "IkBb_NFkBn";
  species IkBbNFkB_cytoplasm in cell = 0.03; IkBbNFkB_cytoplasm is "IkBb_NFkB";
  species IkBb_nucleus in cell = 0; IkBb_nucleus is "IkBbn";
  species IkBb_cytoplasm in cell = 0;
  species IkBb_mRNA in cell = 0; IkBb_mRNA is "IkBbt";
  species IkBe_mRNA in cell = 0; IkBe_mRNA is "IkBet";
  species IkBe_cytoplasm in cell = 0;
  species IkBe_nucleus in cell = 0; IkBe_nucleus is "IkBen";
  species IkBeNFkB_cytoplasm in cell = 0.01; IkBeNFkB_cytoplasm is "IkBe_NFkB";
  species IkBeNFkB_nucleus in cell = 0; IkBeNFkB_nucleus is "IkBe_NFkBn";
  species IkBeIKKNFkB in cell = 0; IkBeIKKNFkB is "IkBe_IKK_NFkB";
  species IkBeIKK in cell = 0; IkBeIKK is "IkBe_IKK";

  // Reactions:
  txn_a: => IkBa_mRNA; cell*Function_for_txn_a(cell, tr2a);
    tr2a = 0.0001848;
  mdeg_a: IkBa_mRNA => ; cell*Function_for_mdeg_a(IkBa_mRNA, cell, tr3a);
    tr3a = 0.0168;
  tsl_a: IkBa_mRNA => IkBa_mRNA + IkBa_cytoplasm; cell*Function_for_tsl_a(IkBa_mRNA, cell, tr1a);
    tr1a = 0.2448;
  int_ai: IkBa_cytoplasm + IKK -> IkBaIKK; cell*Function_for_int_ai(IKK, IkBaIKK, IkBa_cytoplasm, a1, cell, d1_1);
    a1 = 1.35; d1_1 = 0.075;
  int_an: IkBa_cytoplasm + NFkB_cytoplasm -> IkBaNFkB_cytoplasm; cell*Function_for_int_an(IkBaNFkB_cytoplasm, IkBa_cytoplasm, NFkB_cytoplasm, a4_1, cell, d4_1);
    a4_1 = 30; d4_1 = 6e-5;
  int_an_n: IkBa_nucleus + NFkB_nucleus -> IkBaNFkB_nucleus; cell*Function_for_int_an_n(IkBaNFkB_nucleus, IkBa_nucleus, NFkB_nucleus, a4_2, cell, d4_2);
    a4_2 = 30; d4_2 = 6e-5;
  int_2ani: IkBaNFkB_cytoplasm + IKK -> IkBaIKKNFkB; cell*Function_for_int_2ani(IKK, IkBaIKKNFkB, IkBaNFkB_cytoplasm, a7, cell, d1_2);
    a7 = 11.1; d1_2 = 0.075;
  int_2ain: IkBaIKK + NFkB_cytoplasm -> IkBaIKKNFkB; cell*Function_for_int_2ain(IkBaIKK, IkBaIKKNFkB, NFkB_cytoplasm, a4_3, cell, d4_3);
    a4_3 = 30; d4_3 = 6e-5;
  deg_a: IkBa_cytoplasm => ; cell*Function_for_deg_a(IkBa_cytoplasm, cell, deg1_c);
    deg1_c = 0.12;
  deg_a_n: IkBa_nucleus => ; cell*Function_for_deg_a_n(IkBa_nucleus, cell, deg1_n);
    deg1_n = 0.12;
  deg_an_n: IkBaNFkB_nucleus => NFkB_nucleus; cell*Function_for_deg_an_n(IkBaNFkB_nucleus, cell, deg4_n);
    deg4_n = 6e-5;
  deg_an: IkBaNFkB_cytoplasm => NFkB_cytoplasm; cell*Function_for_deg_an(IkBaNFkB_cytoplasm, cell, deg4_c);
    deg4_c = 6e-5;
  deg_ai: IkBaIKK => IKK; cell*Function_for_deg_ai(IkBaIKK, cell, r1);
    r1 = 0.072;
  deg_ain: IkBaIKKNFkB => NFkB_cytoplasm + IKK; cell*Function_for_deg_ain(IkBaIKKNFkB, cell, r4);
    r4 = 0.36;
  loc_a: IkBa_cytoplasm -> IkBa_nucleus; cell*Function_for_loc_a(IkBa_cytoplasm, IkBa_nucleus, cell, tp1a, tp2a);
    tp1a = 0.018; tp2a = 0.012;
  loc_an: IkBaNFkB_nucleus => IkBaNFkB_cytoplasm; cell*Function_for_loc_an(IkBaNFkB_nucleus, cell, k2_a);
    k2_a = 0.828;
  loc_bn: IkBbNFkB_nucleus => IkBbNFkB_cytoplasm; cell*Function_for_loc_bn(IkBbNFkB_nucleus, cell, k2_b);
    k2_b = 0.414;
  loc_b: IkBb_cytoplasm -> IkBb_nucleus; cell*Function_for_loc_b(IkBb_cytoplasm, IkBb_nucleus, cell, tp1b, tp2b);
    tp1b = 0.018; tp2b = 0.012;
  deg_bin: IkBbIKKNFkB => NFkB_cytoplasm + IKK; cell*Function_for_deg_bin(IkBbIKKNFkB, cell, r5);
    r5 = 0.12;
  deg_bi: IkBbIKK => IKK; cell*Function_for_deg_bi(IkBbIKK, cell, r2);
    r2 = 0.024;
  deg_bn: IkBbNFkB_cytoplasm => NFkB_cytoplasm; cell*Function_for_deg_bn(IkBbNFkB_cytoplasm, cell, deg5_c);
    deg5_c = 6e-5;
  deg_bn_n: IkBbNFkB_nucleus => NFkB_nucleus; cell*Function_for_deg_bn_n(IkBbNFkB_nucleus, cell, deg5_n);
    deg5_n = 6e-5;
  deg_b_n: IkBb_nucleus => ; cell*Function_for_deg_b_n(IkBb_nucleus, cell, deg2_n);
    deg2_n = 0.18;
  deg_b: IkBb_cytoplasm => ; cell*Function_for_deg_b(IkBb_cytoplasm, cell, deg2_c);
    deg2_c = 0.18;
  int_2bin: IkBbIKK + NFkB_cytoplasm -> IkBbIKKNFkB; cell*Function_for_int_2bin(IkBbIKK, IkBbIKKNFkB, NFkB_cytoplasm, a5_3, cell, d5_3);
    a5_3 = 30; d5_3 = 6e-5;
  int_2bni: IkBbNFkB_cytoplasm + IKK -> IkBbIKKNFkB; cell*Function_for_int_2bni(IKK, IkBbIKKNFkB, IkBbNFkB_cytoplasm, a8, cell, d2_2);
    a8 = 2.88; d2_2 = 0.105;
  int_bn_n: IkBb_nucleus + NFkB_nucleus -> IkBbNFkB_nucleus; cell*Function_for_int_bn_n(IkBbNFkB_nucleus, IkBb_nucleus, NFkB_nucleus, a5_2, cell, d5_2);
    a5_2 = 30; d5_2 = 6e-5;
  int_bn: IkBb_cytoplasm + NFkB_cytoplasm -> IkBbNFkB_cytoplasm; cell*Function_for_int_bn(IkBbNFkB_cytoplasm, IkBb_cytoplasm, NFkB_cytoplasm, a5_1, cell, d5_1);
    a5_1 = 30; d5_1 = 6e-5;
  int_bi: IkBb_cytoplasm + IKK -> IkBbIKK; cell*Function_for_int_bi(IKK, IkBbIKK, IkBb_cytoplasm, a2, cell, d2_1);
    a2 = 0.36; d2_1 = 0.105;
  tsl_b: IkBb_mRNA => IkBb_mRNA + IkBb_cytoplasm; cell*Function_for_tsl_b(IkBb_mRNA, cell, tr1b);
    tr1b = 0.2448;
  mdeg_b: IkBb_mRNA => ; cell*Function_for_mdeg_b(IkBb_mRNA, cell, tr3b);
    tr3b = 0.0168;
  txn_b: => IkBb_mRNA; cell*Function_for_txn_b(cell, tr2b);
    tr2b = 4.272e-5;
  loc_n: NFkB_cytoplasm -> NFkB_nucleus; cell*Function_for_loc_n(NFkB_cytoplasm, NFkB_nucleus, cell, k1_1, k1_2);
    k1_1 = 0.0048; k1_2 = 5.4;
  txn_e: => IkBe_mRNA; cell*Function_for_txn_e(cell, tr2e);
    tr2e = 3.048e-5;
  mdeg_e: IkBe_mRNA => ; cell*Function_for_mdeg_e(IkBe_mRNA, cell, tr3e);
    tr3e = 0.0168;
  tsl_e: IkBe_mRNA => IkBe_mRNA + IkBe_cytoplasm; cell*Function_for_tsl_e(IkBe_mRNA, cell, tr1e);
    tr1e = 0.2448;
  int_ei: IkBe_cytoplasm + IKK -> IkBeIKK; cell*Function_for_int_ei(IKK, IkBeIKK, IkBe_cytoplasm, a3, cell, d3_1);
    a3 = 0.54; d3_1 = 0.105;
  int_en: IkBe_cytoplasm + NFkB_cytoplasm -> IkBeNFkB_cytoplasm; cell*Function_for_int_en(IkBeNFkB_cytoplasm, IkBe_cytoplasm, NFkB_cytoplasm, a6_1, cell, d6_1);
    a6_1 = 30; d6_1 = 6e-5;
  int_en_n: IkBe_nucleus + NFkB_nucleus -> IkBeNFkB_nucleus; cell*Function_for_int_en_n(IkBeNFkB_nucleus, IkBe_nucleus, NFkB_nucleus, a6_2, cell, d6_2);
    a6_2 = 30; d6_2 = 6e-5;
  int_2eni: IkBeNFkB_cytoplasm + IKK -> IkBeIKKNFkB; cell*Function_for_int_2eni(IKK, IkBeIKKNFkB, IkBeNFkB_cytoplasm, a9, cell, d3_2);
    a9 = 4.2; d3_2 = 0.105;
  int_2ein: IkBeIKK + NFkB_cytoplasm -> IkBeIKKNFkB; cell*Function_for_int_2ein(IkBeIKK, IkBeIKKNFkB, NFkB_cytoplasm, a6_3, cell, d6_3);
    a6_3 = 30; d6_3 = 6e-5;
  deg_e: IkBe_cytoplasm => ; cell*Function_for_deg_e(IkBe_cytoplasm, cell, deg3_c);
    deg3_c = 0.18;
  deg_e_n: IkBe_nucleus => ; cell*Function_for_deg_e_n(IkBe_nucleus, cell, deg3_n);
    deg3_n = 0.18;
  deg_en_n: IkBeNFkB_nucleus => NFkB_nucleus; cell*Function_for_deg_en_n(IkBeNFkB_nucleus, cell, deg6_n);
    deg6_n = 6e-5;
  deg_en: IkBeNFkB_cytoplasm => NFkB_cytoplasm; cell*Function_for_deg_en(IkBeNFkB_cytoplasm, cell, deg6_c);
    deg6_c = 6e-5;
  deg_ei: IkBeIKK => IKK; cell*Function_for_deg_ei(IkBeIKK, cell, r3);
    r3 = 0.036;
  deg_ein: IkBeIKKNFkB => NFkB_cytoplasm + IKK; cell*Function_for_deg_ein(IkBeIKKNFkB, cell, r6);
    r6 = 0.18;
  loc_e: IkBe_cytoplasm -> IkBe_nucleus; cell*Function_for_loc_e(IkBe_cytoplasm, IkBe_nucleus, cell, tp1e, tp2e);
    tp1e = 0.018; tp2e = 0.012;
  loc_en: IkBeNFkB_nucleus => IkBeNFkB_cytoplasm; cell*Function_for_loc_en(IkBeNFkB_nucleus, cell, k2_e);
    k2_e = 0.414;
  IKK_deg: IKK => ; cell*Function_for_IKK_deg(IKK, IKK_deg_IKK_deg, cell);
    IKK_deg_IKK_deg = 0;
  itxn_a: NFkB_nucleus => IkBa_mRNA; cell*Function_for_itxn_a(NFkB_nucleus, cell, tr2a_i);
    tr2a_i = 1.98;
end
