// SBML level 2 version 4
// dcterms:bibliographicCitation: urn:miriam:doi:10.3934/mbe.2019325

function Constant_flux__irreversible(v)
  v;
end
Constant_flux__irreversible is "Constant flux (irreversible)";

function Function_for_Tumor_Kill_CTL(p_6, T, L, alpha_6, beta_6)
  p_6*T^2*L/(1 + alpha_6*T^2 + beta_6*L);
end

function Function_for_N_Depletion(p_2, N, T)
  p_2*N*T;
end

function Function_for_L_Proliferation(p_4, L_N, p_5, I, L, alpha_4, K_L, T, alpha_5)
  p_4*L_N + p_5*I*L/(alpha_4 + I)*(1 - L/K_L)*(T/(alpha_5 + T));
end

function Function_for_Tumor_Kill_NK(p_1, T, N, alpha_2, beta_2)
  p_1*T*N^2/(1 + alpha_2*T + beta_2*N^2);
end

function Function_for_Tumor_Growth(T, a, c, E, a_1, beta_1, K)
  T*(a + c*E*T/(1 + a_1*E + beta_1*T^2))*(1 - T/K);
end

function Function_for_N_Recruitment(p_3, N, T, alpha_3, beta_3)
  p_3*N*T/(1 + alpha_3*T + beta_3*N);
end

function Function_for_N_Differentiation(e, C)
  e*C;
end

model Wei2019___Mathematical_modeling_of_tumor_growth_The_MCF_7_breast_cancer_cell_line()
  // Wei2019 - Mathematical modeling of tumor growth The MCF-7 breast cancer cell line
  // This is a mathematical model describing MCF-7 cancer cell growth with interaction between tumor cells, estradiol (hormone-dependent tumor growth), natural killer cells, cytotoxic T lymphocytes and white blood cells.
  // isDescribedBy doi:10.3934/mbe.2019325
  // hasProperty ncit:C36294
  // hasProperty mamo:MAMO_0000046
  // hasProperty efo:0001203

  // Compartments:
  compartment compartment = 1;

  // Species:
  species T in compartment = 1000000;
  species N in compartment = 400000000;
  species L in compartment = 0;
  species C in compartment = 4e9;
  species E in compartment = 500;

  // Parameters:
  a = 0.3;
  c = 1.93e-6;
  alpha_1 = 0.507;
  beta_1 = 7.08e-8;
  K = 1000000000;
  p_1 = 0.00087;
  alpha_2 = 7000000;
  beta_2 = 5.4e-5;
  beta = 0.0063;
  alpha = 36000000;
  e = 0.00486;
  f = 0.0693;
  p_2 = 3.42e-6;
  p_3 = 1.87e-8;
  alpha_3 = 1.6e-5;
  beta_3 = 3.27;
  p_6 = 0.00204;
  alpha_6 = 0.268;
  beta_6 = 4343;
  L_N = 230000000;
  K_L = 800000000;
  p_4 = 9e-5;
  I = 2.3e-11;
  alpha_4 = 2.3e-11;
  p_5 = 0.00414;
  d = 0.41;
  alpha_5 = 1000;

  // Reactions:
  Tumor_Growth: => T; compartment*Function_for_Tumor_Growth(T, a, c, E, alpha_1, beta_1, K);  // modifiers: E
  Tumor_Kill_NK: T => ; compartment*Function_for_Tumor_Kill_NK(p_1, T, N, alpha_2, beta_2);  // modifiers: N
  Tumor_Kill_CTL: T => ; compartment*Function_for_Tumor_Kill_CTL(p_6, T, L, alpha_6, beta_6);  // modifiers: L
  N_Differentiation: => N; compartment*Function_for_N_Differentiation(e, C);  // modifiers: C
  N_Death: N => ; compartment*f*N;
  N_Depletion: N => ; compartment*Function_for_N_Depletion(p_2, N, T);  // modifiers: T
  N_Recruitment: => N; compartment*Function_for_N_Recruitment(p_3, N, T, alpha_3, beta_3);  // modifiers: T
  L_Proliferation: => L; compartment*Function_for_L_Proliferation(p_4, L_N, p_5, I, L, alpha_4, K_L, T, alpha_5);  // modifiers: T
  L_Death: L => ; compartment*d*L;
  C_Growth_Constant: => C; compartment*Constant_flux__irreversible(alpha);
  C_Death: C => ; compartment*beta*C;

  // Unit definitions:
  unit volume = 1e-3 litre;
  unit time = 86400 second;
  unit substance = 1e-3 mole;
end
