// SBML level 2 version 4
// dcterms:bibliographicCitation: urn:miriam:pubmed:29337259

function Constant_flux__irreversible(v)
  v;
end
Constant_flux__irreversible is "Constant flux (irreversible)";

function Function_for_Tumor_Kill_NK(b, N, C_ast)
  b*N*C_ast;
end

function Function_for_NK_Recruitment(g, C, h)
  g*C^2/(h + C^2);
end

function Function_for_Tumor_Kill_CTL(eta, T, C_ast)
  eta*T*C_ast;
end

function Function_for_CTL_Recruitment(j, C, k)
  j*C^2/(k + C^2);
end

function Function_for_CTL_Stimulation(r, N, C_ast, S)
  r*N*C_ast*S;
end

function Function_for_Tumor_Growth(a, C, C_max)
  a*C*ln(C_max/C);
end

function Function_for_NK_Inactivation(p, N, C_ast)
  p*N*C_ast;
end

function Function_for_M_Expansion(alpha, C, q)
  alpha*C/(q + C);
end

function Function_for_CTL_Inactivation(u, T, C_ast)
  u*T*C_ast;
end

model Shariatpanahi2018___Mathematical_modeling_of_tumor_induced_immunosuppression_by_myeloid_derived_suppressor_cells()
  // Shariatpanahi2018 - Mathematical modeling of tumor-induced immunosuppression by myeloid-derived suppressor cells
  // This is a ODE-based mathematical model featuring equations describing the dynamics of tumor cells, cytotoxic T cells, natural killer cells, and myeloid-derived suppressor cells (MDSCs) that together describe the tumor-induced immunosuppression caused by MDSCs.
  // hasProperty mamo:MAMO_0000046
  // hasProperty ncit:C45315
  // hasProperty ncit:C129908
  // isDescribedBy pubmed:29337259
  // isDerivedFrom pubmed:8186756
  // isDerivedFrom pubmed:16140967

  // Compartments:
  compartment compartment = 1;

  // Species:
  species C in compartment = 1;
  species N in compartment = 1;
  species T in compartment = 1;
  species M in compartment = 5000000;

  // Parameters:
  a = 0.057;
  C_max = 10000000000;
  b = 3.23e-7;
  eta = 1.1e-7;
  d = 0.7;
  l = 100;
  sigma = 14000;
  f = 0.0412;
  g = 0.025;
  h = 20200000;
  p = 1e-7;
  m = 0.02;
  j = 0.1;
  k = 20200000;
  r = 1.1e-7;
  u = 1e-10;
  S_min = 0.18;
  alpha = 120000000;
  q = 10000000000;
  gamma = 0.006;
  M_min = 5000000;
  beta = 0.25;
  Initial_for_M_min = M_min;
  Initial_for_S_min = S_min;
  Initial_for_gamma = gamma;
  Initial_for_l = l;

  // Assignment rules:
  C_ast := C/(1 + C^(1/3)/Initial_for_l);
  S := (1 - Initial_for_S_min)/(1 + Initial_for_gamma*(M - Initial_for_M_min)^2) + Initial_for_S_min;
  rho := Initial_for_M_min*0.25;

  // Reactions:
  Tumor_Growth: => C; compartment*Function_for_Tumor_Growth(a, C, C_max);
  Tumor_Kill_NK: C => ; compartment*Function_for_Tumor_Kill_NK(b, N, C_ast);  // modifiers: N
  Tumor_Kill_CTL: C => ; compartment*Function_for_Tumor_Kill_CTL(eta, T, C_ast);  // modifiers: T
  Tumor_Apoptosis: C => ; compartment*d*C;
  NK_Growth_Constant: => N; compartment*Constant_flux__irreversible(sigma);
  NK_Death: N => ; compartment*f*N;
  NK_Recruitment: => N; compartment*Function_for_NK_Recruitment(g, C, h);  // modifiers: C
  NK_Inactivation: N => ; compartment*Function_for_NK_Inactivation(p, N, C_ast);
  CTL_Death: T => ; compartment*m*T;
  CTL_Recruitment: => T; compartment*Function_for_CTL_Recruitment(j, C, k);  // modifiers: C
  CTL_Stimulation: => T; compartment*Function_for_CTL_Stimulation(r, N, C_ast, S);  // modifiers: N
  CTL_Inactivation: T => ; compartment*Function_for_CTL_Inactivation(u, T, C_ast);
  M_Recruitment_Constant: => M; compartment*Constant_flux__irreversible(rho);
  M_Death: M => ; compartment*beta*M;
  M_Expansion: => M; compartment*Function_for_M_Expansion(alpha, C, q);  // modifiers: C

  // Unit definitions:
  unit volume = 1e-3 litre;
  unit time = 86400 second;
  unit substance = item;
end
