// SBML level 2 version 4
// dcterms:bibliographicCitation: urn:miriam:pubmed:24594371

function Constant_flux__irreversible(v)
  v;
end
Constant_flux__irreversible is "Constant flux (irreversible)";

function Function_for_Tumor_Growth(k_c, mu_c, P, C, C_0)
  (k_c + mu_c*P)*C^0.75*(1 - (C/C_0)^0.25);
end

function Function_for_Tumor_Removal_T(lambda_c, C, T, K_c, R)
  lambda_c*C*T/(K_c + (1 - R));
end

function Function_for_R_Decrease(lambda_r, gamma_p, P, gamma_c, C, R)
  (lambda_r + gamma_p*P + gamma_c*C)*R;
end

function Function_for_PSC_Growth(k_p, mu_p, C, K_p, P, P_0)
  (k_p + mu_p*C/(K_p + C))*P*(1 - P/P_0);
end

function Function_for_CTL_Recruitment(k_t, R, K_t)
  k_t*R/(K_t + (1 - R));
end

model Louzoun2014___A_mathematical_model_for_pancreatic_cancer_growth_and_treatments()
  // Louzoun2014 - A mathematical model for pancreatic cancer growth and treatments
  // This is a mathematical model of pancreatic cancer, geared towards examining the efficacy of tumor-suppressing drugs in tandem with an immune response.
  // hasProperty mamo:MAMO_0000046
  // hasProperty ncit:C36294
  // hasProperty ncit:C3850
  // isDescribedBy pubmed:24594371

  // Compartments:
  compartment compartment = 1;

  // Species:
  species C in compartment = 200;
  species P in compartment = 99250;
  species R in compartment = 0;
  species T in compartment = 0.091;

  // Parameters:
  C_0 = 1000000;
  P_0 = 100000;
  k_c = 0.075;
  K_c = 0.1;
  lambda_c = 1e-7;
  k_p = 0.2;
  lambda_p = 0.15;
  k_r = 0.2;
  lambda_r = 0.22;
  gamma_c = 0.02;
  k_t = 3300;
  K_t = 0.1;
  lambda_t = 0.3;
  Initial_for_C_0 = C_0;
  Initial_for_P_0 = P_0;
  Initial_for_k_c = k_c;
  Initial_for_k_p = k_p;
  Initial_for_lambda_p = lambda_p;
  Initial_for_lambda_r = lambda_r;

  // Assignment rules:
  mu_c := 20*Initial_for_k_c/Initial_for_P_0;
  C_norm := C/Initial_for_C_0;
  gamma_p := 0.02*Initial_for_lambda_r/(Initial_for_P_0*(1 - Initial_for_lambda_p/Initial_for_k_p));
  K_p := Initial_for_C_0/100;
  mu_p := Initial_for_k_p*20;

  // Reactions:
  Tumor_Growth: => C; compartment*Function_for_Tumor_Growth(k_c, mu_c, P, C, C_0);  // modifiers: P
  Tumor_Removal_T: C => ; compartment*Function_for_Tumor_Removal_T(lambda_c, C, T, K_c, R);  // modifiers: T, R
  PSC_Growth: => P; compartment*Function_for_PSC_Growth(k_p, mu_p, C, K_p, P, P_0);  // modifiers: C
  PSC_Death: P => ; compartment*lambda_p*P;
  R_Increase: => R; compartment*Constant_flux__irreversible(k_r);
  R_Decrease: R => ; compartment*Function_for_R_Decrease(lambda_r, gamma_p, P, gamma_c, C, R);  // modifiers: P, C
  CTL_Recruitment: => T; compartment*Function_for_CTL_Recruitment(k_t, R, K_t);  // modifiers: R
  CTL_Death: T => ; compartment*lambda_t*T;

  // Unit definitions:
  unit volume = 1e-3 litre;
  unit substance = 1e-3 mole;
end
