// SBML level 2 version 4
// dcterms:bibliographicCitation: urn:miriam:pubmed:28912828

function Constant_flux__irreversible(v)
  v;
end
Constant_flux__irreversible is "Constant flux (irreversible)";

function Function_for_Tumor_Growth(r_T, T, K_T)
  r_T*T*ln(K_T/T);
end

function Function_for_D_Death(mu_D, C, D)
  mu_D*C*D;
end

function Function_for_CD8_Proliferation(r_C, I, C, K_C)
  r_C*I*C*(1 - C/K_C);
end

function Function_for_Tumor_Killing(a_T, C, T, M_I, e_T, F_Beta)
  a_T*C*T*(M_I/(e_T + M_I))*((a_T*F_Beta + e_T)/(e_T + F_Beta));
end

function Function_for_IL_2_Production_CD4(r_I, D, H)
  r_I*D*H;
end
Function_for_IL_2_Production_CD4 is "Function_for_IL-2_Production_CD4";

function Function_for_MHC1_Production_Stimulated_IFNG(a_M_l_gamma, F_Gamma, e_M_l_gamma)
  a_M_l_gamma*F_Gamma/(e_M_l_gamma + F_Gamma);
end

function Function_for_CD4_Proliferation(r_H, D, H, K_H)
  r_H*D*H*(1 - H/K_H);
end

function Function_for_IFNG_Release_CTL(a_gamma_C, C)
  a_gamma_C*C;
end

function Function_for_TGFB_Production(r_T_beta, T)
  r_T_beta*T;
end

function Function_for_IL_2_Uptake_CD8(mu_IC, C, I)
  mu_IC*C*I;
end
Function_for_IL_2_Uptake_CD8 is "Function_for_IL-2_Uptake_CD8";

model Rangel_Reyes2017___Dendritic_Immunotherapy_Improvement_for_an_Optimal_Control_Murine_Model()
  // Rangel-Reyes2017 - Dendritic Immunotherapy Improvement for an Optimal Control Murine Model
  // This is a mathematical model provides a platform for investigating the efficacy of dendritic cell vaccines during cancer treatment while accounting for obstacles such as immunosuppression and poor transference to the lymphatic system.
  // hasProperty ncit:C28976
  // hasProperty mamo:MAMO_0000046
  // hasTaxon taxonomy:10090
  // isDescribedBy pubmed:28912828

  // Compartments:
  compartment compartment = 1;  // isVersionOf ncit:C94498

  // Species:
  species T in compartment = 60000;  // CL:0001063
  species H in compartment = 0;  // CL:0000492
  species C in compartment = 0;  // CL:0000910
  species D in compartment = 0;  // isVersionOf CL:0000451
  species I in compartment = 0;  // uniprot:P70293
  species F_Beta in compartment = 0;  // uniprot:Q3UNK5
  species F_Gamma in compartment = 0;  // uniprot:C4NUM1
  species M_I in compartment = 0;  // isVersionOf ncit:C20706

  // Parameters:
  a_H = 0.0001;
  mu_H = 0.005;
  r_H = 1;
  K_H = 1;
  a_C = 0.0001;
  mu_C = 0.005;
  r_C = 4e-7;
  K_C = 1;
  r_T = 0.002;
  a_T = 0.1136;
  tau = 232;
  K_T = 1000000000000;
  mu_D = 0.009625;
  r_I = 0.01;
  mu_IC = 1e-7;
  mu_I = 0.01;
  e_T = 50;
  a_T_beta = 0.69;
  e_T_beta = 10000;
  r_T_beta = 5.57e-6;
  mu_beta = 6.93;
  a_gamma_C = 0.000102;
  mu_gamma = 0.102;
  g_M_l = 1.44;
  a_M_l_gamma = 2.89;
  e_M_l_gamma = 338000;
  mu_M_l = 0.0144;
  e_f = 0.05;
  u_Injection = 0;

  // Reactions:
  Tumor_Growth: => T; compartment*Function_for_Tumor_Growth(r_T, T, K_T);  // isVersionOf ncit:C18081
  Tumor_Killing: T => ; compartment*Function_for_Tumor_Killing(a_T, C, T, M_I, e_T, F_Beta);  // modifiers: C, M_I, F_Beta; isVersionOf GO:0002419
  CD4_Production_Constant: => H; compartment*Constant_flux__irreversible(a_H);  // isVersionOf ncit:C18081
  CD4_Proliferation: => H; compartment*Function_for_CD4_Proliferation(r_H, D, H, K_H);  // modifiers: D; isVersionOf ncit:C18081
  CD4_Death: H => ; compartment*mu_H*H;  // GO:0008219
  CD8_Production_Constant: => C; compartment*Constant_flux__irreversible(a_C);  // isVersionOf ncit:C18081
  CD8_Proliferation: => C; compartment*Function_for_CD8_Proliferation(r_C, I, C, K_C);  // modifiers: I; isVersionOf ncit:C18081
  CD8_Death: C => ; compartment*mu_C*C;  // GO:0008219
  D_Injection: => D; compartment*Constant_flux__irreversible(u_Injection);  // isInstanceOf ncit:C28160
  D_Death: D => ; compartment*Function_for_D_Death(mu_D, C, D);  // modifiers: C; GO:0008219
  IL_2_Production_CD4: => I; compartment*Function_for_IL_2_Production_CD4(r_I, D, H); IL_2_Production_CD4 is "IL-2_Production_CD4";  // modifiers: D, H; isVersionOf GO:0006412
  IL_2_Uptake_CD8: I => ; compartment*Function_for_IL_2_Uptake_CD8(mu_IC, C, I); IL_2_Uptake_CD8 is "IL-2_Uptake_CD8";  // modifiers: C; isVersionOf NCIT:C71688
  IL_2_Degradation: I => ; compartment*mu_I*I; IL_2_Degradation is "IL-2_Degradation";
  TGFB_Production: => F_Beta; compartment*Function_for_TGFB_Production(r_T_beta, T);  // modifiers: T; isVersionOf GO:0006412
  TGFB_Degradation: F_Beta => ; compartment*mu_beta*F_Beta;
  IFNG_Release_CTL: => F_Gamma; compartment*Function_for_IFNG_Release_CTL(a_gamma_C, C);  // modifiers: C; isVersionOf GO:0072643
  IFNG_Degradation: F_Gamma => ; compartment*mu_gamma*F_Gamma;
  MHC1_Production_Stimulated_IFNG: => M_I; compartment*Function_for_MHC1_Production_Stimulated_IFNG(a_M_l_gamma, F_Gamma, e_M_l_gamma);  // modifiers: F_Gamma; isVersionOf GO:0006412
  MHC1_Production_Basal_Constant: => M_I; compartment*Constant_flux__irreversible(g_M_l);  // isVersionOf GO:0006412
  MHC1_Degradation: M_I => ; compartment*mu_M_l*M_I;

  // Unit definitions:
  unit volume = 1e-3 litre;
  unit time = 3600 second;
  unit substance = item;
end
