// SBML level 2 version 4
// dcterms:bibliographicCitation: urn:miriam:pubmed:30729096

function Function_for_proliferation_of_E(lambda_E, E, M, M_1, M_2, M_0, N_max, alpha, K_1)
  lambda_E*E*(1 - (E + M + M_1 + M_2 + M_0)/N_max)/(1 + alpha*M_1/(M_1 + K_1));
end

function Function_for_proliferation_of_M(lambda_M, M, E, M_1, M_2, M_0, N_max)
  lambda_M*M*(1 - (E + M + M_1 + M_2 + M_0)/N_max);
end

function Funtion_for_EMT(eta_em, E, M_2, m, k, o_K_E)
  eta_em*E*M_2^m/(M_2^m + E^k/(E^k + o_K_E^k));
end

function Function_for_MET(eta_me, M, M_1, n, o_K_M)
  eta_me*M*M_1^n/(M_1^n + M/(M + o_K_M));
end

function Function_for_polarization_of_monocytes_M0_to_M1(eta_1, E, M_0, K_E)
  eta_1*E*M_0/(E + K_E);
end

function Function_for_polarization_of_monocytes_M0_to_M2(eta_2, M, M_0, K_M)
  eta_2*M*M_0/(M + K_M);
end

model New_Model()
  // LiX2019 - macrophage polarization and tumor cell plasticity
  // This model is based on: Computational Modeling of the Crosstalk Between Macrophage Polarization and Tumor Cell Plasticity in the Tumor Microenvironment. Abstract: Tumor microenvironments contain multiple cell types interacting among one another via different signaling pathways. Furthermore, both cancer cells and different immune cells can display phenotypic plasticity in response to these communicating signals, thereby leading to complex spatiotemporal patterns that can impact therapeutic response. Here, we investigate the crosstalk between cancer cells and macrophages in a tumor microenvironment through in silico (computational) co-culture models. In particular, we investigate how macrophages of different polarization (M1 vs. M2) can interact with epithelial-mesenchymal plasticity of cancer cells, and conversely, how cancer cells exhibiting different phenotypes (epithelial vs. mesenchymal) can influence the polarization of macrophages. Based on interactions documented in the literature, an interaction network of cancer cells and macrophages is constructed. The steady states of the network are then analyzed. Various interactions were removed or added into the constructed-network to test the functions of those interactions. Also, parameters in the mathematical models were varied to explore their effects on the steady states of the network. In general, the interactions between cancer cells and macrophages can give rise to multiple stable steady-states for a given set of parameters and each steady state is stable against perturbations. Importantly, we show that the system can often reach one type of stable steady states where cancer cells go extinct. Our results may help inform efficient therapeutic strategies.
  // hasProperty GO:0001837
  // hasProperty efo:0000311
  // hasProperty GO:0060231
  // hasProperty mamo:MAMO_0000046
  // isDescribedBy pubmed:30729096

  // Compartments:
  compartment compartment = 1;  // isVersionOf ncit:C13413

  // Species:
  species E in compartment = 0;  // isVersionOf ncit:C13315
  species M in compartment = 0;  // isVersionOf ncit:C25721
  species M_1 in compartment = 0;  // isVersionOf ncit:C156004
  species M_0 in compartment = 0.3;  // isVersionOf ncit:C12547
  species M_2 in compartment = 0;  // isVersionOf ncit:C123783
  species $M_C in compartment;

  // Parameters:
  N_max = 1;
  lambda_E = 0.01388889;
  lambda_M = 0.01388889;
  alpha = 100;
  K_1 = 0.1;
  eta_me = 0.00833333;
  eta_em = 0.01388889;
  o_K_M = 0.1;
  o_K_E = 0.1;
  k = 4;
  beta = 0;
  K_2 = 1;
  n = 1;
  m = 1;
  eta_1 = 0.04166667;
  eta_2 = 0.04166667;
  K_E = 0.1;
  K_M = 0.1;

  // Assignment rules:
  M_C := M_1 + M_2 + M_0;

  // Reactions:
  proliferation_of_epithelial_cells_E: => E; compartment*Function_for_proliferation_of_E(lambda_E, E, M, M_1, M_2, M_0, N_max, alpha, K_1);  // modifiers: M, M_1, M_2, M_0
  proliferation_of_mesenchymal_cells_M: => M; compartment*Function_for_proliferation_of_M(lambda_M, M, E, M_1, M_2, M_0, N_max);  // modifiers: E, M_1, M_2, M_0
  Epithelial_Mesenchymal_Transition__promoted_by_M2_like: E => M; compartment*Funtion_for_EMT(eta_em, E, M_2, m, k, o_K_E); Epithelial_Mesenchymal_Transition__promoted_by_M2_like is "Epithelial-Mesenchymal Transition; promoted by M2-like";  // modifiers: M_2; isVersionOf GO:0001837
  Mesenchymal_Epithelial_Transition__promoted_by_M1_like: M => E; compartment*Function_for_MET(eta_me, M, M_1, n, o_K_M); Mesenchymal_Epithelial_Transition__promoted_by_M1_like is "Mesenchymal-Epithelial Transition; promoted by M1-like";  // modifiers: M_1; isVersionOf GO:0060231
  polarization_of_monocytes_M0_to_M1_like_cells__aided_by_E: M_0 => M_1; compartment*Function_for_polarization_of_monocytes_M0_to_M1(eta_1, E, M_0, K_E); polarization_of_monocytes_M0_to_M1_like_cells__aided_by_E is "polarization of monocytes M0 to M1-like cells; aided by E";  // modifiers: E; isVersionOf GO:0030225
  polarization_of_monocytes_M0_to_M2_like_cells__aided_by_M: M_0 => M_2; compartment*Function_for_polarization_of_monocytes_M0_to_M2(eta_2, M, M_0, K_M); polarization_of_monocytes_M0_to_M2_like_cells__aided_by_M is "polarization of monocytes M0 to M2-like cells; aided by M";  // modifiers: M; isVersionOf GO:0030225

  // Unit definitions:
  unit volume = 1e-3 litre;
  unit substance = 1e-3 mole;
end
