// SBML level 2 version 4
// dcterms:bibliographicCitation: urn:miriam:pubmed:30296448

function Function_for_CSC_conversion_into_BM_blast_after_time_lag(eta, phi, T_c, tau, L_b, t, C)
  eta*exp(-phi*T_c - tau*L_b*(t - T_c))*C*(t - T_c);
end

function Function_for_inhibition_in_PB(alpha_bd, N_b, L_b)
  alpha_bd*N_b*L_b;
end

function Function_for_transition_to_PB(alpha_mr, N_m, s, L_b, kappa_nb, N_b)
  alpha_mr*N_m*exp(-s*L_b)/(kappa_nb + N_b);
end

function Function_for_mutation_into_CSC(alpha_c, N_m)
  alpha_c*N_m;
end

function Function_for_healthy_BM_cell_renewal_and_growth(alpha, N_m, A_m, A_b, kappa_nm)
  alpha*N_m*ln((A_m + A_b)/(kappa_nm + N_m));
end

function Function_for_CSC_renewal_and_growth(beta_c, C, kappa_c)
  beta_c*C*(1 - C/kappa_c);
end

function Function_for_BM_blast_cell_growth(beta_m, L_m, A_w, kappa_l)
  beta_m*L_m*ln(A_w/(kappa_l + L_m));
end

function Function_for_healthy_BM_cell_arrival_in_PB_after_time_lag(alpha_mr, myu, T_m, s, L_b, t, kappa_nb, N_b, N_m)
  alpha_mr*exp(-myu*T_m - s*L_b*(t - T_m))*N_m*(t - T_m)/(kappa_nb + N_b*(t - T_m));
end

function Function_for_mutation_into_blast(alpha_m, N_m)
  alpha_m*N_m;
end

function Function_for_BM_blast_transition_to_PB(beta, L_m)
  beta*L_m;
end

function Function_for__cell_loss_for_L_b(delta, L_b)
  delta*L_b;
end
Function_for__cell_loss_for_L_b is "Function for cell loss for L_b";

function Function_for_CSC_transition_into_BM_blast(eta, tau, L_b, C)
  eta*exp(-tau*L_b)*C;
end

function Function_for_inhibition_in_BM(alpha_md, N_m, L_m)
  alpha_md*N_m*L_m;
end

function Function_for_cell_loss(alpha_b, N_b)
  alpha_b*N_b;
end

model New_Model()
  // Afenya2018 - peripheral blodd dynamics in the disease state
  // Abstract: The cancer stem cell hypothesis has gained currency in recent times but concerns remain about its scientific foundations because of significant gaps that exist between research findings and comprehensive knowledge about cancer stem cells (CSCs). In this light, a mathematical model that considers hematopoietic dynamics in the diseased state of the bone marrow and peripheral blood is proposed and used to address findings about CSCs. The ensuing model, resulting from a modification and refinement of a recent model, develops out of the position that mathematical models of CSC development, that are few at this time, are needed to provide insightful underpinnings for biomedical findings about CSCs as the CSC idea gains traction. Accordingly, the mathematical challenges brought on by the model that mirror general challenges in dealing with nonlinear phenomena are discussed and placed in context. The proposed model describes the logical occurrence of discrete time delays, that by themselves present mathematical challenges, in the evolving cell populations under consideration. Under the challenging circumstances, the steady state properties of the model system of delay differential equations are obtained, analyzed, and the resulting mathematical predictions arising therefrom are interpreted and placed within the framework of findings regarding CSCs. Simulations of the model are carried out by considering various parameter scenarios that reflect different experimental situations involving disease evolution in human hosts. Model analyses and simulations suggest that the emergence of the cancer stem cell population alongside other malignant cells engenders higher dimensions of complexity in the evolution of malignancy in the bone marrow and peripheral blood at the expense of healthy hematopoietic development. The model predicts the evolution of an aberrant environment in which the malignant population particularly in the bone marrow shows tendencies of reaching an uncontrollable equilibrium state. Essentially, the model shows that a structural relationship exists between CSCs and non-stem malignant cells that confers on CSCs the role of temporally enhancing and stimulating the expansion of non-stem malignant cells while also benefitting from increases in their own population and these CSCs may be the main protagonists that drive the ultimate evolution of the uncontrollable equilibrium state of such malignant cells and these may have implications for treatment.
  // hasProperty ncit:C12431
  // hasProperty mamo:MAMO_0000046
  // hasProperty ncit:C68706
  // hasProperty ncit:C14143
  // hasProperty efo:0000311
  // isDescribedBy pubmed:30296448

  // Compartments:
  compartment compartment = 1;

  // Species:
  species C in compartment = 1;
  species N_m in compartment = 1.05e13;
  species L_m in compartment = 4e11;
  species N_b in compartment = 3.55e9;
  species L_b in compartment = 1000000000;

  // Parameters:
  alpha = 0.00288;
  A_m = 1e12;
  A_b = 1e13;
  kappa_nm = 1.1e11;
  alpha_m = 0.005;
  alpha_mr = 116713;
  s = 1e-12;
  kappa_nb = 1.1e11;
  alpha_c = 2e-9;
  alpha_md = 1e-14;
  myu = 0.065;
  T_m = 120;
  alpha_bd = 5e-12;
  alpha_b = 1e-5;
  beta_m = 0.00396;
  A_w = 1.595e14;
  kappa_l = 0;
  beta = 0.03;
  eta = 0.001;
  phi = 0.01;
  T_c = 100;
  tau = 1e-5;
  delta = 0.1925;
  beta_c = 0.02;
  kappa_c = 5000000;

  // Reactions:
  healthy_BM_cell_renewal_and_growth: => N_m; compartment*Function_for_healthy_BM_cell_renewal_and_growth(alpha, N_m, A_m, A_b, kappa_nm);
  mutation_into_blast: N_m => L_m; compartment*Function_for_mutation_into_blast(alpha_m, N_m);
  transition_to_PB: N_m => ; compartment*Function_for_transition_to_PB(alpha_mr, N_m, s, L_b, kappa_nb, N_b);  // modifiers: L_b, N_b
  mutation_into_CSC: N_m => C; compartment*Function_for_mutation_into_CSC(alpha_c, N_m);
  inhibition_in_BM: N_m => ; compartment*Function_for_inhibition_in_BM(alpha_md, N_m, L_m);  // modifiers: L_m
  healthy_BM_cell_arrival_in_PB_after_time_lag: => N_b; compartment*Function_for_healthy_BM_cell_arrival_in_PB_after_time_lag(alpha_mr, myu, T_m, s, L_b, time, kappa_nb, N_b, N_m);  // modifiers: L_b, N_m
  inhibition_in_PB: N_b => ; compartment*Function_for_inhibition_in_PB(alpha_bd, N_b, L_b);  // modifiers: L_b
  cell_loss_for_N_b: N_b => ; compartment*Function_for_cell_loss(alpha_b, N_b);
  BM_blast_cell_growth: => L_m; compartment*Function_for_BM_blast_cell_growth(beta_m, L_m, A_w, kappa_l);
  BM_blast_transition_to_PB: L_m => L_b; compartment*Function_for_BM_blast_transition_to_PB(beta, L_m);
  CSC_conversion_into_BM_blast_after_time_lag: => L_m; compartment*Function_for_CSC_conversion_into_BM_blast_after_time_lag(eta, phi, T_c, tau, L_b, time, C);  // modifiers: L_b, C
  cell_loss_for_L_b: L_b => ; compartment*Function_for__cell_loss_for_L_b(delta, L_b);
  CSC_renewal_and_growth: => C; compartment*Function_for_CSC_renewal_and_growth(beta_c, C, kappa_c);
  CSC_transition_into_BM_blast: C => ; compartment*Function_for_CSC_transition_into_BM_blast(eta, tau, L_b, C);  // modifiers: L_b

  // Unit definitions:
  unit volume = 1e-3 litre;
  unit substance = 1e-3 mole;
end
