// SBML level 2 version 4
// dcterms:bibliographicCitation: urn:miriam:pubmed:29277489

function Function_for_C547_Albumin_Binding(k_plus_a, B_0, y1)
  k_plus_a*B_0*y1;
end

function Function_for_EI_Ast_Complex_Formation(k_rec, y3, E_0)
  k_rec*(1 - y3/E_0);
end

model Petrov2018___C_547_a_6_methyluracil_derivative_with_long_lasting_binding_and_rebinding_on_acetylcholinesterase()
  // Petrov2018 - C-547 a 6-methyluracil derivative with long-lasting binding and rebinding on acetylcholinesterase
  // C-547, a candidate drug, is a potent slow-binding inhibitor of acetyl-cholinesterase, and the focus of this PK/PD model, which investigates the metabolism and clinical effect of C-547 when it is no longer detectable in the blood. Intended for treatment of myasthenia gravis, this drug and the accompanying model offers a possible treatment for further development of drugs offering neuroprotective effects.
  // hasProperty ncit:C47792
  // hasProperty efo:0004991
  // hasProperty mamo:MAMO_0000046
  // hasProperty ncit:C16909
  // isDescribedBy pubmed:29277489

  // Compartments:
  compartment compartment = 1;

  // Species:
  species y1 in compartment = 0;
  species y2 in compartment = 0;
  species y3 in compartment = 75;
  species y4 in compartment = 0;
  species y5 in compartment = 75;

  // Parameters:
  E_0 = 150;
  k_1 = 3000;
  k_2 = 0.42;
  k_3 = 1.19;
  k_4 = 0.222;
  B_0 = 600;
  k_plus_a = 1800;
  K_d = 33;
  k_m_2b = 0.04;
  k_rec = 0.05;
  ModelValue_7_0 = K_d; ModelValue_7_0 is "Initial for K_d";
  ModelValue_6_0 = k_plus_a; ModelValue_6_0 is "Initial for k_plus_a";

  // Assignment rules:
  k_minus_a := ModelValue_7_0*ModelValue_6_0;

  // Reactions:
  C547_Unbinding_AChE: y4 => y1 + y3; compartment*k_2*y4;
  C547_Albumin_Unbinding: y2 => y1; compartment*k_minus_a*y2;
  C547_Albumin_Binding: y1 => y2; compartment*Function_for_C547_Albumin_Binding(k_plus_a, B_0, y1);
  C547_AChE_Binding: y1 + y3 => y4; compartment*k_1*y1*y3;
  EI_Ast_Complex_Formation: y5 => y3; compartment*Function_for_EI_Ast_Complex_Formation(k_rec, y3, E_0);
  EI_Ast_Complex_Formation_Forward: y4 => y5; compartment*k_3*y4;
  EI_Complex_Formation: y5 => y4; compartment*k_4*y5;
  C547_Transfer: y1 => ; compartment*k_m_2b*y1;

  // Unit definitions:
  unit volume = 1e-3 litre;
  unit time = 60 second;
  unit substance = 1e-6 mole;
end
