// SBML level 2 version 4
// dcterms:bibliographicCitation: urn:miriam:pubmed:30980871

function Constant_flux__irreversible(v)
  v;
end
Constant_flux__irreversible is "Constant flux (irreversible)";

function Function_for_T_Cell_Interaction_DC(delta_1, T, D)
  delta_1*T*D;
end

function Function_for_T_Cell_Suppression_IL_10(beta_1, I_10, T)
  beta_1*I_10*T;
end
Function_for_T_Cell_Suppression_IL_10 is "Function_for_T_Cell_Suppression_IL-10";

function Function_for_TGFB_Production_Th1(k_1, T_1)
  k_1*T_1;
end

function Function_for_TNFA_Production_DC(d_2, D)
  d_2*D;
end

function Function_for_DC_Interaction_T_Cells(delta_2, T, D)
  delta_2*T*D;
end

function Function_for_T_Cell_Suppression_TGFB(beta_2, T_beta, T)
  beta_2*T_beta*T;
end

function Function_for_Th1_Differentiation(eta_1, T, D)
  eta_1*T*D;
end

function Function_for_Th1_Accumulation_IFNG(alpha_2, I_gamma, T_1)
  alpha_2*I_gamma*T_1;
end

function Function_for_K_Upregulation_IFNG(alpha_6, I_gamma, K)
  alpha_6*I_gamma*K;
end

function Function_for_Th2_Differentiation(eta_2, T, D)
  eta_2*T*D;
end

function Function_for_Th1_Accumulation_IL_2(alpha_1, I_2, T_1)
  alpha_1*I_2*T_1;
end
Function_for_Th1_Accumulation_IL_2 is "Function_for_Th1_Accumulation_IL-2";

function Function_for_DC_Suppression_IL_10(beta_2, I_10, D)
  beta_2*I_10*D;
end
Function_for_DC_Suppression_IL_10 is "Function_for_DC_Suppression_IL-10";

function Function_for_Th2_Accumulation_IL_2(alpha_3, I_2, T_2)
  alpha_3*I_2*T_2;
end
Function_for_Th2_Accumulation_IL_2 is "Function_for_Th2_Accumulation_IL-2";

function Function_for_Th2_Accumulation_IL_10(alpha_4, T_2, I_10)
  alpha_4*T_2*I_10;
end
Function_for_Th2_Accumulation_IL_10 is "Function_for_Th2_Accumulation_IL-10";

function Function_for_K_Suppression_IL_10(beta_6, I_10, K)
  beta_6*I_10*K;
end
Function_for_K_Suppression_IL_10 is "Function_for_K_Suppression_IL-10";

function Function_for_IL_10_Secretion(p, M)
  p*M;
end
Function_for_IL_10_Secretion is "Function_for_IL-10_Secretion";

function Function_for_K_Upregulation_TNFA(alpha_7, T_alpha, K)
  alpha_7*T_alpha*K;
end

function Function_for_K_Upregulation_TGFB(alpha_5, T_beta, K)
  alpha_5*T_beta*K;
end

function Function_for_IFNG_Release_Th1(m_1, T_1)
  m_1*T_1;
end

function Function_for_TGFB_Production_Th2(k_2, T_2)
  k_2*T_2;
end

function Function_for_Th1_Suppression_IL_10(beta_4, I_10, T_1)
  beta_4*I_10*T_1;
end
Function_for_Th1_Suppression_IL_10 is "Function_for_Th1_Suppression_IL-10";

function Function_for_Th2_Suppression_TGFB(beta_5, T_beta, T_2)
  beta_5*T_beta*T_2;
end

function Function_for_TNFA_Production_Th1(d_1, T_1)
  d_1*T_1;
end

model Roy2019___A_vivid_cytokines_interaction_model_on_psoriasis_with_the_effect_of_impulse_biologic_therapy()
  // Roy2019 - A vivid cytokines interaction model on psoriasis with the effect of impulse biologic therapy
  // This is a mathematical model describing keratinocyte proliferation dynamics as influenced by immune cells and cytokines within the context of psoriasis. The model also investigates the perfect dosing interval for therapeutic dosages of TNF-alpha inhibitors for the treatment of psoriasis.
  // hasProperty mamo:MAMO_0000046
  // hasProperty ncit:C3346
  // hasProperty ncit:C15544
  // isDescribedBy pubmed:30980871

  // Compartments:
  compartment compartment = 1;

  // Species:
  species T in compartment = 11;
  species D in compartment = 19;
  species T_1 in compartment = 50;
  species T_2 in compartment = 19;
  species K in compartment = 160;
  species T_beta in compartment = 1;
  species I_gamma in compartment = 1;
  species T_alpha in compartment = 1;
  species I_10 in compartment = 1;
  species I_2 in compartment = 1;

  // Parameters:
  a_T = 15;
  delta_1 = 0.025;
  beta_1 = 0.003;
  beta_2 = 0.003;
  mu_1 = 0.06;
  a_D = 10;
  alpha_5 = 0.02;
  alpha_7 = 0.01;
  mu_5 = 0.2;
  beta_5 = 0.01;
  alpha_4 = 0.1;
  mu_4 = 0.3;
  a_K = 20;
  k_2 = 2;
  m_1 = 1;
  d_1 = 1;
  lambda_3 = 1;
  p_2 = 0.8;
  p_4 = 1;
  q_1 = 1;
  lambda_5 = 1;
  alpha_1 = 0.006;
  alpha_2 = 0.006;
  beta_4 = 0.002;
  mu_3 = 0.025;
  eta_2 = 0.002;
  alpha_3 = 0.006;
  alpha_6 = 0.003;
  beta_6 = 0.003;
  delta_2 = 0.1;
  beta_3 = 1.5;
  mu_2 = 0.06;
  eta_1 = 0.002;
  k_1 = 0.002;
  lambda_1 = 1;
  lambda_2 = 1;
  d_2 = 1;
  p_1 = 0.8;
  p_3 = 0.8;
  lambda_4 = 1.15;
  q_2 = 1;

  // Reactions:
  T_Cell_Accumulation: => T; compartment*Constant_flux__irreversible(a_T);
  DC_Accumulation: => D; compartment*Constant_flux__irreversible(a_D);
  Keratinocytes_Growth: => K; compartment*Constant_flux__irreversible(a_K);
  T_Cell_Interaction_DC: T => ; compartment*Function_for_T_Cell_Interaction_DC(delta_1, T, D);  // modifiers: D
  T_Cell_Suppression_IL_10: T => ; compartment*Function_for_T_Cell_Suppression_IL_10(beta_1, I_10, T); T_Cell_Suppression_IL_10 is "T_Cell_Suppression_IL-10";  // modifiers: I_10
  T_Cell_Suppression_TGFB: T => ; compartment*Function_for_T_Cell_Suppression_TGFB(beta_2, T_beta, T);  // modifiers: T_beta
  T_Cell_Death: T => ; compartment*mu_1*T;
  DC_Interaction_T_Cells: D => ; compartment*Function_for_DC_Interaction_T_Cells(delta_2, T, D);  // modifiers: T
  DC_Suppression_IL_10: D => ; compartment*Function_for_DC_Suppression_IL_10(beta_3, I_10, D); DC_Suppression_IL_10 is "DC_Suppression_IL-10";  // modifiers: I_10
  DC_Death: D => ; compartment*mu_2*D;
  Th1_Differentiation: => T_1; compartment*Function_for_Th1_Differentiation(eta_1, T, D);  // modifiers: T, D
  Th1_Accumulation_IL_2: => T_1; compartment*Function_for_Th1_Accumulation_IL_2(alpha_1, I_2, T_1); Th1_Accumulation_IL_2 is "Th1_Accumulation_IL-2";  // modifiers: I_2
  Th1_Accumulation_IFNG: => T_1; compartment*Function_for_Th1_Accumulation_IFNG(alpha_2, I_gamma, T_1);  // modifiers: I_gamma
  Th1_Suppression_IL_10: T_1 => ; compartment*Function_for_Th1_Suppression_IL_10(beta_4, I_10, T_1); Th1_Suppression_IL_10 is "Th1_Suppression_IL-10";  // modifiers: I_10
  Th1_Decay: T_1 => ; compartment*mu_3*T_1;
  Th2_Differentiation: => T_2; compartment*Function_for_Th2_Differentiation(eta_2, T, D);  // modifiers: T, D
  Th2_Accumulation_IL_2: => T_2; compartment*Function_for_Th2_Accumulation_IL_2(alpha_3, I_2, T_2); Th2_Accumulation_IL_2 is "Th2_Accumulation_IL-2";  // modifiers: I_2
  Th2_Suppression_TGFB: T_2 => ; compartment*Function_for_Th2_Suppression_TGFB(beta_5, T_beta, T_2);  // modifiers: T_beta
  Th2_Accumulation_IL_10: => T_2; compartment*Function_for_Th2_Accumulation_IL_10(alpha_4, T_2, I_10); Th2_Accumulation_IL_10 is "Th2_Accumulation_IL-10";  // modifiers: I_10
  Th2_Decay: T_2 => ; compartment*mu_4*T_2;
  K_Upregulation_TGFB: => K; compartment*Function_for_K_Upregulation_TGFB(alpha_5, T_beta, K);  // modifiers: T_beta
  K_Upregulation_IFNG: => K; compartment*Function_for_K_Upregulation_IFNG(alpha_6, I_gamma, K);  // modifiers: I_gamma
  K_Upregulation_TNFA: => K; compartment*Function_for_K_Upregulation_TNFA(alpha_7, T_alpha, K);  // modifiers: T_alpha
  K_Suppression_IL_10: K => ; compartment*Function_for_K_Suppression_IL_10(beta_6, I_10, K); K_Suppression_IL_10 is "K_Suppression_IL-10";  // modifiers: I_10
  K_Removal: K => ; compartment*mu_5*K;
  TGFB_Production_Th1: => T_beta; compartment*Function_for_TGFB_Production_Th1(k_1, T_1);  // modifiers: T_1
  TGFB_Production_Th2: => T_beta; compartment*Function_for_TGFB_Production_Th2(k_2, T_2);  // modifiers: T_2
  TGFB_Decay: T_beta => ; compartment*lambda_1*T_beta;
  IFNG_Release_Th1: => I_gamma; compartment*Function_for_IFNG_Release_Th1(m_1, T_1);  // modifiers: T_1
  IFNG_Decay: I_gamma => ; compartment*lambda_2*I_gamma;
  TNFA_Production_Th1: => T_alpha; compartment*Function_for_TNFA_Production_Th1(d_1, T_1);  // modifiers: T_1
  TNFA_Production_DC: => T_alpha; compartment*Function_for_TNFA_Production_DC(d_2, D);  // modifiers: D
  TNFA_Decay: T_alpha => ; compartment*lambda_3*T_alpha;
  IL_10_Secretion_K: => I_10; compartment*Function_for_IL_10_Secretion(p_1, K); IL_10_Secretion_K is "IL-10_Secretion_K";  // modifiers: K
  IL_10_Secretion_Th1: => I_10; compartment*Function_for_IL_10_Secretion(p_2, T_1); IL_10_Secretion_Th1 is "IL-10_Secretion_Th1";  // modifiers: T_1
  IL_10_Secretion_Th2: => I_10; compartment*Function_for_IL_10_Secretion(p_3, T_2); IL_10_Secretion_Th2 is "IL-10_Secretion_Th2";  // modifiers: T_2
  IL_10_Secretion_T_Cell: => I_10; compartment*Function_for_IL_10_Secretion(p_4, T); IL_10_Secretion_T_Cell is "IL-10_Secretion_T_Cell";  // modifiers: T
  IL_10_Decay: I_10 => ; compartment*lambda_4*I_10; IL_10_Decay is "IL-10_Decay";
  IL_2_Secretion_Th1: => I_2; compartment*Function_for_IL_10_Secretion(q_1, T_1); IL_2_Secretion_Th1 is "IL-2_Secretion_Th1";  // modifiers: T_1
  IL_2_Secretion_Th2: => I_2; compartment*Function_for_IL_10_Secretion(q_2, T_2); IL_2_Secretion_Th2 is "IL-2_Secretion_Th2";  // modifiers: T_2
  IL_2_Decay: I_2 => ; compartment*lambda_5*I_2; IL_2_Decay is "IL-2_Decay";

  // Unit definitions:
  unit volume = 1e-3 litre;
  unit time = 86400 second;
  unit substance = item;
end
