// SBML level 2 version 4
// dcterms:bibliographicCitation: urn:miriam:pubmed:29476830

model Khan2018___Origins_of_robustness_in_translational_control_via_eukaryotic_translation_initiation_factor__eIF__2()
  // Khan2018 - Origins of robustness in translational control via eukaryotic translation initiation factor (eIF) 2
  // This is a ordinary differential equation-based model of the eukaryotic translation initiation factor (eIF2) phosphorylation pathway, a pathway important for regulating protein synthesis activity in eukaryotic cells. This model is geared towards identification the principal robustness-conferring features of the pathway.
  // hasProperty mamo:MAMO_0000046
  // hasProperty GO:0005850
  // hasProperty GO:0006417
  // isDescribedBy pubmed:29476830

  // Compartments:
  compartment compartment = 1;

  // Species:
  species eIF2_GDP in compartment = 3.74e-7;
  species eIF2B in compartment = 7.22e-7;
  species eIF2_GTP in compartment = 3.74e-7;
  species eIF5 in compartment = 1.11e-5;
  species eIF5_eIF2_GDP in compartment = 1.07e-6;
  species eIF5_eIF2B_eIF2_GDP in compartment = 1.78e-7;
  species eIF2B_eIF2_GDP in compartment = 1.19e-7;
  species translation in compartment = 4.36e-7;
  species KA in compartment = 1.04e-5;
  species K in compartment = 4.33e-17;
  species KA_K in compartment = 2.22e-18;
  species eIF2_P in compartment = 1.61e-12; eIF2_P is "eIF2-P";
  species KA_K_eIF2 in compartment = 8.32e-21;
  species eIF2_P_eIF2B in compartment = 4.04e-18; eIF2_P_eIF2B is "eIF2-P_eIF2B";

  // Parameters:
  k1 = 1.77;
  k2f = 7.59;
  k2r = 0.91;
  k3f = 60000000;
  k3r = 150;
  k4f = 1;
  k4r = 0.72;
  k5f = 0.36;
  k5r = 16000;
  k6 = 0.72;
  k7 = 74000;
  k8f = 1000000;
  k8r = 203;
  k9af = 1000000000;
  k9ar = 167;
  k9b = 100000;
  k10f = 100;
  k10r = 129;
  k11 = 0.0001;
  k12 = 1e-8;
  k13 = 0.01;

  // Reactions:
  ReactionFlux1: translation => eIF5_eIF2_GDP; compartment*k1*translation;
  ReactionFlux2: eIF5_eIF2_GDP -> eIF5 + eIF2_GDP; compartment*(k2f*eIF5_eIF2_GDP - k2r*eIF5*eIF2_GDP);
  ReactionFlux3: eIF2_GDP + eIF2B -> eIF2B_eIF2_GDP; compartment*(k3f*eIF2_GDP*eIF2B - k3r*eIF2B_eIF2_GDP);
  ReactionFlux4: eIF2B + eIF5_eIF2_GDP -> eIF5_eIF2B_eIF2_GDP; compartment*(k4f*eIF2B*eIF5_eIF2_GDP - k4r*eIF5_eIF2B_eIF2_GDP);
  ReactionFlux5: eIF5_eIF2B_eIF2_GDP -> eIF2B_eIF2_GDP + eIF5; compartment*(k5f*eIF5_eIF2B_eIF2_GDP - k5r*eIF2B_eIF2_GDP*eIF5);
  ReactionFlux6: eIF2B_eIF2_GDP => eIF2_GTP + eIF2B; compartment*k6*eIF2B_eIF2_GDP;
  ReactionFlux7: eIF5 + eIF2_GTP => translation; compartment*k7*eIF5*eIF2_GTP;
  ReactionFlux8: KA + K -> KA_K; compartment*(k8f*KA*K - k8r*KA_K);
  ReactionFlux9a: KA_K + eIF2_GDP -> KA_K_eIF2; compartment*(k9af*KA_K*eIF2_GDP - k9ar*KA_K_eIF2);
  ReactionFlux9b: KA_K_eIF2 => eIF2_P + KA_K; compartment*k9b*KA_K_eIF2;
  ReactionFlux10: eIF2_P + eIF2B -> eIF2_P_eIF2B; compartment*(k10f*eIF2_P*eIF2B - k10r*eIF2_P_eIF2B);
  ReactionFlux11: eIF2_P => eIF2_GDP; compartment*k11*eIF2_P;
  ReactionFlux12: translation => KA; compartment*k12*translation;
  ReactionFlux13: KA => ; compartment*k13*KA;

  // Unit definitions:
  unit volume = 1e-3 litre;
  unit substance = 1e-6 mole;
end
