// SBML level 2 version 4
// dcterms:bibliographicCitation: urn:miriam:pubmed:31002776

function Function_for_PI3P_Production_PIKI(alpha2, P, d2)
  alpha2*P/(d2 + P);
end

function Function_for_MTM1_Dephosphorylation(beta, P, d1)
  beta*P/(d1 + P);
end

function Function_for_PI3P_Production_PI3KC3(alpha1, K)
  alpha1*K;
end

function Function_for_PI3K_Recruitment(a0, cm0, Ci, h, d0, k0, a1, P, d3)
  a0*cm0*(Ci^h/(d0^h + Ci^h))*(k0 - a1*P/(d3 + P));
end

function Constant_flux__irreversible(v)
  v;
end
Constant_flux__irreversible is "Constant flux (irreversible)";

function Function_for_Calcium_Release_ER(v3, gamma2, Ci, p, k3, Ce, m, k4)
  v3/(1 + gamma2)*(Ci^p/(Ci^p + k3^p))*(Ce^m/(Ce^m + k4^m));
end

function Function_for_Calcium_Reabsorption_ER(v2, Ci, n, k2)
  v2*Ci^n/(Ci^n + k2^n);
end

model Gupta2019___Restoration_of_cytosolic_calcium_inhibits_Mycobacterium_tuberculosis_intracellular_growth()
  // Gupta2019 - Restoration of cytosolic calcium inhibits Mycobacterium tuberculosis intracellular growth
  // This is a four dimensionsal ordinary differential equation mathematical model that explores the contribution of PI3P during Mycobacterium tuberculosis (Mtb) phagocytosis. The model was built in an effort to understand the mechanisms by which Mtb eliminates phagosome-lysosome fusion during the hosts enactment of anti-microbial pathways.
  // hasProperty ncit:C26115
  // hasProperty mamo:MAMO_0000046
  // hasProperty ncit:C76370
  // hasProperty CHEBI:26034
  // isDescribedBy pubmed:31002776

  // Compartments:
  compartment compartment = 1;

  // Species:
  species Ci in compartment = 0.25;
  species Ce in compartment = 0.25;
  species K in compartment = 0.375;
  species P in compartment = 0;

  // Parameters:
  v1 = 0.04;
  v2 = 0.833;
  v3 = 10.853;
  k2 = 1;
  k3 = 0.9;
  k4 = 2;
  k5 = 0.1567;
  k6 = 0.06;
  gamma2 = 2;
  a0 = 0.03;
  a1 = 0.9384;
  d3 = 0.39;
  a2 = 0.002;
  k0 = 0.8;
  d0 = 0.5;
  cm0 = 1.5;
  d2 = 0.74;
  alpha2 = 0.49542;
  alpha1 = 0.4;
  beta = 0.648;
  d1 = 0.39;
  gamma1 = 0.1;
  h = 1;
  m = 2;
  n = 2;
  p = 4;

  // Reactions:
  Calcium_Influx: => Ci; compartment*Constant_flux__irreversible(v1);
  Calcium_Reabsorption_ER: Ci => Ce; compartment*Function_for_Calcium_Reabsorption_ER(v2, Ci, n, k2);
  Calcium_Release_ER: Ce => Ci; compartment*Function_for_Calcium_Release_ER(v3, gamma2, Ci, p, k3, Ce, m, k4);
  Calcium_Extrusion: Ci => ; compartment*k5*Ci;
  Calcium_Efflux_ER: Ce => Ci; compartment*k6*Ce;
  PI3K_Recruitment: => K; compartment*Function_for_PI3K_Recruitment(a0, cm0, Ci, h, d0, k0, a1, P, d3);  // modifiers: Ci, P
  PI3KC3_Dissociation: K => ; compartment*a2*K;
  PI3P_Production_PIKI: => P; compartment*Function_for_PI3P_Production_PIKI(alpha2, P, d2);
  PI3P_Production_PI3KC3: => P; compartment*Function_for_PI3P_Production_PI3KC3(alpha1, K);  // modifiers: K
  MTM1_Dephosphorylation: P => ; compartment*Function_for_MTM1_Dephosphorylation(beta, P, d1);
  PI3P_Dephosphorylation_SapM: P => ; compartment*gamma1*P;

  // Unit definitions:
  unit volume = 1e-3 litre;
  unit substance = 1e-6 mole;
end
