// SBML level 2 version 4
// dcterms:bibliographicCitation: urn:miriam:pubmed:26987523

function Function_for_PC_Death(epsilon, P, a2, A0, c_ep, pb)
  epsilon*P*(a2/A0 + c_ep^2/(c_ep^2 + pb^2));
end

function Function_for_VEGF_VEGFR2_Receptor_Loss(rho, c_d, vb, Ei, ET, bv)
  rho*(c_d^2/(c_d^2 + vb^2))*(Ei/ET)*bv;
end

function Function_for_PDGF_Production_Immature_ECs(alpha_p, Ei)
  alpha_p*Ei;
end

function Function_for_Ang2_Intracellular_Loss_EC_Death(rho, Ei, ET, aw, c_d, vb)
  rho*(Ei/ET)*aw*(c_d^2/(c_d^2 + vb^2));
end

function Function_for_Ang2_Intracellular_Exocytosis(alpha_a2, aw, Ei, E0, A0)
  alpha_a2*aw*(aw^2/(aw^2 + (Ei/E0/(A0/2))^2));
end

function Function_for_VEGF_Production(alpha_v, Em, EP, E0)
  alpha_v/((Em + EP)/E0 + 1);
end

function Function_for_Immature_EC_Proliferation(theta, vb, c_ep, ab, c_a, ET, E0, Ei)
  theta*(vb^2/(vb^2 + c_ep^2))*(1 + ab^2/(ab^2 + c_a^2))*(1 - ET/E0)*Ei;
end

function Function_for_Ang1_Tie2_Receptor_Loss(rho, c_d, vb, Ei, ET, ba1)
  rho*(c_d^2/(c_d^2 + vb^2))*(Ei/ET)*ba1;
end

function Function_for_VEGFR2_Receptor_Generation(phi, theta, vb, c_ep, ab, c_a, ET, E0, Ei)
  phi*theta*(vb^2/(vb^2 + c_ep^2))*(1 + ab^2/(ab^2 + c_a^2))*(1 - ET/E0)*Ei;
end

function Function_for_Immature_EC_Maturation(eta, Ei, lambda, ba2, ba1)
  eta*Ei*(lambda^2/(lambda^2 + (ba2/ba1)^2));
end

function Function_for_PC_Death_Immature_ECs(epsilon, EP, a2, A0, pb, c_ep)
  epsilon*EP*(a2/A0 + c_ep^2/(c_ep^2 + pb^2));
end

function Function_for_PC_Proliferation(kappa, pb, c_pp, PT, P0, P)
  kappa*(pb^2/(pb^2 + c_pp^2))*(1 - PT/P0)*P;
end

function Function_for_Ang1_Production(alpha_a1, PT)
  alpha_a1*PT;
end

function Function_for_Tie2_Receptor_Loss(rho, c_d, vb, Ei, ET, ra)
  rho*(c_d^2/(c_d^2 + vb^2))*(Ei/ET)*ra;
end

function Function_for_VEGFR2_Receptor_Loss(rho, c_d, vb, Ei, ET, rv)
  rho*(c_d^2/(c_d^2 + vb^2))*(Ei/ET)*rv;
end

function Function_for_Ang2_Production_WBCs(alpha_aw, vb, Ei, A0, E0, aw)
  alpha_aw*(1 + vb)*(Ei*(A0/E0) - aw);
end

function Function_for_Ang2_Tie2_Receptor_Loss(rho, c_d, vb, Ei, ET, ba2)
  rho*(c_d^2/(c_d^2 + vb^2))*(Ei/ET)*ba2;
end

function Function_for_PDGF_PDGFR_B_Receptor_Loss(epsilon, bp, a2, A0, c_pp, pb)
  epsilon*bp*(a2/A0 + c_pp^2/(c_pp^2 + pb^2));
end
Function_for_PDGF_PDGFR_B_Receptor_Loss is "Function_for_PDGF_PDGFR-B_Receptor_Loss";

function Function_for_Immature_EC_Death(rho, c_d, vb, Ei)
  rho*(c_d^2/(c_d^2 + vb^2))*Ei;
end

function Function_for_Mature_EC_Dematuration(mu, Em, ba2, ba1, lambda)
  mu*Em*((ba2/ba1)^2/(lambda^2 + (ba2/ba1)^2));
end

function Function_for_Tie2_Receptor_Generation(phi, theta, vb, c_ep, ab, c_w, ET, E0, Ei)
  phi*theta*(vb^2/(vb^2 + c_ep^2))*(1 + ab^2/(ab^2 + c_w^2))*(1 - ET/E0)*Ei;
end

function Function_for_PDGFR_B_Receptor_Generation(phi, kappa, pb, c_pp, PT, P0, P)
  phi*kappa*(pb^2/(pb^2 + c_pp^2))*(1 - PT/P0)*P;
end
Function_for_PDGFR_B_Receptor_Generation is "Function_for_PDGFR-B_Receptor_Generation";

function Function_for_PDGFR_B_Receptor_Loss(epsilon, rp, a2, A0, c_pp, pb)
  epsilon*rp*(a2/A0 + c_pp^2/(c_pp^2 + pb^2));
end
Function_for_PDGFR_B_Receptor_Loss is "Function_for_PDGFR-B_Receptor_Loss";

model Hutchinson2016___Vascular_phenotype_identification_and_anti_angiogenic_treatment_recommendation()
  // Hutchinson2016 - Vascular phenotype identification and anti-angiogenic treatment recommendation
  // This is a spatially averaged multiscale mathematical model of tumor angiogenesis. The model describes the dynamics of VEGF, Ang1, Ang2, and PDGF, coupled with those of mature and immature endothelial cells and pericyte cells.
  // hasProperty ncit:C19361
  // hasProperty mamo:MAMO_0000046
  // hasTaxon taxonomy:9606
  // isDescribedBy pubmed:26987523

  // Compartments:
  compartment compartment = 1;

  // Species:
  species v in compartment = 8e-5;
  species rv in compartment = 0.0006;
  species bv in compartment = 0.0006;
  species a1 in compartment = 8e-5;
  species aw in compartment = 8e-5;
  species a2 in compartment = 8e-5;
  species ra in compartment = 0.0006;
  species ba1 in compartment = 0.0003;
  species ba2 in compartment = 0.0003;
  species p in compartment = 8e-5;
  species rp in compartment = 0.0004;
  species bp in compartment = 0.0004;
  species Ei in compartment = 4e-9;
  species Em in compartment = 8e-9;
  species P in compartment = 8e-9;
  species EP in compartment = 0;

  // Parameters:
  V0 = 0.008;
  A0 = 0.008;
  p0 = 0.008;
  E0 = 8e-8;
  P0 = 4e-8;
  phi = 100000;
  k_on_v = 18800;
  k_off_v = 0.99;
  k_int_v = 0.86;
  alpha_v = 0.003;
  delta_v = 1;
  k_on_a1 = 417;
  k_off_a1 = 1.25;
  k_int_a1 = 1;
  k_on_a2 = 417;
  k_off_a2 = 1.25;
  delta_a1 = 4.69;
  delta_a2 = 0.0625;
  delta_aw = 0.031;
  alpha_a1 = 1000000;
  alpha_aw = 0.8;
  alpha_a2 = 3;
  alpha_p = 6700;
  k_on_p = 18800;
  k_off_p = 0.86;
  delta_p = 1.2;
  theta = 0.0417;
  rho = 0.02;
  kappa = 0.08;
  epsilon = 0.04;
  zeta = 500000;
  nu = 0.005;
  eta = 0.01;
  mu = 0.01;
  c_ep = 0.3;
  c_d = 0.1;
  c_a = 0.3;
  c_pp = 0.02;
  lambda = 8;

  // Assignment rules:
  vb := bv/(bv + rv);
  pb := bp/(rp + bp);
  PT := P + EP;
  ab := ba2/(ra + ba1 + ba2);
  ET := Ei + Em + EP;
  Cells_All := Ei + Em + P + EP;
  Ei_ND := Ei/Cells_All;
  Em_ND := Em/Cells_All;
  P_ND := P/Cells_All;
  EP_ND := EP/Cells_All;

  // Reactions:
  VEGF_Production: => v; compartment*Function_for_VEGF_Production(alpha_v, Em, EP, E0);  // modifiers: Em, EP
  VEGF_Association: v + rv => bv; compartment*k_on_v*v*rv;
  VEGF_Dissociation: bv => v + rv; compartment*k_off_v*bv;
  VEGF_Decay: v => ; compartment*delta_v*v;
  VEGF_VEGFR2_Internalisation: bv => rv; compartment*k_int_v*bv;
  VEGFR2_Receptor_Generation: => rv; compartment*Function_for_VEGFR2_Receptor_Generation(phi, theta, vb, c_ep, ab, c_a, ET, E0, Ei);  // modifiers: Ei
  VEGFR2_Receptor_Loss: rv => ; compartment*Function_for_VEGFR2_Receptor_Loss(rho, c_d, vb, Ei, ET, rv);  // modifiers: Ei
  VEGF_VEGFR2_Receptor_Loss: bv => ; compartment*Function_for_VEGF_VEGFR2_Receptor_Loss(rho, c_d, vb, Ei, ET, bv);  // modifiers: Ei
  Ang1_Production: => a1; compartment*Function_for_Ang1_Production(alpha_a1, PT);
  Ang1_Tie2_Association: a1 + ra => ba1; compartment*k_on_a1*a1*ra;
  Ang1_Tie2_Dissociation: ba1 => ra + a1; compartment*k_off_a1*ba1;
  Ang1_Tie2_Internalisation: ba1 => ra; compartment*k_int_a1*ba1;
  Ang1_Decay: a1 => ; compartment*delta_a1*a1;
  Ang2_Intracellular_Production_WBCs: => aw; compartment*Function_for_Ang2_Production_WBCs(alpha_aw, vb, Ei, A0, E0, aw);  // modifiers: Ei
  Ang2_Intracellular_Decay: aw => ; compartment*delta_aw*aw;
  Ang2_Intracellular_Exocytosis: aw => a2; compartment*Function_for_Ang2_Intracellular_Exocytosis(alpha_a2, aw, Ei, E0, A0);  // modifiers: Ei
  Ang2_Intracellular_Loss_EC_Death: aw => ; compartment*Function_for_Ang2_Intracellular_Loss_EC_Death(rho, Ei, ET, aw, c_d, vb);  // modifiers: Ei
  Ang2_Tie2_Association: a2 + ra => ba2; compartment*k_on_a2*a2*ra;
  Ang2_Tie2_Dissociation: ba2 => ra + a2; compartment*k_off_a2*ba2;
  Ang2_Decay: a2 => ; compartment*delta_a2*a2;
  Tie2_Receptor_Generation: => ra; compartment*Function_for_Tie2_Receptor_Generation(phi, theta, vb, c_ep, ab, c_a, ET, E0, Ei);  // modifiers: Ei
  Tie2_Receptor_Loss: ra => ; compartment*Function_for_Tie2_Receptor_Loss(rho, c_d, vb, Ei, ET, ra);  // modifiers: Ei
  Ang1_Tie2_Receptor_Loss: ba1 => ; compartment*Function_for_Ang1_Tie2_Receptor_Loss(rho, c_d, vb, Ei, ET, ba1);  // modifiers: Ei
  Ang2_Tie2_Receptor_Loss: ba2 => ; compartment*Function_for_Ang2_Tie2_Receptor_Loss(rho, c_d, vb, Ei, ET, ba2);  // modifiers: Ei
  PDGF_Production_Immature_ECs: => p; compartment*Function_for_PDGF_Production_Immature_ECs(alpha_p, Ei);  // modifiers: Ei
  PDGF_PDGFR_B_Association: p + rp => bp; compartment*k_on_p*p*rp; PDGF_PDGFR_B_Association is "PDGF_PDGFR-B_Association";
  PDGF_PDGFR_B_Dissociation: bp => p + rp; compartment*k_off_p*bp; PDGF_PDGFR_B_Dissociation is "PDGF_PDGFR-B_Dissociation";
  PDGFR_B_Receptor_Generation: => rp; compartment*Function_for_PDGFR_B_Receptor_Generation(phi, kappa, pb, c_pp, PT, P0, P); PDGFR_B_Receptor_Generation is "PDGFR-B_Receptor_Generation";  // modifiers: P
  PDGFR_B_Receptor_Loss: rp => ; compartment*Function_for_PDGFR_B_Receptor_Loss(epsilon, rp, a2, A0, c_pp, pb); PDGFR_B_Receptor_Loss is "PDGFR-B_Receptor_Loss";  // modifiers: a2
  PDGF_PDGFR_B_Receptor_Loss: bp => ; compartment*Function_for_PDGF_PDGFR_B_Receptor_Loss(epsilon, bp, a2, A0, c_pp, pb); PDGF_PDGFR_B_Receptor_Loss is "PDGF_PDGFR-B_Receptor_Loss";  // modifiers: a2
  Immature_EC_Proliferation: => Ei; compartment*Function_for_Immature_EC_Proliferation(theta, vb, c_ep, ab, c_a, ET, E0, Ei);
  Immature_EC_Death: Ei => ; compartment*Function_for_Immature_EC_Death(rho, c_d, vb, Ei);
  EC_PC_Complex_Association_Immature_ECs: P + Ei => EP; compartment*zeta*P*Ei;
  EC_PC_Complex_Association_Mature_ECs: Em + P => EP; compartment*zeta*Em*P;
  EC_PC_Complex_Dissociation: EP => P + Ei; compartment*nu*EP;
  PC_Death_Immature_ECs: EP => Ei; compartment*Function_for_PC_Death_Immature_ECs(epsilon, EP, a2, A0, pb, c_pp);  // modifiers: a2
  Immature_EC_Maturation: Ei => Em; compartment*Function_for_Immature_EC_Maturation(eta, Ei, lambda, ba2, ba1);  // modifiers: ba2, ba1
  Mature_EC_Dematuration: Em => Ei; compartment*Function_for_Mature_EC_Dematuration(mu, Em, ba2, ba1, lambda);  // modifiers: ba2, ba1
  PC_Proliferation: => P; compartment*Function_for_PC_Proliferation(kappa, pb, c_pp, PT, P0, P);
  PC_Death: P => ; compartment*Function_for_PC_Death(epsilon, P, a2, A0, c_pp, pb);  // modifiers: a2
  PDGF_Decay: p => ; compartment*delta_p*p;

  // Unit definitions:
  unit volume = 1e-3 litre;
  unit time = 3600 second;
  unit substance = item;
end
