// SBML level 2 version 4
// dcterms:bibliographicCitation: urn:miriam:doi:10.1016/j.amc.2019.06.037

function Constant_flux__irreversible(v)
  v;
end
Constant_flux__irreversible is "Constant flux (irreversible)";

function Function_for_Tumor_Growth(r, x, K)
  r*x*(1 - x/K);
end

function Function_for_IFN_gamma_Production(alpha, x, y, b, w)
  alpha*x*y/(1 + b*w);
end
Function_for_IFN_gamma_Production is "Function_for_IFN-gamma_Production";

function Function_for_Tumor_Death_Cytokines(delta, x, z, m)
  delta*x*z/(m + x);
end

function Function_for_CTLA_4_Expression(c, y, u)
  c*(1 - u)*y;
end
Function_for_CTLA_4_Expression is "Function_for_CTLA-4_Expression";

function Function_for_Th_Proliferation(beta, x, z, eta, nu, w)
  beta*x*z/((x + eta)*(1 + nu*w));
end

model Yu2019___A_mathematical_model_of_tumor_immune_interactions_with_an_immune_checkpoint_inhibitor()
  // Yu2019 - A mathematical model of tumor-immune interactions with an immune checkpoint inhibitor
  // This is a mathematical model investigating interactions among malignant tumor cells, CD4+ T cells, anti-tumor cytokines (specifically IFN-gamma), and the immune checkpoint inhibitor CTLA-4 to assess the importance of immune checkpoints in mediating tumor regression.
  // hasProperty ncit:C15411
  // hasProperty mamo:MAMO_0000046
  // hasProperty ncit:C20464
  // hasProperty ncit:C15438
  // hasTaxon taxonomy:10090
  // isDescribedBy doi:10.1016/j.amc.2019.06.037

  // Compartments:
  compartment compartment = 1;

  // Species:
  species x in compartment = 250000;
  species y in compartment = 0;
  species z in compartment = 0;
  species w in compartment = 0;

  // Parameters:
  r = 0.514;
  K = 980390000;
  delta = 0.2;
  m = 100000;
  a = 0.1;
  beta = 0.09;
  eta = 1000;
  nu = 0.001;
  alpha = 9;
  b = 0.001;
  mu = 34;
  c = 5000;
  d = 8.3178;
  u = 0.5;
  I_3 = 0;
  I_2_Dosage = 10;

  // Assignment rules:
  I_2 := piecewise(I_2_Dosage, (time >= 11) && (time <= 21), 0);

  // Reactions:
  Tumor_Growth: => x; compartment*Function_for_Tumor_Growth(r, x, K);
  Tumor_Death_Cytokines: x => ; compartment*Function_for_Tumor_Death_Cytokines(delta, x, z, m);  // modifiers: z
  Th_Proliferation: => y; compartment*Function_for_Th_Proliferation(beta, x, z, eta, nu, w);  // modifiers: x, z, w
  Th_Apoptosis: y => ; compartment*a*y;
  IFN_gamma_Production: => z; compartment*Function_for_IFN_gamma_Production(alpha, x, y, b, w); IFN_gamma_Production is "IFN-gamma_Production";  // modifiers: x, y, w
  IFN_gamma_Decay: z => ; compartment*mu*z; IFN_gamma_Decay is "IFN-gamma_Decay";
  CTLA_4_Expression: => w; compartment*Function_for_CTLA_4_Expression(c, y, u); CTLA_4_Expression is "CTLA-4_Expression";  // modifiers: y
  CTLA_4_Decay: w => ; compartment*d*w; CTLA_4_Decay is "CTLA-4_Decay";
  Th_Treatment: => y; compartment*Constant_flux__irreversible(I_2);
  IFN_gamma_Treatment: => z; compartment*Constant_flux__irreversible(I_3); IFN_gamma_Treatment is "IFN-gamma_Treatment";

  // Unit definitions:
  unit volume = 1e-3 litre;
  unit time = 86400 second;
  unit substance = item;
end
