// SBML level 2 version 4
// dcterms:bibliographicCitation: urn:miriam:pubmed:24703981

function Constant_flux__irreversible(v)
  v;
end
Constant_flux__irreversible is "Constant flux (irreversible)";

function Henri_Michaelis_Menten__irreversible(substrate, Km, V)
  V*substrate/(Km + substrate);
end
Henri_Michaelis_Menten__irreversible is "Henri-Michaelis-Menten (irreversible)";

function Function_for_v10(km7, PTP, x10)
  km7*PTP*x10;
end

function Function_for_v30(x19, k_j5, x35, x37, K_j5)
  (1 + x19/100)*(k_j5*x35*x37/(K_j5 + x37));
end

function Function_for_v11_x21(k_7, x21, x4, x5, IRp_Constant)
  k_7*x21*(x4 + x5)/IRp_Constant;
end

function Function_for_v28(k_j3, x34, x35, K_j3)
  k_j3*x34*x35/(K_j3 + x35);
end

function Function_for_v19_x27_x4_x5(km13, x27_IRSh)
  1/2*km13*x27_IRSh;
end

function Function_for_v19_x27_x26(km13, x27_IRSh)
  km13*x27_IRSh;
end

function Function_for_v11_x22(k_m7_pp, PTP, x22)
  k_m7_pp*PTP*x22;
end

function Function_for_v_10_2(k7, x9, x4, x5, IRp_Constant)
  k7*x9*(x4 + x5)/IRp_Constant;
end

function Function_for_v8_v9(k_6, PTP, x)
  k_6*PTP*x;
end

function Function_for_v7(k_5, EN_Receptor, k_m5)
  k_5 - k_m5*EN_Receptor;
end

function Function_for_v19_x4(k13, Shc, x4_I2R_P)
  k13*x4_I2R_P*Shc;
end

function Function_for_v25(k, m, s, K)
  k*m*s/(K + s);
end

function Function_for_v33(ki1, kmi1, v33_Conditional, x21_IRS_2)
  v33_Conditional*(ki1 - kmi1*x21_IRS_2);
end

function Function_for_v3_PTP(km3, PTP, x5)
  km3*PTP*x5;
end

function Function_for_v19_x5(k13, x5_IR_P, x26_Shc)
  k13*x5_IR_P*x26_Shc;
end

model Huang2014___Systematic_modeling_for_the_insulin_signaling_network_mediated_by_IRS1_and_IRS2()
  // Huang2014 - Systematic modeling for the insulin signaling network mediated by IRS1 and IRS2
  // This is a mathematical model is which is a combination of systemic models for the insulin signaling network as mediated by insulin receptor substrate (IRS) 1 and 2.
  // isDescribedBy pubmed:24703981
  // hasProperty ncit:C28475
  // hasProperty ncit:C28474
  // hasProperty ncit:C39130
  // hasProperty mamo:MAMO_0000046

  // Compartments:
  compartment cmp = 1;

  // Species:
  species x2_Receptor in cmp = 9e-9;
  species x6_EN_Receptor in cmp = 1e-9;
  species x9_IRS_1 in cmp = 1e-8;
  species x21_IRS_2 in cmp = 1e-8/3;
  species x11_PI3K in cmp = 1e-9;
  species x14_PI45P2 in cmp = 99.4;
  species x15_PI34P2 in cmp = 0.29;
  species x13_PI345P3 in cmp = 0.31;
  species x16_AKT in cmp = 100;
  species x18_PKR in cmp = 70;
  species x19_PKR_P in cmp = 30;
  species x26_Shc in cmp = 1e-6;
  species x31_GS in cmp = 1e-8;
  species x33_RasGDP in cmp = 1.2e-7;
  species x35_MEK in cmp = 1.2e-7;
  species x37_JNK in cmp = 1e-6;
  species x4_I2R_P in cmp = 0;
  species x20_IRS_1_SerP in cmp = 0;
  species x22_IRS_2_TyrP in cmp = 0;
  species x23_PI3K_IRS_2_P in cmp = 0;
  species x38_JNK_P in cmp = 0;
  species x25_ActiveFox01 in cmp = 0;
  species x17_AKT_P in cmp = 0;
  species x12_PI3K_IRS_1_P in cmp = 0;
  species $x1_Insulin in cmp;
  species x3_IR in cmp = 0;
  species x8_EN_IR_p in cmp = 0;
  species x7_EN_I2R_p in cmp = 0;
  species x10_IRS_1_TyrP in cmp = 1/6*1e-8;
  species x27_IRSh in cmp = 0;
  species x5_IR_P in cmp = 0;
  species x28_IRSh_P in cmp = 0;
  species x29_IRShGS in cmp = 0;
  species x32_ShGS in cmp = 0;
  species x30_Sh_P in cmp = 0;
  species x34_RasGTP in cmp = 0;
  species x36_MEK_P in cmp = 0;
  species x24_Fox01 in cmp = 1e-6;

  // Parameters:
  k_1 = 60000000;
  k__1 = 0.2; k__1 is "k_-1";
  var k__2; k__2 is "k_-2";
  k_3 = 2500;
  var k__3; k__3 is "k_-3";
  k_4_prime = 0.0021;
  var k__4_prime; k__4_prime is "k_-4_prime";
  k_4 = 0.000333;
  var k__4; k__4 is "k_-4";
  k_5 = 1.67e-18;
  var k__5; k__5 is "k_-5";
  k_6 = 0.461;
  var k__7; k__7 is "k_-7";
  k__7_pp = 1.4; k__7_pp is "k_-7_pp";
  a = 0.2;
  IRp_Constant = 8.97e-10;
  k__7_p = 0.516; k__7_p is "k_-7_p";
  b_1 = 50;
  b_2 = 2;
  k_8 = 7e11;
  k__8 = 10; k__8 is "k_-8";
  k_9s = 1.39;
  k_9b = 0.125;
  k__9 = 41.7; k__9 is "k_-9";
  k_10 = 3.08;
  k__10 = 2.8; k__10 is "k_-10";
  k__11 = 3; k__11 is "k_-11";
  var k__12; k__12 is "k_-12";
  k_12c = 0.0069;
  k_13 = 540000;
  k__13 = 36; k__13 is "k_-13";
  k_14 = 1200;
  k__14 = 300; k__14 is "k_-14";
  k_15 = 54000;
  k__15 = 2.574; k__15 is "k_-15";
  k_16 = 7.2;
  k__16 = 1440; k__16 is "k_-16";
  k_17 = 6;
  k__17 = 126000; k__17 is "k_-17";
  V_18 = 1.02e-7;
  K_18 = 3.4e-7;
  k_e1 = 13.32;
  K_e1 = 1.81e-10;
  k_j1 = 13.32;
  K_j1 = 1.81e-10;
  V_j2 = 1.73e-8;
  K_j2 = 5.71e-11;
  k_j3 = 210;
  K_j3 = 3.17e-7;
  k_j4 = 3.48e-9;
  K_j4 = 2.2e-6;
  k_j5 = 570;
  K_j5 = 0.000146;
  k_j6 = 1.8e-8;
  K_j6 = 1.6e-7;
  k__f1 = 3; k__f1 is "k_-f1";
  k__i1 = 0.003; k__i1 is "k_-i1";

  // Assignment rules:
  k_f1 := 0.1*k__f1 + x19_PKR_P/100*29.9*k__f1;
  k_i1 := 2e-11*x25_ActiveFox01/(1e-8 + x25_ActiveFox01);
  x1_Insulin := piecewise(1e-8, (time >= 15) && (time <= 20), piecewise(1e-8*(1 - (time - 20)/45), (time >= 20) && (time <= 65), 0));
  k__2 := k__1*100;
  k__5 := 10*k_5;
  k__4 := 9*k_4;
  k__4_prime := k_4_prime/10;
  k__3 := k__1;
  k_2 := k_1;
  k_11 := 0.1*k__11*(x13_PI345P3 - 0.31)/(3.1 - 0.31);
  k__12 := 0.1*k_12c + x17_AKT_P/10*29.9*k_12c;
  k_12 := k_12c + x38_JNK_P/(x37_JNK + x38_JNK_P)*k_12c*10;
  k_7_p := 2*(x4_I2R_P + x5_IR_P)/IRp_Constant*(0.1 + b_2*x19_PKR_P/(50 + x19_PKR_P)*(1 + b_1*x17_AKT_P/(50 + x17_AKT_P)));
  PTP := 1 - 0.25*(x17_AKT_P/100);
  k__7 := 1.4*PTP + 1000000000*a*x20_IRS_1_SerP;
  k_7 := 4.16*(IRp_Constant + x4_I2R_P)/IRp_Constant;
  k_9 := (k_9s - k_9b)*(x12_PI3K_IRS_1_P + x23_PI3K_IRS_2_P)/(x23_PI3K_IRS_2_P + x11_PI3K + x12_PI3K_IRS_1_P) + k_9b;
  IRS1_Tyr_1e8 := x10_IRS_1_TyrP*100000000;
  Insulin_Input_Value := piecewise(1e-8, (time >= 13) && (time <= 14), piecewise(0, (time > 14) && (time < 20), piecewise(-1*1e-8/45, time >= 20, 0)));
  IRS_2_Total_1e8 := (x21_IRS_2 + x22_IRS_2_TyrP)*100000000;
  v33_Conditional := piecewise(0, x25_ActiveFox01 <= 2.5e-7, 1);
  Insulin_1e8 := x1_Insulin*100000000;

  // Reactions:
  v1: $x1_Insulin + x2_Receptor -> x3_IR; cmp*(k_1*x1_Insulin*x2_Receptor - k__1*x3_IR);
  v2: $x1_Insulin + x5_IR_P -> x4_I2R_P; cmp*(k_2*x1_Insulin*x5_IR_P - k__2*x4_I2R_P);
  v3: x3_IR => x5_IR_P; cmp*k_3*x3_IR;
  v4: x5_IR_P -> x8_EN_IR_p; cmp*(k_4_prime*x5_IR_P - k__4_prime*x8_EN_IR_p);
  v5: x4_I2R_P -> x7_EN_I2R_p; cmp*(k_4_prime*x4_I2R_P - k__4_prime*x7_EN_I2R_p);
  v6: x2_Receptor -> x6_EN_Receptor; cmp*(k_4*x2_Receptor - k__4*x6_EN_Receptor);
  v7: -> x6_EN_Receptor; cmp*Function_for_v7(k_5, x6_EN_Receptor, k__5);
  v8: x8_EN_IR_p => x6_EN_Receptor; cmp*Function_for_v8_v9(k_6, PTP, x8_EN_IR_p);
  v9: x7_EN_I2R_p => x6_EN_Receptor; cmp*Function_for_v8_v9(k_6, PTP, x7_EN_I2R_p);
  v10: x10_IRS_1_TyrP => x9_IRS_1; cmp*Function_for_v10(k__7, PTP, x10_IRS_1_TyrP);
  v11_x21: x21_IRS_2 => x22_IRS_2_TyrP; cmp*Function_for_v11_x21(k_7, x21_IRS_2, x4_I2R_P, x5_IR_P, IRp_Constant);  // modifiers: x4_I2R_P, x5_IR_P
  v12: x9_IRS_1 -> x20_IRS_1_SerP; cmp*(k_7_p*x9_IRS_1 - k__7_p*x20_IRS_1_SerP);
  v13: x10_IRS_1_TyrP + x11_PI3K -> x12_PI3K_IRS_1_P; cmp*(k_8*x10_IRS_1_TyrP*x11_PI3K - k__8*x12_PI3K_IRS_1_P);
  v14: x22_IRS_2_TyrP + x11_PI3K -> x23_PI3K_IRS_2_P; cmp*(k_8*x22_IRS_2_TyrP*x11_PI3K - k__8*x23_PI3K_IRS_2_P);
  v15: x14_PI45P2 -> x13_PI345P3; cmp*(k_9*x14_PI45P2 - k__9*x13_PI345P3);
  v16: x15_PI34P2 -> x13_PI345P3; cmp*(k_10*x15_PI34P2 - k__10*x13_PI345P3);
  v17: x16_AKT -> x17_AKT_P; cmp*(k_11*x16_AKT - k__11*x17_AKT_P);
  v18: x18_PKR -> x19_PKR_P; cmp*(k_12*x18_PKR - k__12*x19_PKR_P);
  v19_x27_x26: x27_IRSh => x26_Shc; cmp*Function_for_v19_x27_x26(k__13, x27_IRSh);
  v20: x27_IRSh -> x28_IRSh_P; cmp*(k_14*x27_IRSh - k__14*x28_IRSh_P);
  v21: x28_IRSh_P + x31_GS -> x29_IRShGS; cmp*(k_15*x28_IRSh_P*x31_GS - k__15*x29_IRShGS);
  v22: x29_IRShGS -> x32_ShGS + x5_IR_P; cmp*(k_16*x29_IRShGS - k__16*x32_ShGS*x5_IR_P);
  v23: x32_ShGS -> x31_GS + x30_Sh_P; cmp*(k_17*x32_ShGS - k__17*x31_GS*x30_Sh_P);
  v24: x30_Sh_P => x26_Shc; cmp*Henri_Michaelis_Menten__irreversible(x30_Sh_P, K_18, V_18);
  v25: x33_RasGDP => x34_RasGTP; cmp*Function_for_v25(k_e1, x32_ShGS, x33_RasGDP, K_e1);  // modifiers: x32_ShGS
  v26: x33_RasGDP => x34_RasGTP; cmp*Function_for_v25(k_j1, x11_PI3K, x33_RasGDP, K_j1);  // modifiers: x11_PI3K
  v27: x34_RasGTP => x33_RasGDP; cmp*Henri_Michaelis_Menten__irreversible(x34_RasGTP, K_j2, V_j2);
  v28: x35_MEK => x36_MEK_P; cmp*Function_for_v28(k_j3, x34_RasGTP, x35_MEK, K_j3);  // modifiers: x34_RasGTP
  v29: x36_MEK_P => x35_MEK; cmp*Henri_Michaelis_Menten__irreversible(x36_MEK_P, K_j4, k_j4);
  v30: x37_JNK => x38_JNK_P; cmp*Function_for_v30(x19_PKR_P, k_j5, x35_MEK, x37_JNK, K_j5);  // modifiers: x19_PKR_P, x35_MEK
  v31: x38_JNK_P => x37_JNK; cmp*Henri_Michaelis_Menten__irreversible(x38_JNK_P, K_j6, k_j6);
  v32: x24_Fox01 -> x25_ActiveFox01; cmp*(k_f1*x24_Fox01 - k__f1*x25_ActiveFox01);
  v33: -> x21_IRS_2; cmp*Function_for_v33(k_i1, k__i1, v33_Conditional, x21_IRS_2);
  v3_PTP: x5_IR_P => x2_Receptor; cmp*Function_for_v3_PTP(k__3, PTP, x5_IR_P);
  v19_x27_x4_x5: => x4_I2R_P + x5_IR_P; cmp*Function_for_v19_x27_x4_x5(k__13, x27_IRSh);  // modifiers: x27_IRSh
  v19_x27_x4: x4_I2R_P + x26_Shc => x27_IRSh; cmp*Function_for_v19_x4(k_13, x26_Shc, x4_I2R_P);
  v19_x27_x5: x5_IR_P + x26_Shc => x27_IRSh; cmp*Function_for_v19_x5(k_13, x5_IR_P, x26_Shc);
  v_10_2: x9_IRS_1 => x10_IRS_1_TyrP; cmp*Function_for_v_10_2(k_7, x9_IRS_1, x4_I2R_P, x5_IR_P, IRp_Constant);  // modifiers: x4_I2R_P, x5_IR_P
  v11_x22: x22_IRS_2_TyrP => x21_IRS_2; cmp*Function_for_v11_x22(k__7_pp, PTP, x22_IRS_2_TyrP);
  Insulin_Input: => $x1_Insulin; cmp*Constant_flux__irreversible(Insulin_Input_Value);

  // Unit definitions:
  unit time = 60 second;
end
