// SBML level 2 version 4
// dcterms:bibliographicCitation: Modeling the dynamics of hepatitis C virus with combined antiviral drug therapy: interferon and ribavirin urn:miriam:pubmed:23891586

function Function_for_formation_of_target_cells(s, r, T, k)
  s + r*T*(1 - (T + 1)/k);
end

function Function_for_removal_of_target_cell(d1, T, c, n1, alpha, V1)
  d1*T + (1 - c*n1)*alpha*V1*T;
end

function Function_for_formation_of_infected_cell(c, n1, alpha, V1, T)
  (1 - c*n1)*alpha*V1*T;
end

function Function_for_removal_of_infected_cell(d2, I)
  d2*I;
end

function Function_for_formation_of_infected_virion(nr, n1, beta, I)
  (1 - (nr + n1)/2)*beta*I;
end

function Function_for_removal_of_infected_virion(d3, VI)
  d3*VI;
end

function Function_for_formation_of_noninfected_virion(nr, n1, beta, I)
  (nr + n1)/2*beta*I;
end

function Function_for_removal_of_noninfected_virion(d3, VNI)
  d3*VNI;
end

model Sandip2013___Modeling_the_dynamics_of_hepatitis_C_virus_with_combined_antiviral_drug_therapy__interferon_and_ribavirin()
  // Sandip2013 - Modeling the dynamics of hepatitis C virus with combined antiviral drug therapy: interferon and ribavirin.
  // Modeling the dynamics of hepatitis C virus with combined antiviral drug therapy: interferon and ribavirin.
  // Banerjee S1, Keval R, Gakkhar S.
  // Author information
  // 1
  // Department of Mathematics, Indian Institute of Technology Roorkee (IITR), Roorkee 247667, Uttaranchal, India. Electronic address: sandofma@iitr.ernet.in.
  // Abstract
  // A mathematical modeling of hepatitis C virus (HCV) dynamics and antiviral therapy has been presented in this paper. The proposed model, which involves four coupled ordinary differential equations, describes the interaction of target cells (hepatocytes), infected cells, infectious virions and non-infectious virions. The model takes into consideration the addition of ribavirin to interferon therapy and explains the dynamics regarding a biphasic and triphasic decline of viral load in the model. A critical drug efficacy parameter has been defined and it is shown that for an efficacy above this critical value, HCV is eradicated whereas for efficacy lower this critical value, a new steady state for infectious virions is reached, which is lower than the previous steady state value.
  // Copyright © 2013 Elsevier Inc. All rights reserved.
  // KEYWORDS:
  // Hepatitis C virus (HCV); Infected cells; Infectious virions; Interferon; Noninfectious virions; Ribavirin; Target cells
  // hasProperty mamo:MAMO_0000046
  // hasTaxon taxonomy:9606
  // isDescribedBy pubmed:23891586

  // Compartments:
  compartment compartment = 1;

  // Species:
  species T in compartment = 17000000;
  species I in compartment = 1;
  species VI in compartment = 1;
  species VNI in compartment = 1;

  // Parameters:
  s = 1;
  r = 1.99;
  k = 36000000;
  d1 = 0.01;
  alpha = 2.25e-7;
  d2 = 1;
  beta = 2.9;
  d3 = 6;
  nr = 0;
  c = 0;
  n1 = 0.5;

  // Reactions:
  Formation_of_target_cells: => T; compartment*Function_for_formation_of_target_cells(s, r, T, k);
  Removal_of_target_cell: T => ; compartment*Function_for_removal_of_target_cell(d1, T, c, n1, alpha, VI);  // modifiers: VI
  Formation_infected_cell: => I; compartment*Function_for_formation_of_infected_cell(c, n1, alpha, VI, T);  // modifiers: VI, T
  Removal_of_infected_cell: I => ; compartment*Function_for_removal_of_infected_cell(d2, I);
  Formation_of_infected_virion: => VI; compartment*Function_for_formation_of_infected_virion(nr, n1, beta, I);  // modifiers: I
  Removal_of_infected_virion: VI => ; compartment*Function_for_removal_of_infected_virion(d3, VI);
  Formation_of_non_infected_virion: => VNI; compartment*Function_for_formation_of_noninfected_virion(nr, n1, beta, I);  // modifiers: I
  Removal_of_non_infected_virion: VNI => ; compartment*Function_for_removal_of_noninfected_virion(d3, VNI);

  // Unit definitions:
  unit volume = 1e-3 litre;
  unit substance = 1e-3 mole;
end
