// SBML level 2 version 4
// dcterms:bibliographicCitation: Different strategies for cancer treatment urn:miriam:doi:10.1080/17486700802536054

function Function_for_removal_of_tumor_cell_by_the_action_of_chemotherapy_and_immune_therapy(a, T, b, c, I, L, M_T, I2, C)
  a*T*ln(b*T/a) + c*I*T*L + M_T*I2*(1 - exp(-C))*T;
end

function Function_for_secretion_of_interleukin2_at_the_site_of_tumor(V_I2, g, T, l)
  V_I2 + g*T/(T + l);
end

function Function_for_deactivation_of_CTL_and_removal_from_site_of_tumor(f, L, M_L, I2, C)
  f*L + M_L*I2*(1 - exp(-C))*L;
end

function Function_for_removal_of_immunotherapeutic_agent_from_the_site_of_action(q, I)
  q*I;
end

function Function_for_action_of_chemotherapeutic_drug(Vc)
  Vc;
end

function Function_for_removal_of_interleukin_2(j, L, I2, k, T)
  j*L*I2 + k*T*I2;
end

function Function_for_action_of_immune_therapy_with_interferon(V_I)
  V_I;
end

function Function_for_Dissociation_of_chemotherapeutic_drug_from_site_of_action(p, C)
  p*C;
end

function Function_for_activation_and_transfer_of_CTL_at_the_site_of_tumor(d, e, L, I2)
  d + e*L*I2;
end

model Isaeva2009___Different_strategies_for_cancer_treatment()
  // Isaeva2009 - Different strategies for cancer treatment
  // We formulate and analyse a mathematical model describing immune response to avasculartumour under the influence of immunotherapy and chemotherapy and their combinations aswell as vaccine treatments. The effect of vaccine therapy is considered as a parametricperturbation of the model. In the case of a weak immune response, neither immunotherapy norchemotherapy is found to cause tumour regression to a small size, which would be below theclinically detectable threshold. Numerical simulations show that the efficiency of vaccinetherapy depends on both the tumour size and the condition of immune system as well as on theresponse of the organism to vaccination. In particular, we found that vaccine therapy becomesmore effective when used without time delay from a prescribed date of vaccination after surgeryand is ineffective without preliminary treatment. For a strong immune response, our modelpredicts the tumour remission under vaccine therapy. Our study of successive chemo/immuno,immuno/chemo and concurrent chemoimmunotherapy shows that the chemo/immunosequence is more effective while concurrent chemoimmunotherapy is more sparing.
  // isDescribedBy doi:10.1080/17486700802536054
  // isVersionOf ncit:C16212
  // hasTaxon taxonomy:9606
  // hasProperty mamo:MAMO_0000046

  // Compartments:
  compartment compartment = 1;

  // Species:
  species T in compartment = 8000000;
  species L in compartment = 22500000;  // isVersionOf ncit:C39042
  species I2 in compartment = 24000000;
  species C in compartment = 0;  // hasProperty ncit:C123128
  species I in compartment = 0;  // hasInstance ncit:C20497

  // Parameters:
  a = 0.13;
  b = 3e-10;
  c_CTL = 4.4e-9;
  d = 7300000;
  e = 9.9e-9;
  f = 0.33;
  g = 16000000;
  j = 3.3e-9;
  k = 1.8e-8;
  l = 3000000;
  M_T_chemo = 0.9;
  M_L_chemo = 0.6;
  p = 6.4;
  q = 1.7;
  Vc = 1;
  V_I = 5;
  V_I2 = 10;

  // Reactions:
  Removal_of_tumor_cell_by_the_action_of_chemothrepy_and_immuno_therapy: T => ; compartment*Function_for_removal_of_tumor_cell_by_the_action_of_chemotherapy_and_immune_therapy(a, T, b, c_CTL, I, L, M_T_chemo, I2, C);  // modifiers: I, L, I2, C
  Activation_and_transfer_of_CTL_at_the_site_of_tumor: => L; compartment*Function_for_activation_and_transfer_of_CTL_at_the_site_of_tumor(d, e, L, I2);  // modifiers: I2
  deactivation_of_CTL_and_removal_from_the_site_of_tumor: L => ; compartment*Function_for_deactivation_of_CTL_and_removal_from_site_of_tumor(f, L, M_L_chemo, I2, C);  // modifiers: I2, C
  Secretion_of_Interleukin_2_at_the_site_of_tumor: => I2; compartment*Function_for_secretion_of_interleukin2_at_the_site_of_tumor(V_I2, g, T, I);  // modifiers: T, I
  Removal_of_interleukin_2: I2 => ; compartment*Function_for_removal_of_interleukin_2(j, L, I2, k, T);  // modifiers: L, T
  Action_of_chemotherapeutic_drug: => C; compartment*Function_for_action_of_chemotherapeutic_drug(Vc);
  Dissociation_of_chemotherapeutic_drug_from_site_of_action: C => ; compartment*Function_for_Dissociation_of_chemotherapeutic_drug_from_site_of_action(p, C);
  Action_of_immunotherapy_with_interferon: => I; compartment*Function_for_action_of_immune_therapy_with_interferon(V_I);
  Removal_of_immunotherapeutic_agent_from_the_site_of_action: I => ; compartment*Function_for_removal_of_immunotherapeutic_agent_from_the_site_of_action(q, I);

  // Unit definitions:
  unit volume = 1e-3 litre;
  unit substance = 1e-3 mole;
end
