// SBML level 2 version 4
// dcterms:bibliographicCitation: urn:miriam:pubmed:17306310

function Function_for_activation_and_transfer_of_effector_immune_cell_population(alpha_1, g, T, h, N)
  alpha_1 + g*(T/(h + T))*N;
end

function Function_for_lymphocyte_circulating_to_site_of_tumor(alpha_2)
  alpha_2;
end

function Function_for_Removal_of_chemotherapeutic_Drug_at_ther_target_site(gama, M)
  gama*M;
end

function Function_for_removal_of_tumor_cell(c1, N, T, K_T, M)
  c1*N*T + K_T*M*T;
end

function Function_for_removal_of_citculating_tumor_cell_population(beta, C, K_C, M)
  beta*C + K_C*M*C;
end

function Function_for_induction_of_tumor_cell_formation(a, T, b)
  a*T*(1 - b*T);
end

function Function_for_removal_effector_immune_cell_population(f, N, p, T, K_N, M)
  f*N + p*N*T + K_N*M*N;
end

function Function_for_Chemotherapy_Drug_increase_at_the_target_site(V_M)
  V_M;
end

model dePillis2007___Chemotherapy_for_tumors_An_analysis_of_the_dynamics_and_a_study_of_quadratic_and_linear_optimal_controls()
  // dePillis2007 - Chemotherapy for tumors An analysis of the dynamics and a study of quadratic and linear optimal controls
  // Abstract We investigate a mathematical model of tumor–immune interactions with chemotherapy, and strategies for optimally administering treatment. In this paper we analyze the dynamics of this model, characterize the optimal controls related to drug therapy, and discuss numerical results of the optimal strategies. The form of the model allows us to test and compare various optimal control strategies, including a quadratic control, a linear control, and a state-constraint. We establish the existence of the optimal control, and solve for the control in both the quadratic and linear case. In the linear control case, we show that we cannot rule out the possibility of a singular control. An interesting aspect of this paper is that we provide a graphical representation of regions on which the singular control is optimal. 2006 Elsevier Inc. All rights reserved.
  // isDescribedBy pubmed:17306310
  // isDerivedFrom doi:10.1080/10273660108833067
  // isPropertyOf mamo:MAMO_0000046
  // hasTaxon taxonomy:9606
  // hasProperty mamo:MAMO_0000046

  // Compartments:
  compartment compartment = 1;

  // Species:
  species T in compartment = 1;
  species N in compartment = 1;
  species C in compartment = 1;
  species M in compartment = 0;

  // Parameters:
  b = 1.02e-14;
  c1 = 3.41e-10;
  f = 0.0412;
  g = 0.015;
  h = 20.2;
  K_C = 0.6;
  K_N = 0.6;
  K_T = 0.8;
  p = 2e-11;
  alpha_1 = 12000;
  alpha_2 = 750000000;
  beta = 0.012;
  gamma = 0.9;
  a = 0.00431;
  V_M = 0;

  // Reactions:
  Induction_of_tumor_cell_formation: => T; compartment*Function_for_induction_of_tumor_cell_formation(a, T, b);
  Removal_of_tumor_cell: T => ; compartment*Function_for_removal_of_tumor_cell(c1, N, T, K_T, M);  // modifiers: N, M
  Activation_and_transfer_of_effector_immune_cell_population: => N; compartment*Function_for_activation_and_transfer_of_effector_immune_cell_population(alpha_1, g, T, h, N);  // modifiers: T
  Removal_of_effector_immune_cell_population: N => ; compartment*Function_for_removal_effector_immune_cell_population(f, N, p, T, K_N, M);  // modifiers: T, M
  Lymphocyte_circulate_to_the_site_of_tumor: => C; compartment*Function_for_lymphocyte_circulating_to_site_of_tumor(alpha_2);
  removal_of_ciruclating_tumor_cell_population: C => ; compartment*Function_for_removal_of_citculating_tumor_cell_population(beta, C, K_C, M);  // modifiers: M
  Chemotherapy_Drug_increase_at_the_target_site: => M; compartment*Function_for_Chemotherapy_Drug_increase_at_the_target_site(V_M);
  Removal_of_chemotherapeutic_Drug_at_ther_target_site: M => ; compartment*Function_for_Removal_of_chemotherapeutic_Drug_at_ther_target_site(gamma, M);

  // Unit definitions:
  unit volume = 1e-3 litre;
  unit substance = 1e-3 mole;
end
