// SBML level 2 version 4
// dcterms:bibliographicCitation: urn:miriam:pubmed:18655792

function Function_for_deactivation_and_removal_of_CD8__T_cell_population(m, L, q, T, u, N, K_L, M)
  m*L + q*L*T*u*N*L*L + K_L*(1 - exp(-M))*L;
end
Function_for_deactivation_and_removal_of_CD8__T_cell_population is "Function for deactivation and removal of CD8+ T cell population";

function Function_for_induction_of_tumor_cell_formation(a, T, b)
  a*T*(1 - b*T);
end

function Function_for_removal_of_NK_cell_population(f, N, p, T, K_N, M)
  f*N + p*N*T + K_N*(1 - exp(-M))*N;
end

function Function_for_removal_of_tumor_by_the_action_of_immuno_therapy_chemotherapy(c, N, T, D, K_T, M)
  c*N*T + D*T + K_T*(1 - exp(-M))*T;
end

function Function_for_activation_and_transfer_of_CD8__T_cell_population(j, D, T, k, L, r1, N, r2, C, p_I, I, g_I, V_L)
  j*(D*D*T*T/(k + D*D*T*T))*L + (r1*N + r2*C)*T + p_I*I/(g_I + I)*L + V_L;
end
Function_for_activation_and_transfer_of_CD8__T_cell_population is "Function for activation and transfer of CD8+ T cell population";

function Function_for_increase_in_NK_cell_population(e, C, g, T, h, N)
  e*C + g*(T*T/(h + T*T))*N;
end

function Function_for_removal_of_circulating_lymphocyte(beta, C, K_C, M)
  beta*C + K_C*(1 - exp(-M))*C;
end

function Function_for_addition_chemotherapeutic_drug_in_the_blood_stream(V_M)
  V_M;
end

function Function_for_stimulation_of_circulating_lymphocyte(alpha)
  alpha;
end

function Function_for_addition_of_immunotherapy_drud_in_the_bloodstream(V_I)
  V_I;
end

function Function_for_removal_of_chemotherapeutic_drug(gamma, M)
  gamma*M;
end

function Function_for_removal_of_immunotherapy_drug(mu_I, I)
  mu_I*I;
end

model Chareyron2009___Mixed_immunotherapy_and_chemotherapy_of_tumors_Feedback_design_and_model_updating_schemes()
  // Chareyron2009 - Mixed immunotherapy and chemotherapy of tumors Feedback design and model updating schemes
  // Mixed immunotherapy and chemotherapy of tumors: feedback design and model updating schemes.
  // Chareyron S1, Alamir M.
  // Author information
  // Abstract
  // In this paper, a recently developed model governing the cancer growth on a cell population level with combination of immune and chemotherapy is used to develop a reactive (feedback) mixed treatment strategy. The feedback design proposed here is based on nonlinear constrained model predictive control together with an adaptation scheme that enables the effects of unavoidable modeling uncertainties to be compensated. The effectiveness of the proposed strategy is shown under realistic human data showing the advantage of treatment in feedback form as well as the relevance of the adaptation strategy in handling uncertainties and modeling errors. A new treatment strategy defined by an original optimal control problem formulation is also proposed. This new formulation shows particularly interesting possibilities since it may lead to tumor regression under better health indicator profile.
  // isDerivedFrom mamo:MAMO_0000046 taxonomy:9606
  // isDescribedBy pubmed:18655792
  // isDerivedFrom pubmed:16153659
  // hasTaxon taxonomy:9606
  // hasProperty mamo:MAMO_0000046

  // Compartments:
  compartment compartment = 1;

  // Species:
  species T in compartment = 50000000;
  species N in compartment = 500;
  species L in compartment = 50;
  species C in compartment = 4000000;
  species M in compartment = 0;
  species I in compartment = 0;

  // Parameters:
  s = 0.0839;
  d = 2.34;
  l = 2.09;
  a = 0.431;
  b = 1.02e-9;
  c = 6.41e-11;
  e = 2.08e-7;
  f = 0.0412;
  g = 0.0125;
  h = 20200000;
  j = 0.0249;
  k = 36600000;
  m = 0.204;
  q = 1.42e-6;
  r1 = 1.1e-7;
  r2 = 6.5e-11;
  u = 3e-10;
  K_T = 0.9;
  K_N = 0;
  K_L = 0.6;
  K_C = 0.6;
  alpha = 750000000;
  beta = 0.012;
  gamma = 0.9;
  p_I = 0.125;
  g_I = 20000000;
  mu_I = 10;
  p = 3.42e-6;
  V_L = 1000000000;
  V_I = 500000;
  V_M = 1;
  mu_0 = 1e-6;
  Initial_for_d = d;
  Initial_for_l = l;
  Initial_for_s = s;

  // Assignment rules:
  D := Initial_for_d + (L/T)^Initial_for_l/(Initial_for_s + (L/T)^Initial_for_l);

  // Reactions:
  Induction_of_tumor_cell_formation: => T; compartment*Function_for_induction_of_tumor_cell_formation(a, T, b);
  Removal_of_tumor_by_the_action_of_immune_response_or_chemotherapy: T => ; compartment*Function_for_removal_of_tumor_by_the_action_of_immuno_therapy_chemotherapy(c, N, T, D, K_T, M);  // modifiers: N, M
  Increase_of_NK_cell_population_at_the_site: => N; compartment*Function_for_increase_in_NK_cell_population(e, C, g, T, h, N);  // modifiers: C, T
  Removal_of_NK_cell_population: N => ; compartment*Function_for_removal_of_NK_cell_population(f, N, p, T, K_N, M);  // modifiers: T, M
  Activation_and_transfer_of_total_CD8__T_cell_population: => L; compartment*Function_for_activation_and_transfer_of_CD8__T_cell_population(j, D, T, k, L, r1, N, r2, C, p_I, I, g_I, V_L); Activation_and_transfer_of_total_CD8__T_cell_population is "Activation and transfer of total CD8+ T cell population";  // modifiers: T, N, C, I
  Deactivation_and_removal_of_CD8__T_cell_population: L => ; compartment*Function_for_deactivation_and_removal_of_CD8__T_cell_population(m, L, q, T, u, N, K_L, M); Deactivation_and_removal_of_CD8__T_cell_population is "Deactivation and removal of CD8+ T cell population";  // modifiers: T, N, M
  Stimulation_of_circulatory_lymphocyte: => C; compartment*Function_for_stimulation_of_circulating_lymphocyte(alpha);
  Removal_of_circulating_lymphocyte: C => ; compartment*Function_for_removal_of_circulating_lymphocyte(beta, C, K_C, M);  // modifiers: M
  addtion_of_chemotherapeutic_drug_in_the_blood_stream: => M; compartment*Function_for_addition_chemotherapeutic_drug_in_the_blood_stream(addtion_of_chemotherapeutic_drug_in_the_blood_stream_V_M);
    addtion_of_chemotherapeutic_drug_in_the_blood_stream_V_M = 0;
  Removal_of_chemotherapeutic_drug: M => ; compartment*Function_for_removal_of_chemotherapeutic_drug(gamma, M);
  Addition_of_immunotherapy_drug_at_the_blood_stream: => I; compartment*Function_for_addition_of_immunotherapy_drud_in_the_bloodstream(Addition_of_immunotherapy_drug_at_the_blood_stream_V_I);
    Addition_of_immunotherapy_drug_at_the_blood_stream_V_I = 0;
  Removal_of_immunotherapy_drug: I => ; compartment*Function_for_removal_of_immunotherapy_drug(mu_I, I);

  // Unit definitions:
  unit volume = 1e-3 litre;
  unit substance = 1e-3 mole;
end
