// SBML level 2 version 4
// dcterms:bibliographicCitation: urn:miriam:pubmed:28174262

function Function_for_induction_of_cancer_cell_population(G, S_ftr, T, p_CT, p_IT, I, Csc)
  G*S_ftr*T + p_CT*Csc + p_IT*I;
end

function Function_of_respons_to_tumor_and_removing_it(c, N, T, D, p_TC, p_TI)
  c*N*T + D + (p_TC + p_TI)*T;
end

function Function_for_cancer_stem_cell_formation(alpha_CSC, GS_ftr_CSC, Csc, p_TC, T, p_IC, I)
  alpha_CSC*GS_ftr_CSC*Csc + p_TC*T + p_IC*I;
end

function Function_for_removal_of_cancer_stem_cell(c_CSC, N, Csc, D_CSC, p_CT, p_CI)
  c_CSC*N*Csc + D_CSC + (p_CT + p_CI)*Csc;
end

function Function_for_increase_in_induced_cancer_cell_population(alpha_I, GS_ftr_I, I, p_TI, T, p_CI, Csc)
  alpha_I*GS_ftr_I*I + p_TI*T + p_CI*Csc;
end

function Function_for_elimination_of_induced_cancer_cell_population(c_I, N, I, D_I, p_IT, p_IC)
  c_I*N*I + D_I + (p_IT + p_IC)*I;
end

function Function_for_activation_of_natural_killer_cell_at_the_site_of_tumor(sigma_nk, g_NK, T, h, N)
  sigma_nk + g_NK*T*T/(h + T*T)*N;
end

function Function_for_removal_of_natural_killer_cell(f_NK, N, p_im, T, lamda_reg, Treg)
  f_NK*N + p_im*N*T + lamda_reg*Treg*N;
end

function Function_for_activation_and_response_of_tumor_specific_T_cell(j_T8, D, k_im, L, r, N, T)
  j_T8*D*D/(k_im + D*D)*L + r*N*T;
end

function Function_for_removal_of_tumor_specific_T_cell(m_T8, L, q, T, lamda_reg, Treg)
  m_T8*L + q*L*T + lamda_reg*Treg*L;
end

function Function_for_activation_regulatory_T_cell(g_reg, Treg)
  g_reg*Treg;
end

function Function_for_removal_of_regulatory_T_cell(m_reg, Treg)
  m_reg*Treg;
end

model Mpekris2017___Role_of_vascular_normalization_in_benefit_from_metronomic_chemotherapy()
  // Mpekris2017 - Role of vascular normalization in benefit from metronomic chemotherapy
  // Role of vascular normalization in benefit from metronomic chemotherapy.
  // Mpekris F1, Baish JW2, Stylianopoulos T3, Jain RK4.
  // Author information
  // Abstract
  // Metronomic dosing of chemotherapy-defined as frequent administration at lower doses-has been shown to be more efficacious than maximum tolerated dose treatment in preclinical studies, and is currently being tested in the clinic. Although multiple mechanisms of benefit from metronomic chemotherapy have been proposed, how these mechanisms are related to one another and which one is dominant for a given tumor-drug combination is not known. To this end, we have developed a mathematical model that incorporates various proposed mechanisms, and report here that improved function of tumor vessels is a key determinant of benefit from metronomic chemotherapy. In our analysis, we used multiple dosage schedules and incorporated interactions among cancer cells, stem-like cancer cells, immune cells, and the tumor vasculature. We found that metronomic chemotherapy induces functional normalization of tumor blood vessels, resulting in improved tumor perfusion. Improved perfusion alleviates hypoxia, which reprograms the immunosuppressive tumor microenvironment toward immunostimulation and improves drug delivery and therapeutic outcomes. Indeed, in our model, improved vessel function enhanced the delivery of oxygen and drugs, increased the number of effector immune cells, and decreased the number of regulatory T cells, which in turn killed a larger number of cancer cells, including cancer stem-like cells. Vessel function was further improved owing to decompression of intratumoral vessels as a result of increased killing of cancer cells, setting up a positive feedback loop. Our model enables evaluation of the relative importance of these mechanisms, and suggests guidelines for the optimal use of metronomic therapy.
  // KEYWORDS:
  // drug delivery; immune response; oxygenation; thrompospondin-1; tumor perfusion
  // isDescribedBy pubmed:28174262
  // hasTaxon taxonomy:9606
  // hasProperty mamo:MAMO_0000046

  // Compartments:
  compartment compartment = 1;

  // Species:
  species C in compartment = 1;
  species T in compartment = 1;
  species Csc in compartment = 1;
  species I in compartment = 1;
  species N in compartment = 1;
  species L in compartment = 1;
  species Treg in compartment = 1;

  // Parameters:
  mu = 10.4;
  k = 104000000;
  k_th = 6.5e-10;
  C_iox = 0.2;
  D_ox = 0.000155;
  A_ox = 2200;
  k_ox = 0.00464;
  k1 = 3500;
  k2 = 0.0083;
  c_e = 0.01;
  psi = 0.3;
  k_on = 1296000;
  k_int = 3.7;
  D_f = 8.64e-6;
  w = 0.6603;
  w_CSC = 0.0272;
  w_I = 0.0272;
  a_CSC = 1;
  a_I = 1;
  k_d = 0.417;
  L_vw = 5e-6;
  n = 0.0007;
  T_abs = 310;
  gamma = 1e-5;
  c = 3.23e-7;
  d_im = 1.43;
  lamda_im = 1.36;
  s = 2.73;
  sigma_nk = 13000;
  f_NK = 0.0412;
  m_T8 = 0.02;
  m_reg = 0.02;
  g_NK = 0.025;
  g_reg = 0.0375;
  h = 20200000;
  p_im = 1e-7;
  k_im = 20200000;
  q = 3.42e-10;
  r = 1.1e-7;
  lamda_reg = 100;
  p_TC = 0.55;
  p_CT = 1;
  p_CI = 0.58;
  p_IC = 0.96;
  p_TI = 0.21;
  p_IT = 1;
  k_off = 691.2;
  j_T8 = 0.0375;
  Initial_for_d_im = d_im;
  Initial_for_lamda_im = lamda_im;
  Initial_for_s = s;

  // Assignment rules:
  D := Initial_for_d_im*((L/T)^Initial_for_lamda_im/(Initial_for_s + (L/T)^Initial_for_lamda_im))*T;

  // Reactions:
  Induction_of_cancer_cell_population: => C; compartment*Function_for_induction_of_cancer_cell_population(G, S_ftr, C, p_CT, p_IT, I, Csc);  // modifiers: I, Csc
    G = 0.1; S_ftr = 0.1;
  Response_to_tumor: T => ; compartment*Function_of_respons_to_tumor_and_removing_it(c, N, T, D, p_TC, p_TI);  // modifiers: N
  Formation_of_cancer_stem_cell_population: => Csc; compartment*Function_for_cancer_stem_cell_formation(a_CSC, GS_ftr_CSC, Csc, p_TC, T, p_IC, I);  // modifiers: T, I
    GS_ftr_CSC = 0.1;
  Removal_of_Cancer_stem_cell: Csc => ; compartment*Function_for_removal_of_cancer_stem_cell(c_CSC, N, Csc, D, p_CT, p_CI);  // modifiers: N
    c_CSC = 0.1;
  Increase_of_induced_cancer_cell_population: => I; compartment*Function_for_increase_in_induced_cancer_cell_population(a_I, GS_ftr_I, I, p_TI, T, p_CI, Csc);  // modifiers: T, Csc
    GS_ftr_I = 0.1;
  Elimination_of_induced_cancer_cell_population: I => ; compartment*Function_for_elimination_of_induced_cancer_cell_population(c, N, I, D, p_IT, p_IC);  // modifiers: N
  Activation_of_Natural_killer_cell_at_the_site_of_tumor: => N; compartment*Function_for_activation_of_natural_killer_cell_at_the_site_of_tumor(sigma_nk, g_NK, T, h, N);  // modifiers: T
  Removal_for_natural_killer_cell: N => ; compartment*Function_for_removal_of_natural_killer_cell(f_NK, N, p_im, T, lamda_reg, Treg);  // modifiers: T, Treg
  Activation_and_response_of_tumor_specific_T_cell: => L; compartment*Function_for_activation_and_response_of_tumor_specific_T_cell(j_T8, D, k_im, L, r, N, T);  // modifiers: N, T
  Elimination_of_tumor_specific_T_cell: L => ; compartment*Function_for_removal_of_tumor_specific_T_cell(m_T8, L, q, T, lamda_reg, Treg);  // modifiers: T, Treg
  Activation_of_regulatory_T_cell: => Treg; compartment*Function_for_activation_regulatory_T_cell(g_reg, Treg);
  Removal_of_regulatory_T_cell: Treg => ; compartment*Function_for_removal_of_regulatory_T_cell(m_reg, Treg);

  // Unit definitions:
  unit volume = 1e-3 litre;
  unit substance = 1e-3 mole;
end
