// SBML level 2 version 4
// dcterms:bibliographicCitation: urn:miriam:pubmed:22881128

function Function_for_formation_of_mature_myeloid_cell(theta, g, T, p, M1)
  (theta - g*(T/(p + T)))*M1;
end

function Function_for_deactivation_and_removal_of_CD8__T_cell(mu_L, L)
  mu_L*L;
end
Function_for_deactivation_and_removal_of_CD8__T_cell is "Function for deactivation and removal of CD8+ T cell";

function Function_for_increase_in_the_population_of_tumor_cell(a, T)
  a*T;
end

function Function_for_removal_of_immature_myeloid_cell(mu1, M1, theta, g, T, p)
  mu1*M1 + (theta - g*(T/(p + T)))*M1;
end

function Function_for_regulation_of_tumor_cell(mu_T, T, e, L, M2, M1)
  mu_T*T + e*L*T*(M2/(M1 + M2));
end

function Function_for_immature_myeloid_cell_formation_at_time_t(omega)
  omega;
end

function Function_for_activation_of_CD8__T_cell(c, L, T, M2, M1)
  c*L*L*T*(M2/(M1 + M2));
end
Function_for_activation_of_CD8__T_cell is "Function for activation of CD8+ T cell";

function Function_for_removal_of_mature_myeloid_cell(mu2, M2)
  mu2*M2;
end

model Kareva2010___Myeloid_cells_in_tumour_immune_interactions()
  // Kareva2010 - Myeloid cells in tumour-immune interactions.
  // Myeloid cells in tumour-immune interactions.
  // Kareva I1, Berezovskaya F, Castillo-Chavez C.
  // Author information
  // Abstract
  // Despite highly developed specific immune responses, tumour cells often manage to escape recognition by the immune system, continuing to grow uncontrollably. Experimental work suggests that mature myeloid cells may be central to the activation of the specific immune response. Recognition and subsequent control of tumour growth by the cells of the specific immune response depend on the balance between immature (ImC) and mature (MmC) myeloid cells in the body. However, tumour cells produce cytokines that inhibit ImC maturation, altering the balance between ImC and MmC. Hence, the focus of this manuscript is on the study of the potential role of this inhibiting mechanism on tumour growth dynamics. A conceptual predator-prey type model that incorporates the dynamics and interactions of tumour cells, CD8(+) T cells, ImC and MmC is proposed in order to address the role of this mechanism. The prey (tumour) has a defence mechanism (blocking the maturation of ImC) that prevents the predator (immune system) from recognizing it. The model, a four-dimensional nonlinear system of ordinary differential equations, is reduced to a two-dimensional system using time-scale arguments that are tied to the maturation rate of ImC. Analysis shows that the model is capable of supporting biologically reasonable patterns of behaviour depending on the initial conditions. A range of parameters, where healing without external influences can occur, is identified both qualitatively and quantitatively.
  // isDescribedBy pubmed:22881128
  // hasTaxon taxonomy:9606
  // hasProperty mamo:MAMO_0000046

  // Compartments:
  compartment compartment = 1;

  // Species:
  species L in compartment = 1;
  species T in compartment = 1;
  species M1 in compartment = 1;
  species M2 in compartment = 1;

  // Parameters:
  a = 0.432;
  mu_T = 0.02;
  e = 2.02e-8;
  mu_L = 0.02;
  c = 1.8e-8;
  omega = 10000000;
  mu1 = 0.02;
  theta = 0.2;
  g = 0.0125;
  mu2 = 0.02;
  p = 10;

  // Reactions:
  Increase_in_the_population_of_Tumor_cell: => T; compartment*Function_for_increase_in_the_population_of_tumor_cell(a, T);
  Regulation_of_Tumor_cell: T => ; compartment*Function_for_regulation_of_tumor_cell(mu_T, T, e, L, M2, M1);  // modifiers: L, M2, M1
  Activation_of_CD8__T_cell: => L; compartment*Function_for_activation_of_CD8__T_cell(c, L, T, M2, M1); Activation_of_CD8__T_cell is "Activation of CD8+ T cell";  // modifiers: T, M2, M1
  Deactivation_and_removal_of_CD8__T_cell: L => ; compartment*Function_for_deactivation_and_removal_of_CD8__T_cell(mu_L, L); Deactivation_and_removal_of_CD8__T_cell is "Deactivation and removal of CD8+ T cell";
  Immature_myeloid_cell_formation_at_time_t: => M1; compartment*Function_for_immature_myeloid_cell_formation_at_time_t(omega);
  Removal_of_immature_myeloid_cell: M1 => ; compartment*Function_for_removal_of_immature_myeloid_cell(mu1, M1, theta, g, T, p);  // modifiers: T
  Formation_of_mature_myeloid_cell: => M2; compartment*Function_for_formation_of_mature_myeloid_cell(theta, g, T, p, M1);  // modifiers: T, M1
  Removal_of_mature_myeloid_cell: M2 => ; compartment*Function_for_removal_of_mature_myeloid_cell(mu2, M2);

  // Unit definitions:
  unit volume = 1e-3 litre;
  unit substance = 1e-3 mole;
end
