// SBML level 2 version 4
// dcterms:bibliographicCitation: urn:miriam:pubmed:26089097

function Function_for_T_cells_activated_during_immune_response(alpha, p, beta, r, gamma)
  alpha*(p - beta*p*p)*r + gamma;
end

function Function_for_decrease_in_carrying_capacity_of_vasculature(mu, d, p, q)
  (mu + d*p^(2/3))*q;
end

function Function_for_decrease_in_primary_tumor_volume(Xi, p, q, theta, r)
  Xi*p*ln(p/q) + theta*p*r;
end

function Function_of_increase_in_carrying_capacity_of_vasculature(p)
  p;
end

function Function_for_decrease_in_T_cell_response(delta, r)
  delta*r;
end

model Schattler2016___Dynamical_properties_of_a_minimally_parameterized_mathematical_model_for_metronomic_chemotherapy()
  // Schattler2016 - Dynamical properties of a minimally parameterized mathematical model for metronomic chemotherapy
  // A minimally parameterized mathematical model for low-dose metronomic chemotherapy is formulated that takes into account angiogenic signaling between the tumor and its vasculature and tumor inhibiting effects of tumor-immune system interactions. The dynamical equations combine a model for tumor development under angiogenic signaling formulated by Hahnfeldt et al. with a model for tumor-immune system interactions by Stepanova. The dynamical properties of the model are analyzed. Depending on the parameter values, the system encompasses a variety of medically realistic scenarios that range from cases when (i) low-dose metronomic chemotherapy is able to eradicate the tumor (all trajectories converge to a tumor-free equilibrium point) to situations when (ii) tumor dormancy is induced (a unique, globally asymp- totically stable benign equilibrium point exists) to (iii) multi-stable situations that have both persistent benign and malignant behaviors separated by the stable manifold of an unstable equilibrium point and finally to (iv) situations when tumor growth can- not be overcome by low-dose metronomic chemotherapy. The model forms a basis for a more general study of chemotherapy when the main components of a tumor’s microenvironment are taken into account
  // isDescribedBy pubmed:26089097
  // hasTaxon taxonomy:9606
  // hasProperty mamo:MAMO_0000046

  // Compartments:
  compartment compartment = 1;

  // Species:
  species p in compartment = 1000000;
  species q in compartment = 1000000;
  species r in compartment = 0;

  // Parameters:
  u = 1000000;
  alpha = 0.0529;
  beta = 0.00291;
  gamma = 0.05;
  delta = 0.3743;
  theta = 1;
  Xi = 0.0347;
  b = 5;
  d = 0.0667;
  mu = 0;

  // Reactions:
  decrease_in_primary_tumor_volume: p => ; compartment*Function_for_decrease_in_primary_tumor_volume(Xi, p, q, theta, r);  // modifiers: q, r
  Increase_in_the_carrying_capacity_of_vasculature: => q; compartment*Function_of_increase_in_carrying_capacity_of_vasculature(p);  // modifiers: p
  Decrease_in_carrying_capacity_of_vasculature: q => ; compartment*Function_for_decrease_in_carrying_capacity_of_vasculature(mu, d, q, q);
  Increase_in_the_activity_of_various_types_of_T_cells_activated_during_immune_reaction: => r; compartment*Function_for_T_cells_activated_during_immune_response(alpha, p, beta, r, gamma);  // modifiers: p
  decrease_in_T_cell_response: r => ; compartment*Function_for_decrease_in_T_cell_response(delta, r);

  // Unit definitions:
  unit volume = 1e-3 litre;
  unit substance = 1e-3 mole;
end
