// SBML level 2 version 4
// dcterms:bibliographicCitation: urn:miriam:pubmed:27317864

function Rate_Law_for_reaction_N(s, mu1, N, pN, _alphaN_, T0, piN, _alphaL_, TN1)
  s - mu1*N - (1 - pN)*_alphaN_*N*T0 - (1 - piN)*_alphaL_*N*TN1;
end

function Rate_Law_for_reaction_for_L(r1, _betaL_, L, T0, g, r2, _betaN_, TN1, mu2, qL, _zetaL)
  r1*_betaL_*L*T0/(_betaL_*(g + T0)) + r2*_betaN_*L*TN1/(_betaN_*(g + TN1)) - mu2*L - (1 - qL)*_betaL_*L*T0 - (1 - _zetaL)*_betaN_*L*TN1;
end

function Rate_Law_for_reaction_for_T0(a, T0, b, _alphaN_, N, _betaL_, L)
  a*T0*(1 - b*T0) - _alphaN_*N*T0 - _betaL_*L*T0;
end

function Rate_Law_for_reaction_for_TL1(a, TL1, b, qT, _betaL_, L, T0, _alphaL_, N)
  a*TL1*(1 - b*TL1) + qT*_betaL_*L*T0 - _alphaL_*N*TL1;
end

function Rate_Law_for_reaction_for_TN1(a, TN1, b, pT, _alphaN_, N, T0, _betaN_, L)
  a*TN1*(1 - b*TN1) + pT*_alphaN_*N*T0 - _betaN_*L*TN1;
end

function Rate_Law_for_reaction_TNL1(a, TNL1, b, zetaT, _betaN_, L, TN1, piT, _alphaL_, N, TL1)
  a*TNL1*(1 - b*TNL1) + zetaT*_betaN_*L*TN1 + piT*_alphaL_*N*TL1;
end

model Mahasa2016_tumor_immune_surveillance()
  // Mahasa2016-tumor–immune surveillance
  // We present a novel mathematical model involving various immune cell populations and tumor cellpopulations. The model describes how tumor cells evolve and survive the brief encounter with theimmune system mediated by natural killer (NK) cells and the activated CD8þcytotoxic T lymphocytes(CTLs). The model is composed of ordinary differential equations describing the interactions betweenthese important immune lymphocytes and various tumor cell populations. Based on up-to-dateknowledge of immune evasion and rational considerations, the model is designed to illustrate how tu-mors evade both arms of host immunity (i.e.innate and adaptive immunity). The model predicts that(a) an influx of an external source of NK cells might play a crucial role in enhancing NK-cell immunesurveillance; (b) the host immune system alone is not fully effective against progression of tumor cells;(c) the development of immunoresistance by tumor cells is inevitable in tumor immune surveillance. Ourmodel also supports the importance of infiltrating NK cells in tumor immune surveillance, which can beenhanced by NK cell-based immunotherapeutic approaches.
  // occursIn BTO:0005810
  // hasTaxon taxonomy:9606
  // isDescribedBy pubmed:27317864
  // hasProperty ncit:C15438 mamo:0000046 mamo:MAMO_0000046

  // Compartments:
  compartment Cell = 1;

  // Species:
  species N in Cell = 100000;  // hasProperty ncit:C12536
  species L in Cell = 100;  // hasProperty ncit:C38324
  species T0 in Cell = 10000;  // hasProperty ncit:C154801
  species TN1 in Cell = 0;  // hasProperty ncit:C12536; hasProperty omit:0019223
  species TL1 in Cell = 0;  // hasProperty omit:0019223; hasProperty ncit:C38324
  species TNL1 in Cell = 0;  // hasProperty ncit:C38324; hasProperty omit:0019223; hasProperty ncit:C12536

  // Parameters:
  s = 32000;
  mu1 = 0.0412;
  mu2 = 0.02;
  a = 0.5822;
  b = 2.33e-8;
  alphaN = 1.3e-7; alphaN is "alphaN+";
  alphaN_0 = 24; alphaN_0 is "alphaN-";
  betaL = 1.3e-7; betaL is "betaL+";
  betaL_0 = 24; betaL_0 is "betaL-";
  alphaL = 1.2e-9; alphaL is "alphaL+";
  alphaL_0 = 24; alphaL_0 is "alphaL-";
  betaN = 1.3e-7; betaN is "betaN+";
  betaN_0 = 24; betaN_0 is "betaN-";
  pN = 0.94;
  pT = 0.05;
  qL = 0.94;
  qT = 0.05;
  piN = 0.8;
  piT = 0.18;
  zetaL = 0.85;
  zetaT = 0.13;
  r1 = 29880000;
  r2 = 275500;
  g = 20200000;

  // Reactions:
  reaction_for_N: => N; Cell*Rate_Law_for_reaction_N(s, mu1, N, pN, alphaN, T0, piN, alphaL, TN1);  // modifiers: T0, TN1
  reaction_for_L: => L; Cell*Rate_Law_for_reaction_for_L(r1, betaL, L, T0, betaL_0, g, r2, betaN, TN1, betaN_0, mu2, qL, zetaL);  // modifiers: T0, TN1
  reaction_for_T0: => T0; Cell*Rate_Law_for_reaction_for_T0(a, T0, b, alphaN, N, betaL, L);  // modifiers: N, L
  reaction_for_TL1: => TL1; Cell*Rate_Law_for_reaction_for_TL1(a, TL1, b, qT, betaL, L, T0, alphaL, N);  // modifiers: L, T0, N
  reaction_for_TN1: => TN1; Cell*Rate_Law_for_reaction_for_TN1(a, TN1, b, pT, alphaN, N, T0, betaN, L);  // modifiers: N, T0, L
  reaction_for_TNL1: => TNL1; Cell*Rate_Law_for_reaction_TNL1(a, TNL1, b, zetaT, betaN, L, TN1, piT, alphaL, N, TL1);  // modifiers: L, TN1, N, TL1

  // Unit definitions:
  unit volume = 1e-3 litre;
  unit time = 86400 second;
  unit substance = 1e-3 mole;
end
