// SBML level 2 version 4
// dcterms:bibliographicCitation: urn:miriam:pubmed:29410878

function Rate_Law_for_reaction_auxin_induction(Sauxin, auxin, Tauxin)
  Sauxin - auxin/Tauxin;
end

function Rate_Law_for_reaction_synthesis_of_IAA_along_with_natural_decay_of_IAA(SIAA, IAA, TIAA, alpha, auxin)
  SIAA - IAA/TIAA - alpha*auxin*IAA;
end

function Rate_Law_for_reaction_synthesis_of_ARF_along_with_natural_decay_of_ARF(SARF, ARF, TARF, beta, IAA)
  SARF - ARF/TARF - beta*IAA*ARF;
end

model Grigolon2018_Responses_to_auxin_signals()
  // Grigolon2018 - Responses to auxin signals
  // Plants depend on the signalling of the phytohormone auxin for their development and for responding to environmental perturbations. The associated biomolecular signalling network involves a negative feedback on Aux/IAA proteins which mediate the influence of auxin (the signal) on the auxin response factor (ARF) transcription factors (the drivers of the response). To probe the role of this feedback, we consider alternative in silico signalling networks implementing different operating principles. By a comparative analysis, we find that the presence of a negative feedback allows the system to have a far larger sensitivity in its dynamical response to auxin and that this sensitivity does not prevent the system from being highly resilient. Given this insight, we build a new biomolecular signalling model for quantitatively describing such Aux/IAA and ARF responses.
  // occursIn BTO:0001481
  // hasTaxon taxonomy:47299
  // isDescribedBy pubmed:29410878
  // hasProperty omit:0011910 pdb-ccd:26158 mamo:MAMO_0000046

  // Compartments:
  compartment compartment = 1;

  // Species:
  species auxin in compartment = 1;  // hasProperty efo:0005900
  species IAA in compartment = -350;  // hasProperty CHEBI:16411
  species ARF in compartment = 1;  // hasProperty PR:000028506

  // Parameters:
  Tauxin = 10;
  TIAA = 333;
  TARF = 2;
  alpha_no_reg = 0.05;
  alpha_reg = 150;
  SIAA = 1;
  SARF = 25;
  beta = 0.003;
  Sauxin = 0.02;

  // Reactions:
  reaction_for_auxin_induction: => auxin; compartment*Rate_Law_for_reaction_auxin_induction(Sauxin, auxin, Tauxin);  // hasProperty EO:0007074
  reaction_for_synthesis_of_IAA_along_with_natural_decay_of_IAA: => IAA; compartment*Rate_Law_for_reaction_synthesis_of_IAA_along_with_natural_decay_of_IAA(SIAA, IAA, TIAA, alpha_reg, auxin);  // modifiers: auxin; hasProperty ncit:C61367; hasProperty ncit:C75947
  reaction_for_synthesis_of_ARF_along_with_natural_decay_of_ARF: => ARF; compartment*Rate_Law_for_reaction_synthesis_of_ARF_along_with_natural_decay_of_ARF(SARF, ARF, TARF, beta, IAA);  // modifiers: IAA; hasProperty ncit:C75947; hasProperty ncit:C61367

  // Unit definitions:
  unit volume = 1e-3 litre;
  unit substance = 1e-3 mole;
end
