// SBML level 2 version 4
// dcterms:bibliographicCitation: 25645184 urn:miriam:pubmed:---

model Ndii2015_transmission_dynamics_of_dengue_in_the_presence_of_Wolbachia()
  // Ndii2015-transmission dynamics of dengue in the presence of Wolbachia.
  // Use of the bacterium Wolbachia is an innovative new strategy designed to break the cycle of dengue transmission. There are two main mechanisms by which Wolbachia could achieve this: by reducing the level of dengue virus in the mosquito and/or by shortening the host mosquito's lifespan. However, although Wolbachia shortens the lifespan, it also gives a breeding advantage which results in complex population dynamics. This study focuses on the development of a mathematical model to quantify the effect on human dengue cases of introducing Wolbachia into the mosquito population. The model consists of a compartment-based system of first-order differential equations; seasonal forcing in the mosquito population is introduced through the adult mosquito death rate. The analysis focuses on a single dengue outbreak typical of a region with a strong seasonally-varying mosquito population. We found that a significant reduction in human dengue cases can be obtained provided that Wolbachia-carrying mosquitoes persist when competing with mosquitoes without Wolbachia. Furthermore, using the Wolbachia strain WMel reduces the mosquito lifespan by at most 10% and allows them to persist in competition with non-Wolbachia-carrying mosquitoes. Mosquitoes carrying the WMelPop strain, however, are not likely to persist as it reduces the mosquito lifespan by up to 50%. When all other effects of Wolbachia on the mosquito physiology are ignored, cytoplasmic incompatibility alone results in a reduction in the number of human dengue cases. A sensitivity analysis of the parameters in the model shows that the transmission probability, the biting rate and the average adult mosquito death rate are the most important parameters for the outcome of the cumulative proportion of human individuals infected with dengue.
  // hasTaxon taxonomy:9606
  // isDescribedBy pubmed:---
  // hasProperty omit:0004994 ncit:C15716 ncit:C14198 omit:0020446 mamo:MAMO_0000046

  // Compartments:
  compartment compartment = 1;

  // Species:
  species $S_H in compartment = 0.9999867;
  species $E_H in compartment = 1.333333e-5;
  species $I_H in compartment = 0;
  species $R_H in compartment = 0;
  species $A_N in compartment = 0.0138;
  species $S_N in compartment = 0.1326;
  species $E_N in compartment = 0;
  species $I_N in compartment = 0;
  species $A_W in compartment = 0.7535;
  species $S_W in compartment = 0.94;
  species $E_W in compartment = 0;
  species $I_W in compartment = 0;

  // Parameters:
  T_N = 0.2614;
  d = 0.5;
  sigma = 0.2;
  g = 0.95;
  tau_W = 0.1;
  omega = 20.61;
  f = 1.1;
  rho_N = 1.25;
  alpha = 0.9;
  c = 0.95;
  gamma_W = 0.1;
  tau_N = 0.1;
  eta = 0.6228;
  gamma_N = 0.1;
  L = 3;
  E_H0 = 2;

  // Assignment rules:
  b_N := 0.63;
  mu_N0 := 1/14;
  gamma_H := 1/5.5;
  mu_NA := 1/14;
  mu_WA := 1/14;
  F_N := S_N + E_N + I_N;
  T_HW := 0.5*0.2614;
  mu_W := 1.1*(1/14);
  rho_W := 0.95*1.25;
  F_W := S_W + E_W + I_W;
  mu_N := mu_N0*(1 - eta*cos(2*pi*(time + omega)/365));
  b_W := 0.95*0.63;

  // Rate rules:
  S_H' = -b_N*T_N*L*I_N*S_H - b_W*T_HW*L*I_W*S_W;
  E_H' = b_N*T_N*L*I_N*S_H + b_W*T_HW*L*I_W*S_H - gamma_H*E_H;
  I_H' = gamma_H*E_H - sigma*I_H;
  R_H' = sigma*I_H;
  A_N' = rho_N*(F_N^2/(2*(F_N + F_W)))*(1 - (A_N + A_W)) - (tau_N + mu_NA)*A_N;
  S_N' = tau_N*(A_N/2) + (1 - alpha)*tau_W*(A_W/2) - (b_N*T_N*I_H + mu_N)*S_N;
  E_N' = b_N*T_N*I_H*S_N - (gamma_N + mu_N)*E_N;
  I_N' = gamma_N*E_N - mu_N*I_N;
  A_W' = rho_W*(F_W/2)*(1 - (A_N + A_W)) - (tau_W + mu_WA)*A_W;
  S_W' = tau_W*alpha*(A_W/2) - (b_W*T_N*I_N + mu_W)*S_W;
  E_W' = b_W*T_N*I_H*S_W - (gamma_W + mu_W)*E_W;
  I_W' = gamma_W*E_W - mu_W*I_W;

  // Unit definitions:
  unit volume = 1e-3 litre;
  unit time = 86400 second;
  unit substance = 1e-3 mole;
end
