// SBML level 2 version 4
// dcterms:bibliographicCitation: urn:miriam:pubmed:28288157

function Function_for_R2(alpha, M_p_modifier, a_M_p)
  2*alpha*a_M_p*M_p_modifier;
end

model Vibert2017___Tcell_proliferation_model()
  // Vibert2017 - Tcell proliferation model
  // model allows us to infer proliferation rates and cell cycle phase durations from complex experimental 5-ethynyl-2'-deoxyuridine (EdU) data, revealing T cell proliferation heterogeneity and specific signatures. Model is encoded by Matthew Maire and submitted in BioModels by Krishna Kumar Tiwari.
  // isDescribedBy pubmed:28288157
  // hasProperty mamo:MAMO_0000046

  // Compartments:
  compartment c = 1;

  // Species:
  species M in c = 12;
  species M_p in c = 0;
  species G in c = 4.88455;
  species S in c = 88.8988;
  species G_p in c = 0;
  species S_p in c = 0;
  species $G_tf in c;
  species $S_tf in c;
  species $M_tf in c;

  // Parameters:
  a_M = 2.2;
  alpha = 0;
  a_G = 2.8;
  a_S = 0.1538462;
  d_S = 0;
  beta = 0;
  d_M = 0;
  a_S_p = 0.1538462;
  d_S_p = 0;
  d_M_p = 0;

  // Assignment rules:
  a_M_p := a_M;
  d_G := a_G;
  a_G_p := a_G;
  d_G_p := a_G;
  G_tf := 200*a_M*(a_S + d_S)/(2*a_M*(a_S + d_S) + 2*a_M*a_G + (a_G + d_G)*(a_S + d_S));
  S_tf := G_tf*a_G/(a_S + d_S);
  M_tf := G_tf/2*(a_G + d_G)/a_M;

  // Reactions:
  R1: M => 2 G; c*a_M*M;
  R2: G_p => G; c*Function_for_R2(alpha, M_p, a_M_p);  // modifiers: M_p
  R3: G => S; c*a_G*G;
  R4: G => ; c*d_G*G;
  R5: S => M; c*a_S*S;
  R6: S => ; c*d_S*S;
  R7: S => S_p; c*beta*S;
  R10: G_p => S_p; c*a_G_p*G_p;
  R11: G_p => ; c*d_G_p*G_p;
  R12: S_p => M_p; c*a_S_p*S_p;
  R14: M_p => ; c*d_M_p*M_p;
  R15: M => ; c*d_M*M;
  R16: M_p => 2 G_p; c*a_M_p*M_p;
  R17: S_p => ; c*d_S_p*S_p;

  // Unit definitions:
  unit volume = 1e-3 litre;
  unit time = 3600 second;
  unit substance = 1e-3 mole;
end
