// SBML level 2 version 4
// dcterms:bibliographicCitation: urn:miriam:pubmed:22738223

function Constant_flux__irreversible(v)
  v;
end
Constant_flux__irreversible is "Constant flux (irreversible)";

function Function_for_R2_4(k2, substrate, modifier)
  k2*substrate*modifier;
end

function Function_for_R8(k8, CLB5, CDT1)
  k8*CLB5*CDT1;
end

function Function_for_R9(k9, MCMn, CDT1n, k9r, MCM_CDT1n)
  k9*MCMn*CDT1n - k9r*MCM_CDT1n;
end

function Function_for_R7(k7, RC2, MCM_CDT1n)
  k7*RC2*MCM_CDT1n;
end

function Function_for_R10(k10, RC3, k10r, CDC6, RC4)
  k10*RC3 - k10r*CDC6*RC4;
end

function Function_for_R12(k12, RC4, DBF4, k12r, RC5)
  k12*RC4*DBF4 - k12r*RC5;
end

function Function_for_R13(k13, RC5, CDC45, CLB5, KM2)
  k13*RC5*CDC45*CLB5/(KM2 + CDC45);
end

function Function_for_R17(k17, RC7, CLB5, k18)
  k17*RC7/(1 + (CLB5/k18)^5);
end

function Function_for_R6(k6, MCMc, CDT1c, KM1)
  k6*MCMc*CDT1c/(KM1 + MCMc);
end

function Function_for_R5(k5, RC1, Cdc6, k5r, RC2)
  k5*RC1*Cdc6 - k5r*RC2;
end

model Gidvani2012___DNA_replication_initiation_model_in_S__Cevevisiae()
  // Gidvani2012 - DNA replication initiation model in S. Cevevisiae
  // A quantitative model of the initiation of DNA replication in Saccharomyces cerevisiae predicts the effects of system perturbations. Model is encoded by Matthew Maire and submitted in BioModels by Krishna Kumar Tiwari.
  // isDescribedBy pubmed:22738223
  // hasTaxon taxonomy:4932
  // hasProperty mamo:MAMO_0000046

  // Compartments:
  compartment nuclear = 1;  // isVersionOf ncit:C13361

  // Species:
  species $rc1 in nuclear;
  species rc2 in nuclear = 0;
  species $cdt1c in nuclear;
  species $mcmc in nuclear;
  species cdt1n in nuclear = 0;
  species clb5 in nuclear = 300;
  species mcmn in nuclear = 0;
  species rc3 in nuclear = 0;
  species rc4 in nuclear = 0;
  species rc5 in nuclear = 0;
  species rc6 in nuclear = 0;
  species $cdc45n in nuclear;
  species dbf4n in nuclear = 0;
  species fork in nuclear = 0;
  species rc7 in nuclear = 300;
  species cdc6n in nuclear = 25;
  species mcm_cdt1n in nuclear = 150;
  species $rc_total in nuclear = 300;
  species $cdt1_total in nuclear = 2000;
  species $mcm_total in nuclear = 150;
  species $cdc45_total in nuclear = 900;

  // Parameters:
  k1 = 15.982;
  k2 = 0.001;
  k3 = 1368.22;
  k4 = 2.44;
  k5 = 0.016;
  k5r = 675.422;
  k6 = 1.15;
  k7 = 275.675;
  k8 = 1.732;
  k9 = 100.881;
  k9r = 1042.739;
  k10 = 936.745;
  k10r = 352.504;
  k11 = 885.147;
  k12 = 0.568;
  k12r = 192.628;
  k13 = 0.528;
  k14 = 0.237;
  k15 = 0.097;
  k16 = 3.196;
  k17 = 13.313;
  k18 = 2.497;
  KM1 = 195.302;
  KM2 = 8.248;

  // Assignment rules:
  mcmc := mcm_total - mcmn - rc3 - rc4 - rc5 - rc6 - fork - mcm_cdt1n;
  cdt1c := cdt1_total - cdt1n;
  cdc45n := cdc45_total - rc6 - fork;
  rc1 := rc_total - rc2 - rc3 - rc4 - rc5 - rc6 - rc7;

  // Reactions:
  R1: => cdc6n; nuclear*Constant_flux__irreversible(k1);
  R2: cdc6n => ; nuclear*Function_for_R2_4(k2, cdc6n, clb5);  // modifiers: clb5
  R3: => dbf4n; nuclear*Constant_flux__irreversible(k3);
  R4: dbf4n => ; nuclear*Function_for_R2_4(k4, dbf4n, cdt1c);  // modifiers: cdt1c
  R5: cdc6n => rc2; nuclear*Function_for_R5(k5, rc1, cdc6n, k5r, rc2);  // modifiers: rc1
  R6: $mcmc + $cdt1c => mcm_cdt1n; nuclear*Function_for_R6(k6, mcmc, cdt1c, KM1);
  R7: rc2 + mcm_cdt1n => rc3 + cdt1n; nuclear*Function_for_R7(k7, rc2, mcm_cdt1n);
  R8: cdt1n => ; nuclear*Function_for_R8(k8, clb5, cdt1n);  // modifiers: clb5
  R9: mcm_cdt1n => mcmn + cdt1n; nuclear*Function_for_R9(k9, mcmn, cdt1n, k9r, mcm_cdt1n);
  R10: rc3 => rc4 + cdc6n; nuclear*Function_for_R10(k10, rc3, k10r, cdc6n, rc4);
  R11: rc4 => mcmn; nuclear*k11*rc4;
  R12: dbf4n + rc4 => rc5; nuclear*Function_for_R12(k12, rc4, dbf4n, k12r, rc5);
  R13: rc5 => rc6; nuclear*Function_for_R13(k13, rc5, cdc45n, clb5, KM2);  // modifiers: cdc45n, clb5
  R14: rc6 => rc7 + fork + dbf4n; nuclear*k14*rc6;
  R15: fork => mcmn; nuclear*k15*fork;
  R16: mcmn => ; nuclear*k16*mcmn;  // modifiers: clb5
  R17: rc7 => ; nuclear*Function_for_R17(k17, rc7, clb5, k18);  // modifiers: clb5

  // Unit definitions:
  unit volume = 1e-3 litre;
  unit substance = 1e-3 mole;
end
