// SBML level 2 version 4
// dcterms:bibliographicCitation: urn:miriam:doi:10.1002/mma.4213

model Bayleyegn2016___interactions_of_CycE_Cdk2__Cdc25A__and_P27_Kip1_in_a_core_cancer_subnetwork()
  // Bayleyegn2016 - interactions of CycE/Cdk2, Cdc25A, and P27 Kip1 in a core cancer subnetwork
  // Mathematical description of the interactions of CycE/Cdk2, Cdc25A, and P27Kip1 in a core cancer subnetwork. Model is encoded by Matthieu Maire/partially by Krishna Kumar Tiwari and submitted to BioModels by Krishna Kumar Tiwari.
  // isDescribedBy doi:10.1002/mma.4213
  // hasProperty mamo:MAMO_0000046

  // Compartments:
  compartment compartment = 1;

  // Species:
  species $Cdc25A in compartment = 1;
  species $CycE_CDK2 in compartment = 1; CycE_CDK2 is "CycE/CDK2";
  species $p27_kip1 in compartment = 1;

  // Parameters:
  alpha = 0.2;
  beta = 0.25;
  gamma = 0.15;
  k1 = 0.3;
  k2 = 0.4;
  k3 = 0.35;
  k4 = 0.65;
  p = 0.4;
  s = 0.2;
  a = 0.1;
  b = 0.1;
  c = 0.1;

  // Rate rules:
  Cdc25A' = alpha + k1*CycE_CDK2 - a*Cdc25A;
  CycE_CDK2' = beta + k2*Cdc25A - b*CycE_CDK2 + p*k3/(k3 + p27_kip1);
  p27_kip1' = gamma - c*p27_kip1 + s*k4/(k4 + CycE_CDK2);

  // Unit definitions:
  unit volume = 1e-3 litre;
  unit substance = 1e-3 mole;
end
