// SBML level 2 version 4
// dcterms:bibliographicCitation: urn:miriam:pubmed:11965250

function Function_for_R30(k30, cycE_Cdk2_p27)
  k30*cycE_Cdk2_p27;
end

function Function_for_R32(k32, cycE_Cdk2_cycE_Cdk2_p27)
  k32*cycE_Cdk2_cycE_Cdk2_p27;
end

function Function_for_R27(k27, cycE_Cdk2)
  k27*cycE_Cdk2;
end

function Function_for_R26(k26, mRNA)
  k26*mRNA;
end

function Function_for_R13(k13, cycE_Cdk2)
  k13*cycE_Cdk2;
end

function Function_for_R15(k15, cycE_Cdk2_pRbE2F)
  k15*cycE_Cdk2_pRbE2F;
end

function Function_for_R8(k8, pRbE2F)
  k8*pRbE2F;
end

model Chiorino2002___G1_S_transition_model()
  // Chiorino2002 - G1/S transition model
  // mathematical approach to model the protein interactions regulating the transition from the G1 phase to the phase of DNA synthesis. Model is encoded by matthieu Maire and submitted to BioModels by krishna kumar tiwari.
  // isDescribedBy pubmed:11965250
  // hasProperty mamo:MAMO_0000046

  // Compartments:
  compartment c = 1;

  // Species:
  species pRb in c = 30;
  species pRbE2F in c = 0;
  species Cdk2 in c = 25;
  species cycE in c = 0;
  species cycE_Cdk2 in c = 3;
  species cycE_Cdk2_pRbE2F in c = 0;
  species pRb_P in c = 0;
  species cycE_P in c = 0;
  species cycE_Cdk2_p27 in c = 0;
  species p27 in c = 0;
  species cycE_Cdk2_cycE_Cdk2_p27 in c = 0;
  species p27_P in c = 0;
  species mRNA_cyclinE in c = 0;
  species E2F in c = 0;
  species mRNA_E2F in c = 4.2;

  // Parameters:
  k8 = 4;
  k9 = 0.1;
  k13 = 0.2;
  k14 = 0;
  k15 = 1.5;
  k16 = 0.2;
  k17 = 5;
  k27 = 0.1;
  k29 = 0.1;
  k30 = 0.1;
  k31 = 0.1;
  k32 = 0.1;
  k33 = 0.1;
  k26 = 1.7;

  // Reactions:
  R8: pRb => pRbE2F; c*Function_for_R8(k8, pRbE2F);
  R9: pRbE2F => pRb; c*k9*pRbE2F;
  R13: cycE + Cdk2 => cycE_Cdk2; c*Function_for_R13(k13, cycE_Cdk2);
  R14: cycE_Cdk2 => cycE + Cdk2; c*k14*cycE_Cdk2;
  R15: cycE_Cdk2 + pRbE2F => cycE_Cdk2_pRbE2F; c*Function_for_R15(k15, cycE_Cdk2_pRbE2F);
  R16: cycE_Cdk2_pRbE2F => cycE_Cdk2 + pRbE2F; c*k16*cycE_Cdk2_pRbE2F;
  R17: cycE_Cdk2_pRbE2F => cycE_Cdk2 + pRb_P; c*k17*cycE_Cdk2_pRbE2F;
  R26: => cycE; c*Function_for_R26(k26, mRNA_cyclinE);  // modifiers: mRNA_cyclinE
  R27: => cycE_P + Cdk2; c*Function_for_R27(k27, cycE_Cdk2);  // modifiers: cycE_Cdk2
  R29: cycE_Cdk2_p27 => p27; c*k29*cycE_Cdk2_p27;
  R30: p27 => cycE_Cdk2_p27; c*Function_for_R30(k30, cycE_Cdk2_p27);
  R31: cycE_Cdk2_cycE_Cdk2_p27 => cycE_Cdk2_p27 + cycE_Cdk2; c*k31*cycE_Cdk2_cycE_Cdk2_p27;
  R32: cycE_Cdk2_p27 + cycE_Cdk2 => cycE_Cdk2_cycE_Cdk2_p27; c*Function_for_R32(k32, cycE_Cdk2_cycE_Cdk2_p27);
  R33: cycE_Cdk2_cycE_Cdk2_p27 => 2 cycE_Cdk2 + p27_P; c*k33*cycE_Cdk2_cycE_Cdk2_p27;
  R18: mRNA_E2F => E2F; c*k1*mRNA_E2F;
    k1 = 0.1;

  // Unit definitions:
  unit volume = 1e-3 litre;
  unit substance = 1e-3 mole;
end
