// SBML level 2 version 4
// dcterms:bibliographicCitation: urn:miriam:doi:10.1016/0009-2509(90)80117-W

model Starbuck1990_EGF_binding_and_trafficking_dynamics_in_Fibroblast()
  // mathematical model, with accompanying quantitative experimental data, for binding and trafficking properties of the epidermal growth factor (EGF) receptor on B82 fibroblasts, and propose a theoretical dependence of cell proliferation rate on these properties. Model encoded by Matthieu Maire adn submitted to BioModels by Krishna Kumar Tiwari.
  // isDescribedBy doi:10.1016/0009-2509(90)80117-W
  // hasProperty mamo:MAMO_0000046

  // Parameters:
  PT = 66000 per_cell;
  kf = 1200000 unit_0;
  Lo = 0 unit_1;
  Rs = 0 per_cell;
  kc = 3.8e-7 per_number_per_second;
  Nav = 6.0221419e23 unit_2;
  kfv has cell_per_number_second;
  Rii = 0 per_cell;
  L = 1 unit_3;
  Ric = 0 per_cell;
  kfe has cell_per_number_second;
  kfc has unit_0;
  kdeg = 0.02 unit_4;
  RT = 180000 per_cell;
  Ts = 0 per_cell;
  kuc = 0.012 unit_4;
  kr_ = 0.36 unit_4;
  numcell has cell_per_plate;
  ku_ = 0.1216 unit_4;
  Ti = 0 per_cell;
  fr = 1 unit_5;
  plate = 1 unit_5;
  cell = 1 unit_3;
  Ps = 0 per_cell;
  K_DT = 320000 unit_4;
  Vendosome = 5e-19 litre_per_cell;
  Pi = 0 per_cell;
  Kcp = 3.125e-6 unit_5;
  Lii = 0 unit_1;
  krec_p = 20 unit_4;
  ku has unit_4;
  kt = 0.05 unit_4;
  ks = 1 number_per_cell_second;
  Cii = 0 per_cell;
  kr = 0.036 unit_4;
  K_DC = 3e-8 unit_1;
  Lic = 0 unit_1;
  krec_i = 0.05 unit_4;
  Vplate has unit_3;
  Cs = 0 per_cell;
  Cic = 0 per_cell;
  PT_RT = 0.37 unit_5;
  krec_c = 0.05 unit_4;
  lamda = 1.8 unit_4;
  Vvesicle = 5e-15 litre_per_cell;

  // Assignment rules:
  numcell := cell/plate;
  ku := kc/Kcp;
  kfe := kf/(Nav*Vendosome);
  kfv := kf/(Nav*Vvesicle);
  Vplate := L/plate;
  kfc := kf*numcell/(Nav*Vplate);

  // Rate rules:
  Lo' = numcell*kr*Cs + krec_c*Lic - kfc*Rs*Lo;
  Rs' = kr*Cs + krec_c*Ric + krec_i*(1 - fr)*Rii + ks - (kfc/numcell*Rs*Lo + kt*Rs);
  Rii' = kr_*Cii - (kfe/numcell*Rii*Lii + krec_i*(1 - fr)*Rii + fr*kdeg*Rii);
  Ric' = kr*Cic + kt*Rs - (kfv/numcell*Ric*Lic + krec_c*Ric);
  Ts' = kc*Cs*Ps - (ku*Ts + lamda*Ts);
  Ti' = lamda*Ts - (ku_*Ti + kdeg*Ti);
  Ps' = ku*Ts + krec_p*Pi - (kc*Cs*Ps + lamda*Ps);
  Pi' = ku_*Ti + lamda*Pi - krec_p*Pi;
  Lii' = numcell*kr_*Cii - (kdeg*Lii + kfe*Rii*Lii);
  Cii' = kfe/numcell*Rii*Lii + ku_*Ti - (kr_*Cii + fr*kdeg*Cii + krec_i*(1 - fr)*Cii);
  Lic' = numcell*kr*Cic - (krec_c*Lic + kfv*Ric*Lic);
  Cs' = ku*Ts + krec_c*Cic + krec_i*(1 - fr)*Cii - (kfc/numcell*Rs*Lo + kr*Cs + kc*Cs*Ps + kt*Cs);
  Cic' = kfv/numcell*Ric*Lic + kt*Cs - (kr*Cic + krec_c*Cic);

  // Unit definitions:
  unit number = 1;
  unit cell = 1;
  unit plate = 1;
  unit per_mole = 1 / mole;
  unit per_minute = 1 / (60 second);
  unit molar = mole / (1000 metre)^3;
  unit first_order_rate_constant = 1 / second;
  unit second_order_rate_constant = (1e-3 metre)^3 / (second * mole);
  unit molar_per_second = mole / ((1000 metre)^3 * second); molar_per_second is "molar/second";
  unit unit_0 = metre^3 / (mole * second); unit_0 is "m³/(mol*s)";
  unit unit_1 = 1000 mole / metre^3; unit_1 is "kmol/m³";
  unit unit_2 = 1 / mole; unit_2 is "1/mol";
  unit unit_3 = litre; unit_3 is "l";
  unit unit_4 = 1 / second; unit_4 is "1/s";
  unit unit_5 = dimensionless^0; unit_5 is "dimensionless";
end
