// SBML level 2 version 4
// dcterms:bibliographicCitation: urn:miriam:pubmed:31128139

function Constant_flux__irreversible(v)
  v;
end
Constant_flux__irreversible is "Constant flux (irreversible)";

function Function_for_Sporozoites_Infection(N_v, alpha_v, I_V)
  N_v*alpha_v*I_V;
end

function Function_for_Gametocyte_Infection(N_h, alpha_h, I_H)
  N_h*alpha_h*I_H;
end

model Garira2019___A_coupled_multiscale_model_to_guide_malaria_control_and_elimination()
  // Garira2019 - A coupled multiscale model to guide malaria control and elimination
  // This is a coupled multiscale mathematical model of malaria control and elimination containing four submodels: mosquito-to-human transmission of the malaria parasite, human-to-mosquito transmission of the malaria parasite, a within-mosquito malaria parasite population dynamics sub-model and a within-human malaria parasite population dynamics sub-model.
  // Model is encoded by Johannes and submitted to BioModels by Ahmad Zyoud.
  // isDescribedBy pubmed:31128139
  // hasProperty ncit:C34797 ncit:C71292 mamo:MAMO_0000046

  // Compartments:
  compartment compartment = 1;

  // Species:
  species S_H in compartment = 10000;
  species I_H in compartment = 70;
  species P_V in compartment = 40000;
  species S_V in compartment = 100000;
  species I_V in compartment = 200;
  species G_H in compartment = 60000;

  // Parameters:
  alpha_V = 0.9;
  lambda_V = 6000;
  beta_V = 0.2;
  G_0 = 500000000;
  mu_V = 0.12;
  delta_V = 4.26e-6;
  lambda_H = 1000;
  beta_H = 0.3;
  alpha_H = 9.13e-5;
  mu_H = 4e-5;
  gamma_H = 0.25;
  P_0 = 100000000;
  delta_H = 0.0027;
  alpha_g = 96;
  lambda_v = 300;
  mu_g = 0.0625;
  N_g = 2;
  alpha_s = 0.08;
  mu_s = 58;
  alpha_z = 0.424;
  mu_z = 1;
  alpha_k = 0.2;
  mu_k = 0.01;
  N_k = 3000;
  alpha_v = 0.025;
  mu_v = 0.0001;
  lambda_h = 200;
  beta_h = 0.1;
  mu_b = 0.0083;
  pi = 0.1;
  mu_m = 0.001;
  alpha_m = 0.5;
  N_m = 16;
  alpha_h = 0.02;
  mu_h = 0.0625;
  Initial_for_G_0 = G_0;
  Initial_for_N_g = N_g;
  Initial_for_N_k = N_k;
  Initial_for_P_0 = P_0;
  Initial_for_alpha_g = alpha_g;
  Initial_for_alpha_h = alpha_h;
  Initial_for_alpha_k = alpha_k;
  Initial_for_alpha_s = alpha_s;
  Initial_for_alpha_v = alpha_v;
  Initial_for_alpha_z = alpha_z;
  Initial_for_beta_H = beta_H;
  Initial_for_beta_V = beta_V;
  Initial_for_beta_h = beta_h;
  Initial_for_lambda_h = lambda_h;
  Initial_for_lambda_v = lambda_v;
  Initial_for_mu_b = mu_b;
  Initial_for_mu_g = mu_g;
  Initial_for_mu_h = mu_h;
  Initial_for_mu_k = mu_k;
  Initial_for_mu_m = mu_m;
  Initial_for_mu_s = mu_s;
  Initial_for_mu_v = mu_v;
  Initial_for_mu_z = mu_z;
  Initial_for_pi = pi;

  // Assignment rules:
  lamb_V := Initial_for_beta_V*P_V/(Initial_for_P_0 + P_V);
  N_v := 0.5*(Initial_for_lambda_v/(Initial_for_alpha_v + Initial_for_mu_v))*(Initial_for_N_k*Initial_for_alpha_k/(Initial_for_alpha_k + Initial_for_mu_k))*(Initial_for_alpha_z/(Initial_for_alpha_z + Initial_for_mu_z))*(Initial_for_alpha_s/(Initial_for_alpha_s + Initial_for_mu_s))*(Initial_for_N_g*Initial_for_alpha_g/(Initial_for_alpha_g + Initial_for_mu_g));
  R_0 := (1 - Initial_for_pi)*N_m*Initial_for_beta_h*Initial_for_lambda_h/(Initial_for_mu_b*Initial_for_mu_m);
  N_h := (R_0 - 1)*Initial_for_pi*Initial_for_lambda_h/(R_0*(Initial_for_alpha_h + Initial_for_mu_h));
  lamb_H := Initial_for_beta_H*G_H/(Initial_for_G_0 + G_H);
  G_H_1e9 := G_H/1000000000;

  // Reactions:
  Human_Supply: => S_H; compartment*Constant_flux__irreversible(lambda_H);
  Human_Contact_Mosquito: S_H => I_H; compartment*lamb_V*S_H;
  Humans_Death: S_H => ; compartment*mu_H*S_H;
  Humans_Recovery: I_H => S_H; compartment*gamma_H*I_H;
  Infected_Humans_Death: I_H => ; compartment*mu_H*I_H;
  Infected_Humans_Death_Disease: I_H => ; compartment*delta_H*I_H;
  Sporozoites_Infection: => P_V; compartment*Function_for_Sporozoites_Infection(N_v, alpha_v, I_V);  // modifiers: I_V
  Sporozoites_Elimination: P_V => ; compartment*alpha_V*P_V;
  Susceptible_Mosquitos_Supply: => S_V; compartment*Constant_flux__irreversible(lambda_V);
  Susceptible_Mosquitos_Infection: S_V => I_V; compartment*lamb_H*S_V;
  Susceptible_Mosquitos_Death: S_V => ; compartment*mu_V*S_V;
  Infected_Mosquitos_Death: I_V => ; compartment*mu_V*I_V;
  Infected_Mosquitos_Death_Infection: I_V => ; compartment*delta_V*I_V;
  Gametocyte_Infection: => G_H; compartment*Function_for_Gametocyte_Infection(N_h, alpha_h, I_H);  // modifiers: I_H
  Gametocyte_Elimination: G_H => ; compartment*alpha_H*G_H;

  // Unit definitions:
  unit volume = 1e-3 litre;
  unit time = 86400 second;
  unit substance = item;
end
