// SBML level 2 version 4
// dcterms:bibliographicCitation: urn:miriam:pubmed:16122424

function Rate_Law_for_reaction_for_Cyclin_decay(kdest, apcstar, cyclin, ka, cdc2, cdc2af)
  kdest*apcstar*cyclin + ka*(cdc2 + cdc2af)*cyclin;
end

function Rate_Law_for_reactionfor_Cyclin_production(ksynth, kd, cdc2cyclin, cdc2afcyclin)
  ksynth + kd*(cdc2cyclin + cdc2afcyclin);
end

function Rate_Law_for_reaction_for_cdc2cyclin_decay(kd, cdc2cyclin, kdest, apcstar, kwee1, wee1act, kwee1basal, wee1tot)
  kd*cdc2cyclin + kdest*apcstar*cdc2cyclin + kwee1*wee1act*cdc2cyclin + kwee1basal*(wee1tot - wee1act)*cdc2cyclin;
end

function Rate_Law_for_reaction_cdc2cyclinyp_production(kwee1, wee1act, cdc2cyclin, kwee1basal, wee1tot, kpp2c, cdc2cyclinyptp)
  kwee1*wee1act*cdc2cyclin + kwee1basal*(wee1tot - wee1act)*cdc2cyclin + kpp2c*cdc2cyclinyptp;
end

function Rate_Law_for_reaction_cdc2cyclinyp_decay(kcdc25, cdc25act, cdc2cyclinyp, kcdc25basal, cdc25tot, kcak, kdest, apcstar)
  kcdc25*cdc25act*cdc2cyclinyp - kcdc25basal*(cdc25tot - cdc25act)*cdc2cyclinyp - kcak*cdc2cyclinyp - kdest*apcstar*cdc2cyclinyp;
end

function Rate_Law_for_reaction_for_cdc2cyclinyptp_production(kcak, cdc2cyclinyp, kwee1, wee1act, cdc2cyclintp, kwee1basal, wee1tot)
  kcak*cdc2cyclinyp + kwee1*wee1act*cdc2cyclintp + kwee1basal*(wee1tot - wee1act)*cdc2cyclintp;
end

function Rate_Law_for_reaction_for_cdc2cyclintp_production(kcdc25, cdc25act, cdc2cyclinyptp, kcdc25basal, cdc25tot)
  kcdc25*cdc25act*cdc2cyclinyptp + kcdc25basal*(cdc25tot - cdc25act)*cdc2cyclinyptp;
end

function Rate_Law_for_reaction_reaction_for_cdc2cyclinyptp_decay(kpp2c, cdc2cyclinyptp, kcdc25, cdc25act, kcdc25basal, cdc25tot, kdest, apcstar)
  kpp2c*cdc2cyclinyptp + kcdc25*cdc25act*cdc2cyclinyptp + kcdc25basal*(cdc25tot - cdc25act)*cdc2cyclinyptp + kdest*apcstar*cdc2cyclinyptp;
end

function Rate_Law_for_reaction_cdc2_production(kdest, apcstar, cdc2cyclin, cdc2cyclinyp, cdc2cyclinyptp, cdc2cyclintp, kd)
  kdest*apcstar*(cdc2cyclin + cdc2cyclinyp + cdc2cyclinyptp + cdc2cyclintp) + kd*cdc2cyclin;
end

function Rate_Law_for_reaction_cdc2_decay(ka, cdc2, cyclin)
  ka*cdc2*cyclin;
end

function Rate_Law_for_reaction_for_cdc2afcyclin_production(ka, cdc2af, cyclin, kpp2c, cdc2afcyclintp)
  ka*cdc2af*cyclin + kpp2c*cdc2afcyclintp;
end

function Rate_Law_for_reaction_for_cdc2afcyclin_decay(kd, cdc2afcyclin, kdest, apcstar, kcak)
  kd*cdc2afcyclin + kdest*apcstar*cdc2afcyclin + kcak*cdc2afcyclin;
end

function Rate_Law_for_reaction_for_cdc2afcyclintp_decay(kpp2c, cdc2afcyclintp, kdest, apcstar)
  kpp2c*cdc2afcyclintp + kdest*apcstar*cdc2afcyclintp;
end

function Rate_Law_for_reaction_for_cdc2afcyclintp_production(kcak, cdc2afcyclin)
  kcak*cdc2afcyclin;
end

function Rate_Law_for_reaction_for_cdc2cyclintp_decay(kwee1, wee1act, cdc2cyclintp, kwee1basal, wee1tot, kdest, apcstar)
  kwee1*wee1act*cdc2cyclintp + kwee1basal*(wee1tot - wee1act)*cdc2cyclintp + kdest*apcstar*cdc2cyclintp;
end

function Rate_Law_for_reaction_for_cdc2af_production(kdest, apcstar, cdc2afcyclin, cdc2afcyclintp, kd)
  kdest*apcstar*(cdc2afcyclin + cdc2afcyclintp) + kd*cdc2afcyclin;
end

function Rate_Law_for_reaction_for_cdc2cyclin_production(ka, cdc2, cyclin, kcdc25, cdc25act, cdc2cyclinyp, kcdc25basal, cdc25tot)
  ka*cdc2*cyclin + kcdc25*cdc25act*cdc2cyclinyp + kcdc25basal*(cdc25tot - cdc25act)*cdc2cyclinyp;
end

function Rate_Law_for_reaction_for_wee1act_decay(kwee1off, cdc2cyclintp, cdc2afcyclintp, nwee1, ec50wee1, wee1act)
  kwee1off*((cdc2cyclintp + cdc2afcyclintp)^nwee1/(ec50wee1^nwee1 + (cdc2cyclintp + cdc2afcyclintp)^nwee1))*wee1act;
end

function Rate_Law_for_reaction_for_cdc25act_production(kcdc25on, cdc2cyclintp, cdc2afcyclintp, ncdc25, ec50cdc25, cdc25tot, cdc25act)
  kcdc25on*((cdc2cyclintp + cdc2afcyclintp)^ncdc25/(ec50cdc25^ncdc25 + (cdc2cyclintp + cdc2afcyclintp)^ncdc25))*(cdc25tot - cdc25act);
end

function Rate_Law_for_reaction_for_plxact_decay(kplxoff, plxact)
  kplxoff*plxact;
end

function Rate_Law_for_reaction_for_wee1act_production(kwee1on, wee1tot, wee1act)
  kwee1on*(wee1tot - wee1act);
end

function Rate_Law_for_reaction_for_apcstar_production(kapcon, plxact, napc, ec50apc, apctot, apcstar)
  kapcon*(plxact^napc/(ec50apc^napc + plxact^napc))*(apctot - apcstar);
end

function Rate_Law_for_reaction_for_apcstar_decay(kapcoff, apcstar)
  kapcoff*apcstar;
end

function Rate_Law_for_reaction_for_cdc2af_decay(ka, cdc2af, cyclin)
  ka*cdc2af*cyclin;
end

function Rate_Law_for_reaction_for_plxact_production(kplxon, cdc2cyclintp, cdc2afcyclintp, nplx, ec50plx, plxtot, plxact)
  kplxon*((cdc2cyclintp + cdc2afcyclintp)^nplx/(ec50plx^nplx + (cdc2cyclintp + cdc2afcyclintp)^nplx))*(plxtot - plxact);
end

function Rate_Law_for_reaction_for_cdc25act_decay(kcdc25off, cdc25act)
  kcdc25off*cdc25act;
end

model Pomerening2005__Model_of_the_Xenopus_Cdc2_APC_System()
  // Pomerening2005- Model of the Xenopus Cdc2/APC System
  // The cell-cycle oscillator includes an essential negative-feedback loop: Cdc2 activates the anaphase-promoting complex (APC), which leads to cyclin destruction and Cdc2 inactivation. Under some circumstances, a negative-feedback loop is sufficient to generate sustained oscillations. However, the Cdc2/APC system also includes positive-feedback loops, whose functional importance we now assess. We show that short-circuiting positive feedback makes the oscillations in Cdc2 activity faster, less temporally abrupt, and damped. This compromises the activation of cyclin destruction and interferes with mitotic exit and DNA replication. This work demonstrates a systems-level role for positive-feedback loops in the embryonic cell cycle and provides an example of how oscillations can emerge out of combinations of subcircuits whose individual behaviors are not oscillatory. This work also underscores the fundamental similarity of cell-cycle oscillations in embryos to repetitive action potentials in pacemaker neurons, with both systems relying on a combination of negative and positive-feedback loops.
  // hasTaxon taxonomy:8355
  // isDescribedBy pubmed:16122424
  // hasProperty GO:0007049 ncit:C17349 mamo:MAMO_0000046

  // Compartments:
  compartment compartment = 1;

  // Species:
  species Cyclin in compartment = 0;
  species cdc2cyclin in compartment = 0;
  species cdc2cyclinyp in compartment = 0;
  species cdc2cyclinyptp in compartment = 0;
  species cdc2cyclintp in compartment = 0;
  species cdc2 in compartment = 230;
  species cdc2afcyclin in compartment = 0;
  species cdc2afcyclintp in compartment = 0;
  species cdc2af in compartment = 0;
  species cdc25act in compartment = 0;
  species wee1act in compartment = 15;
  species plxact in compartment = 0;
  species apcstar in compartment = 0;

  // Parameters:
  newfactor = 100;
  ka = 0.1;
  kd = 0.001;
  factor = 15;
  kwee1 = 0.05;
  kcdc25 = 0.1;
  cdc25tot = 15;
  wee1tot = 15;
  apctot = 50;
  plxtot = 50;
  nwee1 = 4;
  ncdc25 = 4;
  napc = 3;
  nplx = 3;
  ec50plx = 40;
  ec50wee1 = 40;
  ec50cdc25 = 40;
  ec50apc = 40;
  kcdc25on = 1.75;
  kcdc25off = 0.2;
  kapcon = 1;
  kapcoff = 0.15;
  kplxon = 1;
  kplxoff = 0.15;
  kwee1on = 0.2;
  kwee1off = 1.75;
  kcak = 0.8;
  kpp2c = 0.008;

  // Assignment rules:
  kdest := 6e-5*newfactor;
  kwee1basal := kwee1/factor;
  ksynth := 0.004*newfactor;
  kcdc25basal := kcdc25/factor;

  // Reactions:
  reactionfor_Cyclin_production: => Cyclin; compartment*Rate_Law_for_reactionfor_Cyclin_production(ksynth, kd, cdc2cyclin, cdc2afcyclin);  // modifiers: cdc2cyclin, cdc2afcyclin
  reaction_for_Cyclin_decay: Cyclin => ; compartment*Rate_Law_for_reaction_for_Cyclin_decay(kdest, apcstar, Cyclin, ka, cdc2, cdc2af);  // modifiers: apcstar, cdc2, cdc2af
  reaction_for_cdc2cyclin_production: => cdc2cyclin; compartment*Rate_Law_for_reaction_for_cdc2cyclin_production(ka, cdc2, Cyclin, kcdc25, cdc25act, cdc2cyclinyp, kcdc25basal, cdc25tot);  // modifiers: cdc2, Cyclin, cdc25act, cdc2cyclinyp
  reaction_for_cdc2cyclin_decay: cdc2cyclin => ; compartment*Rate_Law_for_reaction_for_cdc2cyclin_decay(kd, cdc2cyclin, kdest, apcstar, kwee1, wee1act, kwee1basal, wee1tot);  // modifiers: apcstar, wee1act
  reaction_cdc2cyclinyp_production: => cdc2cyclinyp; compartment*Rate_Law_for_reaction_cdc2cyclinyp_production(kwee1, wee1act, cdc2cyclin, kwee1basal, wee1tot, kpp2c, cdc2cyclinyptp);  // modifiers: wee1act, cdc2cyclin, cdc2cyclinyptp
  reaction_cdc2cyclinyp_decay: cdc2cyclinyp => ; compartment*Rate_Law_for_reaction_cdc2cyclinyp_decay(kcdc25, cdc25act, cdc2cyclinyp, kcdc25basal, cdc25tot, kcak, kdest, apcstar);  // modifiers: cdc25act, apcstar
  reaction_for_cdc2cyclinyptp_production: => cdc2cyclinyptp; compartment*Rate_Law_for_reaction_for_cdc2cyclinyptp_production(kcak, cdc2cyclinyp, kwee1, wee1act, cdc2cyclintp, kwee1basal, wee1tot);  // modifiers: cdc2cyclinyp, wee1act, cdc2cyclintp
  reaction_for_cdc2cyclinyptp_decay: cdc2cyclinyptp => ; compartment*Rate_Law_for_reaction_reaction_for_cdc2cyclinyptp_decay(kpp2c, cdc2cyclinyptp, kcdc25, cdc25act, kcdc25basal, cdc25tot, kdest, apcstar);  // modifiers: cdc25act, apcstar
  reaction_for_cdc2cyclintp_production: => cdc2cyclintp; compartment*Rate_Law_for_reaction_for_cdc2cyclintp_production(kcdc25, cdc25act, cdc2cyclinyptp, kcdc25basal, cdc25tot);  // modifiers: cdc25act, cdc2cyclinyptp
  reaction_cdc2_production: => cdc2; compartment*Rate_Law_for_reaction_cdc2_production(kdest, apcstar, cdc2cyclin, cdc2cyclinyp, cdc2cyclinyptp, cdc2cyclintp, kd);  // modifiers: apcstar, cdc2cyclin, cdc2cyclinyp, cdc2cyclinyptp, cdc2cyclintp
  reaction_cdc2_decay: cdc2 => ; compartment*Rate_Law_for_reaction_cdc2_decay(ka, cdc2, Cyclin);  // modifiers: Cyclin
  reaction_for_cdc2afcyclin_production: => cdc2afcyclin; compartment*Rate_Law_for_reaction_for_cdc2afcyclin_production(ka, cdc2af, Cyclin, kpp2c, cdc2afcyclin);  // modifiers: cdc2af, Cyclin
  reaction_for_cdc2afcyclin_decay: cdc2afcyclin => ; compartment*Rate_Law_for_reaction_for_cdc2afcyclin_decay(kd, cdc2afcyclin, kdest, apcstar, kcak);  // modifiers: apcstar
  reaction_for_cdc2afcyclintp_production: => cdc2afcyclintp; compartment*Rate_Law_for_reaction_for_cdc2afcyclintp_production(kcak, cdc2afcyclin);  // modifiers: cdc2afcyclin
  reaction_for_cdc2afcyclintp_decay: cdc2afcyclintp => ; compartment*Rate_Law_for_reaction_for_cdc2afcyclintp_decay(kpp2c, cdc2afcyclintp, kdest, apcstar);  // modifiers: apcstar
  reaction_for_cdc2af_production: => cdc2af; compartment*Rate_Law_for_reaction_for_cdc2af_production(kdest, apcstar, cdc2afcyclin, cdc2afcyclintp, kd);  // modifiers: apcstar, cdc2afcyclin, cdc2afcyclintp
  reaction_for_cdc2af_decay: cdc2af => ; compartment*Rate_Law_for_reaction_for_cdc2af_decay(ka, cdc2af, Cyclin);  // modifiers: Cyclin
  reaction_for_cdc25act_production: => cdc25act; compartment*Rate_Law_for_reaction_for_cdc25act_production(kcdc25on, cdc2cyclintp, cdc2afcyclintp, ncdc25, ec50cdc25, cdc25tot, cdc25act);  // modifiers: cdc2cyclintp, cdc2afcyclintp
  reaction_for_cdc25act_decay: cdc25act => ; compartment*Rate_Law_for_reaction_for_cdc25act_decay(kcdc25off, cdc25act);
  reaction_for_wee1act_production: => wee1act; compartment*Rate_Law_for_reaction_for_wee1act_production(kwee1on, wee1tot, wee1act);
  reaction_for_wee1act_decay: wee1act => ; compartment*Rate_Law_for_reaction_for_wee1act_decay(kwee1off, cdc2cyclintp, cdc2afcyclintp, nwee1, ec50wee1, wee1act);  // modifiers: cdc2cyclintp, cdc2afcyclintp
  reaction_for_plxact_production: => plxact; compartment*Rate_Law_for_reaction_for_plxact_production(kplxon, cdc2cyclintp, cdc2afcyclintp, nplx, ec50plx, plxtot, plxact);  // modifiers: cdc2cyclintp, cdc2afcyclintp
  reaction_for_plxact_decay: plxact => ; compartment*Rate_Law_for_reaction_for_plxact_decay(kplxoff, plxact);
  reaction_for_apcstar_production: => apcstar; compartment*Rate_Law_for_reaction_for_apcstar_production(kapcon, plxact, napc, ec50apc, apctot, apcstar);  // modifiers: plxact
  reaction_for_apcstar_decay: apcstar => ; compartment*Rate_Law_for_reaction_for_apcstar_decay(kapcoff, apcstar);
  reaction_for_cdc2cyclintp_decay: cdc2cyclintp => ; compartment*Rate_Law_for_reaction_for_cdc2cyclintp_decay(kwee1, wee1act, cdc2cyclintp, kwee1basal, wee1tot, kdest, apcstar);  // modifiers: wee1act, apcstar

  // Unit definitions:
  unit volume = 1e-3 litre;
  unit substance = 1e-3 mole;
end
