// SBML level 2 version 4

model PI_full_model()
  // Mazet2020 - model of the PI cycle
  // PI cycle Core Model
  // Global Quantities = free + bound PL for PI, PIP2, PI4P, PIP3, PI34P2, DAG, PA.
  // For PI initial quantity added in GQ is in organelle membranes
  // NB: all labeled [xxgl] in plots
  // select L.GPCR for GPCR simulations in Events
  // select R for GqPCR receptor number simulations
  // relevant plots = Core - IP3-DAG - PI3K-GPCR
  // NB:
  // Built using Particle Numbers
  // flux are not properly calculated (enzymes are not written as modifiers)
  // hasProperty mamo:MAMO_0000202

  // Compartments:
  compartment Membrane = 1;
  compartment cytosol = 1;
  compartment organelles_CS = 5; organelles_CS is "organelles&CS";

  // Species:
  species PI in Membrane = 6160000;
  species PI4K in cytosol = 1973.447;
  species PIP2 in Membrane = 414430;
  species OCRL1 in cytosol = 850;
  species Ins in cytosol = 467493.7;
  species PLC in cytosol = 5000;
  species CDIPT in cytosol = 1000;
  species PLCa in Membrane = 1.72e-7;
  species PI4Ka in Membrane = 5.07e-7;
  species PIP2_PLB in Membrane = 844497; PIP2_PLB is "PIP2.PLB";
  species PLB in Membrane = 112;
  species PA in Membrane = 1.5594;
  species AA in Membrane = 0;
  species PLA2 in cytosol = 3000;
  species PA_PABP in Membrane = 161635; PA_PABP is "PA.PABP";
  species PABP in Membrane = 2518341;
  species smGa in Membrane = 5.83e-12;
  species smG in Membrane = 20000;
  species L_GPCR in Membrane = 0; L_GPCR is "L.GPCR";
  species RGi in Membrane = 5.61e-9;
  species PLA2a in Membrane = 0.00139832;
  species DAG in Membrane = 78.5141;
  species IP3 in cytosol = 16.4456;
  species DGK in cytosol = 6600;
  species IPx in cytosol = 51.8038;
  species IP3E in cytosol = 3500;
  species LPP in cytosol = 100;
  species OCRL1a in Membrane = 7.73e-8;
  species PI4P in Membrane = 461053;
  species SAC1 in Membrane = 10500;
  species PIP5Ka in Membrane = 1.09e-7;
  species PIP5K in cytosol = 1200;
  species P4BP in Membrane = 143.998;
  species PI4P_P4BP in Membrane = 1172500; PI4P_P4BP is "PI4P.P4BP";
  species R in Membrane = 5000;
  species Ra in Membrane = 3.51e-94;
  species Gq in Membrane = 14800;
  species RGq in Membrane = 6.6e-73;
  species G13 in Membrane = 6100;
  species RG13 in Membrane = 1.06e-27;
  species AC in Membrane = 2500;
  species DAG_BP in Membrane = 3.64703e4; DAG_BP is "DAG.BP";
  species DAGBP in Membrane = 2.53367e4;

  // Assignment rules:
  PAgl := PA_PABP*Membrane + PA*Membrane;
  PIgl := 5000000 + PI*Membrane;
  PI4Pgl := PI4P_P4BP*Membrane + PI4P*Membrane;
  PIP2gl := PIP2_PLB*Membrane + PIP2*Membrane;
  DAGgl := DAG*Membrane + DAG_BP*Membrane;

  // Reactions:
  Reaction_05: PIP2 + OCRL1 => PI4P + OCRL1; Reaction_05_k1*PIP2*OCRL1;
    Reaction_05_k1 = 0.0001;
  Reaction_01: Ins + PA + CDIPT => PI + CDIPT; Reaction_01_k1*Ins*PA*CDIPT;
    Reaction_01_k1 = 0.0007081;
  activation_PLC: PLC + RGq => PLCa; Membrane*activation_PLC_k1*PLC*RGq;
    activation_PLC_k1 = 1;
  reset_PLC: PLCa => PLC + RGi; reset_PLC_k1*PLCa;
    reset_PLC_k1 = 0.003;
  Reaction_02: PIP2 + PLCa => IP3 + DAG + PLCa; Reaction_02_k1*PIP2*PLCa; Reaction_02 is "Reaction 02'";
    Reaction_02_k1 = 0.5;
  Reaction_03: PI + PI4Ka => PI4P + PI4Ka; Membrane*Reaction_03_k1*PI*PI4Ka; Reaction_03 is "Reaction 03'";
    Reaction_03_k1 = 2;
  activation_PI4K: PI4K + PA + smGa => PI4Ka; activation_PI4K_k1*PI4K*PA*smGa;
    activation_PI4K_k1 = 1;
  Reaction_11: PA + PLA2a => AA + PLA2a; Membrane*Reaction_11_k1*PA*PLA2a;
    Reaction_11_k1 = 0.05;
  binding_PA: PA + PABP -> PA_PABP; Membrane*(binding_PA_k1*PA*PABP - binding_PA_k2*PA_PABP);
    binding_PA_k1 = 7.251e-5; binding_PA_k2 = 0.0017661;
  activation_smG: smG + PLCa -> smGa + PLCa; Membrane*(activation_smG_k1*smG*PLCa - activation_smG_k2*smGa*PLCa);
    activation_smG_k1 = 1e-5; activation_smG_k2 = 1e-6;
  Reaction_03_0: PI + PI4K => PI4P + PI4K; Reaction_03_0_k1*PI*PI4K;
    Reaction_03_0_k1 = 0.01;
  Reaction_02_0: PIP2 + PLC => IP3 + DAG + PLC; Reaction_02_0_k1*PIP2*PLC;
    Reaction_02_0_k1 = 0.00025;
  reset_PI4K: PI4Ka => PI4K + smG + PA; reset_PI4K_k1*PI4Ka;
    reset_PI4K_k1 = 0.003;
  Reaction_07: IP3 + IP3E => IPx + IP3E; Membrane*Reaction_07_k1*IP3*IP3E;
    Reaction_07_k1 = 9;
  Reaction_09: DAG + DGK => PA + DGK; Reaction_09_k1*DAG*DGK;
    Reaction_09_k1 = 1;
  Reaction_08: IPx => Ins; cytosol*Reaction_08_k1*IPx;
    Reaction_08_k1 = 10000;
  binding_PIP2: PIP2 + PLB -> PIP2_PLB; Membrane*(binding_PIP2_k1*PIP2*PLB - binding_PIP2_k2*PIP2_PLB);
    binding_PIP2_k1 = 0.01325; binding_PIP2_k2 = 0.75;
  Reaction_10: PA + LPP => DAG + LPP; Reaction_10_k1*PA*LPP;
    Reaction_10_k1 = 1;
  Reaction_05_0: PIP2 + OCRL1a => PI4P + OCRL1a; Membrane*Reaction_05_0_k1*PIP2*OCRL1a; Reaction_05_0 is "Reaction 05'";
    Reaction_05_0_k1 = 3;
  Reaction_06: PI4P + SAC1 => PI + SAC1; Membrane*Reaction_06_k1*PI4P*SAC1;
    Reaction_06_k1 = 0.025;
  Reaction_04: PI4P + PIP5K => PIP2 + PIP5K; Reaction_04_k1*PI4P*PIP5K;
    Reaction_04_k1 = 0.001;
  Reaction_04_0: PI4P + PIP5Ka => PIP2 + PIP5Ka; Membrane*Reaction_04_0_k1*PI4P*PIP5Ka; Reaction_04_0 is "Reaction 04'";
    Reaction_04_0_k1 = 3;
  activation_PIP5K: PIP5K + PA + smGa => PIP5Ka; activation_PIP5K_k1*PIP5K*PA*smGa;
    activation_PIP5K_k1 = 1;
  reset_PIP5K: PIP5Ka => PIP5K + smG + PA; reset_PIP5K_k1*PIP5Ka;
    reset_PIP5K_k1 = 0.003;
  activation_OCRL1: OCRL1 + PA + smGa => OCRL1a; activation_OCRL1_k1*OCRL1*PA*smGa;
    activation_OCRL1_k1 = 1;
  binding_PI4P: PI4P + P4BP -> PI4P_P4BP; Membrane*(binding_PI4P_k1*PI4P*P4BP - binding_PI4P_k2*PI4P_P4BP);
    binding_PI4P_k1 = 0.01325; binding_PI4P_k2 = 0.75;
  activation_R: L_GPCR + R => Ra; Membrane*activation_R_k1*L_GPCR*R;
    activation_R_k1 = 1;
  activation_Gq: Ra + Gq => RGq; Membrane*activation_Gq_k1*Ra*Gq;
    activation_Gq_k1 = 1;
  activation_G13: Ra + G13 => RG13; Membrane*activation_G13_k1*Ra*G13;
    activation_G13_k1 = 1;
  inactivation_Gq: RGq => RGi; Membrane*inactivation_Gq_k1*RGq;
    inactivation_Gq_k1 = 0.02;
  inactivation_G13: RG13 => RGi; Membrane*inactivation_G13_k1*RG13;
    inactivation_G13_k1 = 0.02;
  activation_PLA2: PLA2 + PLCa => PLA2a + PLCa; activation_PLA2_k1*PLA2*PLCa;
    activation_PLA2_k1 = 0.1;
  inactivation_PLA2: PLA2a => PLA2; inactivation_PLA2_k1*PLA2a;
    inactivation_PLA2_k1 = 0.01;
  reset_OCRL1: OCRL1a => OCRL1 + smG + PA; reset_OCRL1_k1*OCRL1a;
    reset_OCRL1_k1 = 0.003;
  binding_DAG: DAG + DAGBP -> DAG_BP; Membrane*(binding_DAG_k1*DAG*DAGBP - binding_DAG_k2*DAG_BP);
    binding_DAG_k1 = 0.01375; binding_DAG_k2 = 0.75;

  // Events:
  event: at (time > 100): L_GPCR = 50000;

  // Unit definitions:
  unit volume = 1e-15 litre;
  unit substance = item;
end
