// SBML level 2 version 4
// dcterms:bibliographicCitation: urn:miriam:pubmed:33006965

function Constant_flux__irreversible(v)
  v;
end
Constant_flux__irreversible is "Constant flux (irreversible)";

function Rate_Law_for_F7(k_D_cat_C3H2OB, D, C3H2OB_fluid, K_D_m_C3H2OB, C3bB_fluid, C3bB_host)
  k_D_cat_C3H2OB*D*C3H2OB_fluid/(K_D_m_C3H2OB + C3bB_fluid + C3H2OB_fluid + C3bB_host);
end

function Rate_Law_for_F21(k_C3_cat_C3bBb, C3, C3bBb_fluid, K_C3_m_C3bBb)
  k_C3_cat_C3bBb*C3*C3bBb_fluid/(K_C3_m_C3bBb + C3);
end

function Rate_Law_for_E69(k_D_cat_C3bB, D, C3bB_host, K_D_m_C3H2OB, C3bB_fluid, C3H2OB_fluid, C3bBP_host)
  k_D_cat_C3bB*D*C3bB_host/(K_D_m_C3H2OB + C3bB_fluid + C3H2OB_fluid + C3bB_host + C3bBP_host);
end

function Rate_Law_for_E73(k_FI_cat_C3bH, I, C3bCR1_host, K_FI_m_C3bH, C3bH_fluid, C3bCR1_fluid, iC3bCR1_fluid, C3bH_host, iC3bCR1_host)
  k_FI_cat_C3bH*I*C3bCR1_host/(K_FI_m_C3bH + C3bH_fluid + C3bCR1_fluid + iC3bCR1_fluid + C3bH_host + C3bCR1_host + iC3bCR1_host);
end

function Rate_Law_for_E55(k_C5_cat_C3bBbC3b, C3bBbC3bP_host, C5, K_C5_m_C3bBbC3b)
  k_C5_cat_C3bBbC3b*C3bBbC3bP_host*C5/(K_C5_m_C3bBbC3b + C5);
end

function Rate_Law_for_F17(k_D_cat_C3bB, D, C3bB_fluid, K_D_m_C3bB, C3H2OB_fluid, C3bB_host)
  k_D_cat_C3bB*D*C3bB_fluid/(K_D_m_C3bB + C3bB_fluid + C3H2OB_fluid + C3bB_host);
end

function Rate_Law_for_E60(k_p_C5b7_surface, hC5b_fluid, Surface_host)
  k_p_C5b7_surface*hC5b_fluid*Surface_host*1.4;
end

function Rate_Law_for_F9(k_p_fC3b, nfC3b)
  k_p_fC3b*nfC3b;
end

function Rate_Law_for_F24(k_FI_cat_C3bH, I, C3bCR1_fluid, K_FI_m_C3bH, C3bH_fluid, iC3bCR1_fluid, C3bH_host, C3bCR1_host, iC3bCR1_host)
  k_FI_cat_C3bH*I*C3bCR1_fluid/(K_FI_m_C3bH + C3bH_fluid + C3bCR1_fluid + iC3bCR1_fluid + C3bH_host + C3bCR1_host + iC3bCR1_host);
end

function Rate_Law_for_E43(k_C3_cat_C3bBbP, C3, C3bBbP_host, K_C3_m_C3bBbP)
  k_C3_cat_C3bBbP*C3*C3bBbP_host/(K_C3_m_C3bBbP + C3);
end

function Rate_Law_for_E57(k_C3_cat_C3bBb, C3, C3bBb_host, K_C3_m_C3bBb)
  k_C3_cat_C3bBb*C3*C3bBb_host/(K_C3_m_C3bBb + C3);
end

function Rate_Law_for_E82(k_C5_cat_C3bBbC3b, C3bBbC3b_host, C5, K_C5_m_C3bBbC3b)
  k_C5_cat_C3bBbC3b*C3bBbC3b_host*C5/(K_C5_m_C3bBbC3b + C5);
end

function Rate_Law_for_E45(k_D_cat_C3bB, D, C3bBP_host, K_D_m_C3H2OB, C3bB_fluid, C3H2OB_fluid, C3bB_host)
  k_D_cat_C3bB*D*C3bBP_host/(K_D_m_C3H2OB + C3bB_fluid + C3H2OB_fluid + C3bB_host + C3bBP_host);
end

function Rate_Law_for_E58(k_p_hC3b, nhC3b, Surface_host)
  k_p_hC3b*nhC3b*Surface_host*15.6;
end

function Rate_Law_for_F10(k_p_fC3b, nhC3b)
  k_p_fC3b*nhC3b;
end

function Rate_Law_for_F22(k_FI_cat_C3bH, I, C3bH_fluid, K_FI_m_C3bH, C3bCR1_fluid, iC3bCR1_fluid, C3bH_host, C3bCR1_host, iC3bCR1_host)
  k_FI_cat_C3bH*I*C3bH_fluid/(K_FI_m_C3bH + C3bH_fluid + C3bCR1_fluid + iC3bCR1_fluid + C3bH_host + C3bCR1_host + iC3bCR1_host);
end

function Rate_Law_for_E76(k_FI_cat_C3bH, I, iC3bCR1_host, K_FI_m_C3bH, C3bH_fluid, C3bCR1_fluid, iC3bCR1_fluid, C3bH_host, C3bCR1_host)
  k_FI_cat_C3bH*I*iC3bCR1_host/(K_FI_m_C3bH + C3bH_fluid + C3bCR1_fluid + iC3bCR1_fluid + C3bH_host + C3bCR1_host + iC3bCR1_host);
end

function Rate_Law_for_F20(k_C3_cat_C3bBb, C3, C3bBb_fluid, K_C3_m_C3bBb)
  k_C3_cat_C3bBb*C3*C3bBb_fluid/(K_C3_m_C3bBb + C3);
end

function Rate_Law_for_F25(k_FI_cat_C3bH, I, iC3bCR1_fluid, K_FI_m_C3bH, C3bH_fluid, C3bCR1_fluid, C3bH_host, C3bCR1_host, iC3bCR1_host)
  k_FI_cat_C3bH*I*iC3bCR1_fluid/(K_FI_m_C3bH + C3bH_fluid + C3bCR1_fluid + iC3bCR1_fluid + C3bH_host + C3bCR1_host + iC3bCR1_host);
end

function Rate_Law_for_E75(k_FI_cat_C3bH, I, C3bH_host, K_FI_m_C3bH, C3bH_fluid, C3bCR1_fluid, iC3bCR1_fluid, C3bCR1_host, iC3bCR1_host)
  k_FI_cat_C3bH*I*C3bH_host/(K_FI_m_C3bH + C3bH_fluid + C3bCR1_fluid + iC3bCR1_fluid + C3bH_host + C3bCR1_host + iC3bCR1_host);
end

model Caruso2020___Activation_of_the_alternative_complement_pathway_and_effects_on_hemolysis()
  // Caruso2020 - Activation of the alternative complement pathway and effects on hemolysis
  // This model is based on the publication:
  // Caruso A, Vollmer J, Machacek M, Kortvely E. "Modeling the activation of the alternative complement pathway and its effects on hemolysis in health and disease." PLoS Comput Biol. 2020 Oct 2;16(10):e1008139.
  // doi: 10.1371/journal.pcbi.1008139
  // Curation Comment:
  // Figure 4 has not been able to be reproduced, however authors are in the process of appending the model code to the publication.
  // occursIn BTO:0000089
  // isPropertyOf PW:0000505
  // isPropertyOf GO:0045087
  // hasTaxon taxonomy:9606
  // isDescribedBy pubmed:33006965
  // hasProperty GO:0030451 mamo:MAMO_0000046

  // Compartments:
  compartment fluid_phase = 1;
  compartment erythrocyte_membrane = 1;

  // Species:
  species C3 in fluid_phase = 5.4e-6;
  species C3_H2O__fluid in fluid_phase = 0; C3_H2O__fluid is "C3(H2O)_fluid";
  species B in fluid_phase = 2.2e-6;
  species C3_H2O_B_fluid in fluid_phase = 0; C3_H2O_B_fluid is "C3(H2O)B_fluid";
  species C3_H2O_H_fluid in fluid_phase = 0; C3_H2O_H_fluid is "C3(H2O)H_fluid";
  species H in fluid_phase = 3.2e-6;
  species C3_H2O_CR1_fluid in fluid_phase = 0; C3_H2O_CR1_fluid is "C3(H2O)CR1_fluid";
  species CR1 in fluid_phase = 8.3e-9;
  species Bb in fluid_phase = 0;
  species C3_H2O_Bb_fluid in fluid_phase = 0; C3_H2O_Bb_fluid is "C3(H2O)Bb_fluid";
  species C3_H2O_BbH_fluid in fluid_phase = 0; C3_H2O_BbH_fluid is "C3(H2O)BbH_fluid";
  species Ba in fluid_phase = 0;
  species D in fluid_phase = 8.3e-8;
  species C3b_fluid in fluid_phase = 0;
  species H2O in fluid_phase = 0;
  species nfC3b in fluid_phase = 0;
  species nhC3b in fluid_phase = 0;
  species C3bB_fluid in fluid_phase = 0;
  species C3bH_fluid in fluid_phase = 0;
  species C3bCR1_fluid in fluid_phase = 0;
  species C3bBb_fluid in fluid_phase = 0;
  species C3bBbH_fluid in fluid_phase = 0;
  species C3bBbCR1_fluid in fluid_phase = 0;
  species C3a in fluid_phase = 0;
  species I in fluid_phase = 4e-7;
  species iC3b_fluid in fluid_phase = 0;
  species iC3bCR1_fluid in fluid_phase = 0;
  species C3dg_fluid in fluid_phase = 0;
  species C5b7_micelle in fluid_phase = 0;
  species hC5b7_fluid in fluid_phase = 0;
  species C5b8_fluid in fluid_phase = 0;
  species C8 in fluid_phase = 3.6e-7;
  species Cn in fluid_phase = 4.2e-7;
  species CnC5b7_fluid in fluid_phase = 0;
  species Vn in fluid_phase = 6;
  species VnC5b7_fluid in fluid_phase = 0;
  species C9 in fluid_phase = 0.9;
  species VnC5b8_fluid in fluid_phase = 0;
  species VnC5b9_1_fluid in fluid_phase = 0;
  species CnC5b8_fluid in fluid_phase = 0;
  species CnC5b9_1_fluid in fluid_phase = 0;
  species C5b9_1_fluid in fluid_phase = 0;
  species C3bBbC3b_host in erythrocyte_membrane = 0;
  species C3bBb_host in erythrocyte_membrane = 0;
  species C3bBbC3bCR1_host in erythrocyte_membrane = 0;
  species C3b_host in erythrocyte_membrane = 0;
  species C3bBbC3bDAF_host in erythrocyte_membrane = 0;
  species DAF in fluid_phase = 0;
  species C3bBbC3bH_host in erythrocyte_membrane = 0;
  species Surface_host in erythrocyte_membrane = 1.21e-5;
  species C3bBbP_host in erythrocyte_membrane = 0;
  species P in fluid_phase = 4.7e-7;
  species C3bBbC3bP_host in erythrocyte_membrane = 0;
  species C3bBP_host in erythrocyte_membrane = 0;
  species iC3bP_host in erythrocyte_membrane = 0;
  species iC3b_host in erythrocyte_membrane = 0;
  species C3bBbC3bC5_host in erythrocyte_membrane = 0;
  species C3bBbC3bPC5_host in erythrocyte_membrane = 0;
  species C3bBbC3bC5b_host in erythrocyte_membrane = 0;
  species C3bBbC3bC5bC6_host in erythrocyte_membrane = 0;
  species C3bBbC3bPC5bC6_host in erythrocyte_membrane = 0;
  species C7 in fluid_phase = 5e-7;
  species C3bBbC3bPC5b_host in erythrocyte_membrane = 0;
  species C5b in fluid_phase = 0;
  species C5 in fluid_phase = 3.7e-7;
  species C5a in fluid_phase = 0;
  species C6 in fluid_phase = 5e-7;
  species C5b7_host in erythrocyte_membrane = 0;
  species C3bCR1_host in erythrocyte_membrane = 0;
  species C3bH_host in erythrocyte_membrane = 0;
  species C3bB_host in erythrocyte_membrane = 0;
  species C3bBbH_host in erythrocyte_membrane = 0;
  species C3bBbCR1_host in erythrocyte_membrane = 0;
  species C3bBbDAF_host in erythrocyte_membrane = 0;
  species iC3bCR1_host in erythrocyte_membrane = 0;
  species C3dg_host in erythrocyte_membrane = 0;
  species C5b8_host in erythrocyte_membrane = 0;
  species C5b9_1_host in erythrocyte_membrane = 0;
  species C5b9_2_host in erythrocyte_membrane = 0;
  species C5b9_3_host in erythrocyte_membrane = 0;
  species C5b9_4_host in erythrocyte_membrane = 0;
  species C5b9_5_host in erythrocyte_membrane = 0;
  species C5b9_6_host in erythrocyte_membrane = 0;
  species C5b9_7_host in erythrocyte_membrane = 0;
  species C5b9_8_host in erythrocyte_membrane = 0;
  species C5b9_9_host in erythrocyte_membrane = 0;
  species C5b9_10_host in erythrocyte_membrane = 0;
  species C5b9_1__host in erythrocyte_membrane = 0;
  species C5b9_11_host in erythrocyte_membrane = 0;
  species C5b9_12_host in erythrocyte_membrane = 0;
  species C5b9_13_host in erythrocyte_membrane = 0;
  species C5b9_14_host in erythrocyte_membrane = 0;
  species C5b9_15_host in erythrocyte_membrane = 0;
  species C5b9_16_host in erythrocyte_membrane = 0;
  species C5b9_17_host in erythrocyte_membrane = 0;
  species MAC_host in erythrocyte_membrane = 0;
  species CD59 in fluid_phase = 2.1e-7;
  species CD59C5b9_1_host in erythrocyte_membrane = 0;
  species VnC5b7 in fluid_phase = 0;
  species eculizumab in fluid_phase = 0;
  species eculizumab_C5 in fluid_phase = 0;

  // Parameters:
  k_p_C3_H20 = 8.3e-7; k_p_C3_H20 is "k_p_C3(H20)";
  k_p_C3_H20_B = 213000; k_p_C3_H20_B is "k_p_C3(H20)B";
  k_m_C3_H20_B = 0.155; k_m_C3_H20_B is "k_m_C3(H20)B";
  k_p_C3bH = 1100000;
  k_m_C3bH = 0.059;
  k_p_C3bH_surf = 1100000;
  k_p_C3bCR1 = 4400000;
  k_m_C3bCR1 = 0.057;
  k_m_C3_H2O_Bb = 0.009; k_m_C3_H2O_Bb is "k_m_C3(H2O)Bb";
  k_m_C3bBbH_decay = 0.077;
  k_p_fC3b = 12000;
  k_p_C3bB = 222590;
  k_m_C3bB = 0.155;
  k_m_C3bBb = 0.0077;
  k_m_C3bBbCR1_decay = 0.077;
  k_p_C3bBbC3b = 3500000;
  k_m_C3bBbC3b = 0.0038;
  k_m_C3bBbDAF_decay = 0.0022756;
  k_p_C3b_surface = 2.16e9;
  k_p_hC3b = 26700;
  k_p_C5b7_surface = 420000000;
  k_p_C3bBbDAF = 2.5295e10;
  k_p_iC3bCR1 = 2000;
  k_m_iC3bCR1 = 0.01;
  k_m_C5b = 0.038;
  k_p_C5b7 = 730000;
  k_m_C5b7 = 8e-7;
  k_p_C5b8 = 1100000;
  k_m_C5b8 = 9.8e-7;
  k_p_C5b9 = 2800000;
  k_m_C5b9 = 1e-6;
  k_p_CD59C5b9 = 6.03e11;
  k_m_CD59C5b9 = 0.0002;
  k_p_C3bBbC3bC5bC6 = 77436;
  k_m_C3bBbC3bC5bC6 = 9e-8;
  k_p_C5b7_micelle = 69.3;
  k_p_CnC5b7 = 410000;
  k_m_CnC5b7 = 0.004;
  k_p_VnC5b7 = 240000;
  k_m_VnC5b7 = 0.002;
  k_p_VnC5b8 = 1100000;
  k_m_VnC5b8 = 9.8e-7;
  k_p_VnC5b9 = 2800000;
  k_m_VnC5b9 = 1e-6;
  k_p_CnC5b8 = 1100000;
  k_m_CnC5b8 = 730000;
  k_p_CnC5b9 = 2800000;
  k_m_CnC5b9 = 1e-6;
  k_D_cat_C3_H2O_B = 2.1; k_D_cat_C3_H2O_B is "k_D_cat_C3(H2O)B";
  K_D_m_C3_H2O_B = 1e-7; K_D_m_C3_H2O_B is "K_D_m_C3(H2O)B";
  k_D_cat_C3bB = 2.1;
  K_D_m_C3bB = 1e-7;
  k_C3_cat_C3_H2O_Bb = 1.8; k_C3_cat_C3_H2O_Bb is "k_C3_cat_C3(H2O)Bb";
  K_C3_m_C3_H2O_Bb = 4.19e-6; K_C3_m_C3_H2O_Bb is "K_C3_m_C3(H2O)Bb";
  k_C3_cat_C3bBb = 1.8;
  K_C3_m_C3bBb = 5.9e-6;
  k_FI_cat_C3bH = 1.3;
  K_FI_m_C3bH = 2.5e-7;
  k_C5_cat_C3bBbC3b = 0.003;
  K_C5_m_C3bBbC3b = 1.6e-8;
  k_p_C3bP = 123700000;
  k_m_C3bP = 0.0005;
  k_p_C3bBP = 213000;
  k_m_C3bBbP = 0.00077;
  k_p_iC3bP = 3000000;
  k_m_iC3bP = 0.00038;
  k_C3_cat_C3bBbP = 3.1;
  K_C3_m_C3bBbP = 1.8e-6;
  k_m_C3bBbDAF = 0.0012;
  k_m_C3bBbC3bP = 0.00057;
  k_pr_surface = 1.61e-12;
  k_el_C3 = 4.61e-6;
  k_el_C5 = 4.48e-6;
  k_el_C6 = 9.52e-6;
  k_el_C7 = 1.15e-5;
  k_el_C8 = 5.88e-6;
  k_el_C9 = 1.67e-5;
  k_el_D = 6.54e-5;
  k_el_B = 1.13e-5;
  k_el_I = 1.22e-5;
  k_el_P = 2.53e-5;
  k_el_H = 5.69e-6;
  k_el_Vn = 1.54e-5;
  k_el_Cn = 1.54e-5;
  k_el_iC3b = 4.89e-6;
  k_el_Ba = 4.65e-5;
  k_el_Bb = 2.12e-5;
  k_el_C3a = 0.000127545;
  k_el_C5a = 0.000119766;
  k_el_C3dg = 3.81e-5;
  k_pr_C3 = 4.4e-11;
  k_pr_C5 = 1.66e-12;
  k_pr_C6 = 4.77e-12;
  k_pr_C7 = 5.73e-12;
  k_pr_C8 = 2.11e-12;
  k_pr_C9 = 1.49e-11;
  k_pr_D = 5.33e-12;
  k_pr_B = 9e-11;
  k_pr_P = 1.19e-11;
  k_pr_I = 4.91e-12;
  k_pr_H = 1.83e-11;
  k_pr_Vn = 9.24e-11;
  k_pr_Cn = 6.62e-12;
  k_pr_CR1 = 1.11e-15;
  k_pr_DAF = 3.61e-15;
  k_pr_CD59 = 2.81e-14;
  kon_ecu = 0.000231;
  koff_ecu = 2.78e-5;
  k_el_ecu = 5.94e-7;
  k_S = 1.34e-7;
  var H_0;
  gamma = 1.6;
  MAC50 = 1.15;
  tau = 1330600;
  V = 3;
  C_e = 5e12;

  // Assignment rules:
  MAC := MAC_host/(V*C_e);
  H_0 := 100/(1 + (MAC50/MAC)^gamma);
  k_H := -ln(1 - H_0/100)/tau;
  k_el_S := k_S + k_H;

  // Reactions:
  F1: C3 => C3_H2O__fluid; fluid_phase*k_p_C3_H20*C3;
  F2: C3_H2O__fluid + B -> C3_H2O_B_fluid; fluid_phase*(k_p_C3_H20_B*C3_H2O__fluid*B - k_m_C3_H20_B*C3_H2O_B_fluid);
  F3: C3_H2O__fluid + H -> C3_H2O_H_fluid; fluid_phase*(k_p_C3bH*C3_H2O__fluid*H - k_m_C3bH*C3_H2O_H_fluid);
  F4: C3_H2O__fluid + CR1 -> C3_H2O_CR1_fluid; fluid_phase*(k_p_C3bCR1*C3_H2O__fluid*CR1 - k_m_C3bCR1*C3_H2O_CR1_fluid);
  F5: C3_H2O_Bb_fluid => C3_H2O__fluid + Bb; fluid_phase*k_m_C3_H2O_Bb*C3_H2O_Bb_fluid;
  F6: C3_H2O_BbH_fluid => H + Bb + C3_H2O__fluid; fluid_phase*k_m_C3bBbH_decay*C3_H2O_BbH_fluid;
  F7: C3_H2O_B_fluid + D => C3_H2O_Bb_fluid + Ba + D; Rate_Law_for_F7(k_D_cat_C3_H2O_B, D, C3_H2O_B_fluid, K_D_m_C3_H2O_B, C3bB_fluid, C3bB_host);  // modifiers: C3bB_fluid, C3bB_host
  F8: C3_H2O_Bb_fluid + H => C3_H2O_BbH_fluid; fluid_phase*k_p_C3bH*C3_H2O_Bb_fluid*H;
  F9: nfC3b + H2O => C3b_fluid; fluid_phase*Rate_Law_for_F9(k_p_fC3b, nfC3b);
  F10: nhC3b + H2O => C3b_fluid; fluid_phase*Rate_Law_for_F10(k_p_fC3b, nhC3b);
  F11: C3b_fluid + B -> C3bB_fluid; fluid_phase*(k_p_C3bB*C3b_fluid*B - k_m_C3bB*C3bB_fluid);
  F12: C3b_fluid + H -> C3bH_fluid; fluid_phase*(k_p_C3bH*C3b_fluid*H - k_m_C3bH*C3bH_fluid);
  F13: C3b_fluid + CR1 -> C3bCR1_fluid; fluid_phase*(k_p_C3bCR1*C3b_fluid*CR1 - k_m_C3bCR1*C3bCR1_fluid);
  F14: C3bBb_fluid => Bb + C3b_fluid; fluid_phase*k_m_C3bBb*C3bBb_fluid;
  F15: C3bBbH_fluid => H + Bb + C3b_fluid; fluid_phase*k_m_C3bBbH_decay*C3bBbH_fluid;
  F16: C3bBbCR1_fluid => CR1 + Bb + C3b_fluid; fluid_phase*k_m_C3bBbCR1_decay*C3bBbCR1_fluid;
  F17: C3bB_fluid + D => C3bBb_fluid + Ba + D; Rate_Law_for_F17(k_D_cat_C3bB, D, C3bB_fluid, K_D_m_C3bB, C3_H2O_B_fluid, C3bB_host);  // modifiers: C3_H2O_B_fluid, C3bB_host
  F18: C3bBb_fluid + H => C3bBbH_fluid; fluid_phase*k_p_C3bH*C3bBb_fluid*H;
  F19: CR1 + C3bBb_fluid => C3bBbCR1_fluid; fluid_phase*k_p_C3bCR1*CR1*C3bBb_fluid;
  F20: C3 => C3a + nfC3b; fluid_phase*Rate_Law_for_F20(k_C3_cat_C3bBb, C3, C3bBb_fluid, K_C3_m_C3bBb);  // modifiers: C3bBb_fluid
  F21: C3 + C3bBb_fluid => C3a + nfC3b + C3bBb_fluid; fluid_phase*Rate_Law_for_F21(k_C3_cat_C3bBb, C3, C3bBb_fluid, K_C3_m_C3bBb);
  F22: C3bH_fluid + I => H + iC3b_fluid + I; Rate_Law_for_F22(k_FI_cat_C3bH, I, C3bH_fluid, K_FI_m_C3bH, C3bCR1_fluid, iC3bCR1_fluid, C3bH_host, C3bCR1_host, iC3bCR1_host);  // modifiers: C3bCR1_fluid, iC3bCR1_fluid, C3bH_host, C3bCR1_host, iC3bCR1_host
  F23: iC3b_fluid + CR1 -> iC3bCR1_fluid; fluid_phase*(k_p_iC3bCR1*iC3b_fluid*CR1 - k_m_iC3bCR1*iC3bCR1_fluid);
  F24: C3bCR1_fluid + I => CR1 + iC3b_fluid + I; Rate_Law_for_F24(k_FI_cat_C3bH, I, C3bCR1_fluid, K_FI_m_C3bH, C3bH_fluid, iC3bCR1_fluid, C3bH_host, C3bCR1_host, iC3bCR1_host);  // modifiers: C3bH_fluid, iC3bCR1_fluid, C3bH_host, C3bCR1_host, iC3bCR1_host
  F25: iC3bCR1_fluid + I => CR1 + C3dg_fluid + I; Rate_Law_for_F25(k_FI_cat_C3bH, I, iC3bCR1_fluid, K_FI_m_C3bH, C3bH_fluid, C3bCR1_fluid, C3bH_host, C3bCR1_host, iC3bCR1_host);  // modifiers: C3bH_fluid, C3bCR1_fluid, C3bH_host, C3bCR1_host, iC3bCR1_host
  F26: hC5b7_fluid => C5b7_micelle; fluid_phase*k_p_C5b7_micelle*hC5b7_fluid;
  F27: hC5b7_fluid + C8 -> C5b8_fluid; fluid_phase*(k_p_C5b8*hC5b7_fluid*C8 - k_m_C5b8*C5b8_fluid);
  F28: hC5b7_fluid + Cn -> CnC5b7_fluid; fluid_phase*(k_p_CnC5b7*hC5b7_fluid*Cn - k_m_CnC5b7*CnC5b7_fluid);
  F29: hC5b7_fluid + Vn -> VnC5b7_fluid; fluid_phase*(k_p_VnC5b7*hC5b7_fluid*Vn - k_m_VnC5b7*VnC5b7_fluid);
  F30: hC5b7_fluid + Vn -> VnC5b7_fluid; fluid_phase*(k_p_VnC5b8*hC5b7_fluid*Vn - k_m_VnC5b8*VnC5b7_fluid);
  F31: VnC5b8_fluid + C9 -> VnC5b9_1_fluid; fluid_phase*(k_p_CnC5b9*VnC5b8_fluid*C9 - k_m_VnC5b9*VnC5b9_1_fluid);
  F32: CnC5b7_fluid + C8 -> CnC5b8_fluid; fluid_phase*(k_p_CnC5b8*CnC5b7_fluid*C8 - k_m_CnC5b8*CnC5b8_fluid);
  F33: CnC5b8_fluid + C9 -> CnC5b9_1_fluid; fluid_phase*(k_p_CnC5b9*CnC5b8_fluid*C9 - k_m_CnC5b9*CnC5b9_1_fluid);
  F34: C5b8_fluid + C9 -> C5b9_1_fluid; fluid_phase*(k_p_CnC5b9*C5b8_fluid*C9 - k_m_CnC5b9*C5b9_1_fluid);
  F35: C3bBbH_fluid => C3bBb_fluid + H; fluid_phase*k_m_C3bH*C3bBbH_fluid;
  F36: C3bBbCR1_fluid => CR1 + C3bBb_fluid; fluid_phase*k_m_C3bCR1*C3bBbCR1_fluid;
  E1: C3b_fluid + C3bBb_host -> C3bBbC3b_host; k_p_C3bBbC3b*C3b_fluid*C3bBb_host - k_m_C3bBbC3b*C3bBbC3b_host;
  E2: C3bBbC3bCR1_host => CR1 + C3b_fluid + C3b_host + Bb; k_m_C3bBbCR1_decay*C3bBbC3bCR1_host;
  E3: C3bBbC3bDAF_host => DAF + C3b_fluid + C3b_host + Bb; k_m_C3bBbDAF_decay*C3bBbC3bDAF_host;
  E4: C3bBbC3bH_host => H + C3b_fluid + C3b_host + Bb; k_m_C3bBbH_decay*C3bBbC3bH_host;
  E5: nfC3b + Surface_host => C3b_host; k_p_C3b_surface*nfC3b*Surface_host;
  E6: C3bBbP_host => P + C3b_host + Bb; k_m_C3bBbP*C3bBbP_host;
  E7: C3 + C3bBbP_host => C3a + nhC3b + C3bBbP_host; Rate_Law_for_E43(k_C3_cat_C3bBbP, C3, C3bBbP_host, K_C3_m_C3bBbP);
  E8: C3bBbP_host + nhC3b => C3bBbC3bP_host; k_p_C3bBbC3b*C3bBbP_host*nhC3b;
  E9: C3bBP_host + D => C3bBbP_host + Ba + D; Rate_Law_for_E45(k_D_cat_C3bB, D, C3bBP_host, K_D_m_C3_H2O_B, C3bB_fluid, C3_H2O_B_fluid, C3bB_host);  // modifiers: C3bB_fluid, C3_H2O_B_fluid, C3bB_host
  E10: C3bBb_host + P => C3bBbP_host; k_p_C3bP*C3bBb_host*P;
  E11: C3bBbP_host + C3b_fluid => C3bBbC3bP_host; k_p_C3bBbC3b*C3bBbP_host*C3b_fluid;
  E12: iC3b_host + P -> iC3bP_host; k_p_iC3bP*iC3b_host*P - k_m_iC3bP*iC3bP_host;
  E13: C3bBbC3b_host + P -> C3bBbC3bP_host; k_p_C3bP*C3bBbC3b_host*P - k_m_C3bP*C3bBbC3bP_host;
  E14: C3bBbC3bPC5_host => C3bBbC3bC5_host + P; k_m_C3bP*C3bBbC3bPC5_host;
  E15: C3bBbC3bPC5b_host => C3bBbC3bC5b_host + P; k_m_C3bP*C3bBbC3bPC5b_host;
  E16: C3bBbC3bPC5bC6_host => C3bBbC3bC5bC6_host + P; k_m_C3bP*C3bBbC3bPC5bC6_host;
  E17: C3bBbC3bPC5bC6_host + C7 => C3bBbC3bP_host + hC5b7_fluid; k_p_C5b7*C3bBbC3bPC5bC6_host*C7;
  E18: C3bBbC3bPC5b_host => C3bBbC3bP_host + C5b; k_m_C5b*C3bBbC3bPC5b_host;
  E19: C3bBbC3bP_host + C5 => C5a + C3bBbC3bPC5b_host; Rate_Law_for_E55(k_C5_cat_C3bBbC3b, C3bBbC3bP_host, C5, K_C5_m_C3bBbC3b);
  E20: C3bBbC3bPC5b_host + C6 -> C3bBbC3bPC5bC6_host; k_p_C3bBbC3bC5bC6*C3bBbC3bPC5b_host*C6 - k_m_C3bBbC3bC5bC6*C3bBbC3bPC5bC6_host;
  E21: C3 + C3bBb_host => C3a + nhC3b + C3bBb_host; Rate_Law_for_E57(k_C3_cat_C3bBb, C3, C3bBb_host, K_C3_m_C3bBb);
  E22: nhC3b + Surface_host => C3b_host; Rate_Law_for_E58(k_p_hC3b, nhC3b, Surface_host);
  E23: nhC3b + C3bBb_host => C3bBbC3b_host; k_p_C3bBbC3b*nhC3b*C3bBb_host;
  E24: hC5b7_fluid + 4 Surface_host => C5b7_host; Rate_Law_for_E60(k_p_C5b7_surface, hC5b7_fluid, Surface_host);
  E25: C3b_host + CR1 -> C3bCR1_host; k_p_C3bCR1*C3b_host*CR1 - k_m_C3bCR1*C3bCR1_host;
  E26: C3b_host + H -> C3bH_host; k_p_C3bH_surf*C3b_host*H - k_m_C3bH*C3bH_host;
  E27: C3b_host + B -> C3bB_host; k_p_C3bB*C3b_host*B - k_m_C3bB*C3bB_host;
  E28: C3bBbH_host => H + Bb + C3b_host; k_m_C3bBbH_decay*C3bBbH_host;
  E29: C3bBb_host => Bb + C3b_host; k_m_C3bBb*C3bBb_host;
  E30: C3bBbCR1_host => CR1 + Bb + C3b_host; k_m_C3bBbCR1_decay*C3bBbCR1_host;
  E31: C3bBbDAF_host => DAF + Bb + C3b_host; k_m_C3bBbDAF_decay*C3bBbDAF_host;
  E32: C3bBbC3b_host => Bb + C3b_host + C3b_fluid; k_m_C3bBbC3b*C3bBbC3b_host;
  E33: C3bB_host + D => C3bBb_host + Ba + D; Rate_Law_for_E69(k_D_cat_C3bB, D, C3bB_host, K_D_m_C3_H2O_B, C3bB_fluid, C3_H2O_B_fluid, C3bBP_host);  // modifiers: C3bB_fluid, C3_H2O_B_fluid, C3bBP_host
  E34: C3bBb_host + H => C3bBbH_host; k_p_C3bH_surf*C3bBb_host*H;
  E35: C3bBb_host + CR1 => C3bBbCR1_host; k_p_C3bCR1*C3bBb_host*CR1;
  E36: C3bBb_host + DAF => C3bBbDAF_host; k_p_C3bBbDAF*C3bBb_host*DAF;
  E37: C3bCR1_host + I => CR1 + iC3b_host + I; Rate_Law_for_E73(k_FI_cat_C3bH, I, C3bCR1_host, K_FI_m_C3bH, C3bH_fluid, C3bCR1_fluid, iC3bCR1_fluid, C3bH_host, iC3bCR1_host);  // modifiers: C3bH_fluid, C3bCR1_fluid, iC3bCR1_fluid, C3bH_host, iC3bCR1_host
  E38: iC3b_host + CR1 -> iC3bCR1_host; k_p_iC3bCR1*iC3b_host*CR1 - k_m_iC3bCR1*iC3bCR1_host;
  E39: C3bH_host + I => H + iC3b_host + I; Rate_Law_for_E75(k_FI_cat_C3bH, I, C3bH_host, K_FI_m_C3bH, C3bH_fluid, C3bCR1_fluid, iC3bCR1_fluid, C3bCR1_host, iC3bCR1_host);  // modifiers: C3bH_fluid, C3bCR1_fluid, iC3bCR1_fluid, C3bCR1_host, iC3bCR1_host
  E40: iC3bCR1_host + I => CR1 + C3dg_host + I; Rate_Law_for_E76(k_FI_cat_C3bH, I, iC3bCR1_host, K_FI_m_C3bH, C3bH_fluid, C3bCR1_fluid, iC3bCR1_fluid, C3bH_host, C3bCR1_host);  // modifiers: C3bH_fluid, C3bCR1_fluid, iC3bCR1_fluid, C3bH_host, C3bCR1_host
  E41: C3bBbC3b_host + CR1 => C3bBbC3bCR1_host; k_p_C3bCR1*C3bBbC3b_host*CR1;
  E42: C3bBbC3b_host + DAF => C3bBbC3bDAF_host; k_p_C3bBbDAF*C3bBbC3b_host*DAF;
  E43: C3bBbC3b_host + H => C3bBbC3bH_host; k_p_C3bH_surf*C3bBbC3b_host*H;
  E44: C3bBbC3bC5b_host => C5b + C3bBbC3b_host; k_m_C5b*C3bBbC3bC5b_host;
  E45: C3bBbC3bC5bC6_host + C7 => C3bBbC3b_host + hC5b7_fluid; k_p_C5b7*C3bBbC3bC5bC6_host*C7;
  E46: C3bBbC3b_host + C5 => C5a + C3bBbC3bC5b_host; Rate_Law_for_E82(k_C5_cat_C3bBbC3b, C3bBbC3b_host, C5, K_C5_m_C3bBbC3b);
  E47: C3bBbC3bC5b_host + C6 -> C3bBbC3bC5bC6_host; k_p_C3bBbC3bC5bC6*C3bBbC3bC5b_host*C6 - k_m_C3bBbC3bC5bC6*C3bBbC3bC5bC6_host;
  E48: C5b7_host + C8 => C5b8_host; k_p_C5b8*C5b7_host*C8;
  E49: C5b8_host + C9 => C5b9_1_host; k_p_C5b9*C5b8_host*C9;
  E50: C5b9_1_host + C9 => C5b9_2_host; k_p_C5b9*C5b9_1_host*C9;
  E51: C5b9_2_host + C9 => C5b9_3_host; k_p_C5b9*C5b9_2_host*C9;
  E52: C5b9_3_host + C9 => C5b9_4_host; k_p_C5b9*C5b9_3_host*C9;
  E53: C5b9_4_host + C9 => C5b9_5_host; k_p_C5b9*C5b9_4_host*C9;
  E54: C5b9_5_host + C9 => C5b9_6_host; k_p_C5b9*C5b9_5_host*C9;
  E55: C5b9_6_host + C9 => C5b9_7_host; k_p_C5b9*C5b9_6_host*C9;
  E56: C5b9_7_host + C9 => C5b9_8_host; k_p_C5b9*C5b9_7_host*C9;
  E57: C5b9_8_host + C9 => C5b9_9_host; k_p_C5b9*C5b9_8_host*C9;
  E58: C5b9_9_host + C9 => C5b9_10_host; k_p_C5b9*C5b9_9_host*C9;
  E59: C5b9_10_host + C9 => C5b9_1__host; k_p_C5b9*C5b9_10_host*C9;
  E60: C5b9_11_host + C9 => C5b9_12_host; k_p_C5b9*C5b9_11_host*C9;
  E61: C5b9_12_host + C9 => C5b9_13_host; k_p_C5b9*C5b9_12_host*C9;
  E62: C5b9_13_host + C9 => C5b9_14_host; k_p_C5b9*C5b9_13_host*C9;
  E63: C5b9_14_host + C9 => C5b9_15_host; k_p_C5b9*C5b9_14_host*C9;
  E64: C5b9_15_host + C9 => C5b9_16_host; k_p_C5b9*C5b9_15_host*C9;
  E65: C5b9_16_host + C9 => C5b9_17_host; k_p_C5b9*C5b9_16_host*C9;
  E66: C5b9_17_host + C9 => MAC_host; k_p_C5b9*C5b9_17_host*C9;
  E67: C5b9_1_host + CD59 -> CD59C5b9_1_host; k_p_CD59C5b9*C5b9_1_host*CD59 - k_m_CD59C5b9*CD59C5b9_1_host;
  E68: C3bBbH_host => C3bBb_host + H; k_p_C3bH*C3bBbH_host;
  E69: C3bBbC3bH_host => C3bBbC3b_host + H; k_m_C3bH*C3bBbC3bH_host;
  E70: C3bBbCR1_host => C3bBb_host + CR1; k_m_C3bCR1*C3bBbCR1_host;
  E71: C3bBbC3bCR1_host => C3bBbC3b_host + CR1; k_m_C3bCR1*C3bBbC3bCR1_host;
  E72: C3bBbDAF_host => C3bBb_host + DAF; k_m_C3bBbDAF*C3bBbDAF_host;
  E73: C3bBbC3bDAF_host => C3bBbC3b_host + DAF; k_m_C3bBbDAF*C3bBbC3bDAF_host;
  E74: C3bBbP_host => C3bBb_host + P; k_m_C3bP*C3bBbP_host;
  E75: C3bBbC3bP_host => Bb + C3b_host + C3b_fluid + P; k_m_C3bBbC3bP*C3bBbC3bP_host;
  C1: => Surface_host; erythrocyte_membrane*Constant_flux__irreversible(k_pr_surface);
  C2: Surface_host => ; erythrocyte_membrane*k_el_S*Surface_host;
  C3_0: => C3; fluid_phase*Constant_flux__irreversible(k_pr_C3);
  C4: => C5; fluid_phase*Constant_flux__irreversible(k_pr_C5);
  C5_0: => C6; fluid_phase*Constant_flux__irreversible(k_pr_C6);
  C6_0: => C7; fluid_phase*Constant_flux__irreversible(k_pr_C7);
  C7_0: => C8; fluid_phase*Constant_flux__irreversible(k_pr_C8);
  C8_0: => C9; fluid_phase*Constant_flux__irreversible(k_pr_C9);
  C9_0: => B; fluid_phase*Constant_flux__irreversible(k_pr_B);
  C10: => D; fluid_phase*Constant_flux__irreversible(k_pr_D);
  C11: => P; fluid_phase*Constant_flux__irreversible(k_pr_P);
  C12: => I; fluid_phase*Constant_flux__irreversible(k_pr_I);
  C13: => H; fluid_phase*Constant_flux__irreversible(k_pr_H);
  C14: => Vn; fluid_phase*Constant_flux__irreversible(k_pr_Vn);
  C15: => Cn; fluid_phase*Constant_flux__irreversible(k_pr_Cn);
  C16: => CR1; fluid_phase*Constant_flux__irreversible(k_pr_CR1);
  C17: => DAF; fluid_phase*Constant_flux__irreversible(k_pr_DAF);
  C18: => CD59; fluid_phase*Constant_flux__irreversible(k_pr_CD59);
  C19: C3 => ; fluid_phase*k_el_C3*C3;
  C20: C5 => ; fluid_phase*k_el_C5*C5;
  C21: C6 => ; fluid_phase*k_el_C6*C6;
  C22: C7 => ; fluid_phase*k_el_C7*C7;
  C23: C8 => ; fluid_phase*k_el_C8*C8;
  C24: C9 => ; fluid_phase*k_el_C9*C9;
  C25: B => ; fluid_phase*k_el_B*B;
  C26: D => ; fluid_phase*k_el_D*D;
  C27: P => ; fluid_phase*k_el_P*P;
  C28: I => ; fluid_phase*k_el_I*I;
  C29: H => ; fluid_phase*k_el_H*H;
  C30: Vn => ; fluid_phase*k_el_Vn*Vn;
  C31: Cn => ; fluid_phase*k_el_Cn*Cn;
  C32: CR1 => ; fluid_phase*k_el_S*CR1;
  C33: CD59 => ; fluid_phase*k_el_S*CD59;
  C34: DAF => ; fluid_phase*k_el_S*DAF;
  C35: C3_H2O__fluid => ; fluid_phase*k_el_C3*C3_H2O__fluid;
  C36: C3_H2O_B_fluid => ; fluid_phase*k_el_C3*C3_H2O_B_fluid;
  C37: C3_H2O_H_fluid => ; fluid_phase*k_el_C3*C3_H2O_H_fluid;
  C38: C3_H2O_CR1_fluid => ; fluid_phase*k_el_S*C3_H2O_CR1_fluid;
  C39: C3_H2O_Bb_fluid => ; fluid_phase*k_el_C3*C3_H2O_Bb_fluid;
  C40: C3_H2O_BbH_fluid => ; fluid_phase*k_el_C3*C3_H2O_BbH_fluid;
  C41: C3b_fluid => ; fluid_phase*k_el_C3*C3b_fluid;
  C42: C3bB_fluid => ; fluid_phase*k_el_C3*C3bB_fluid;
  C43: C3bH_fluid => ; fluid_phase*k_el_C3*C3bH_fluid;
  C44: C3bCR1_fluid => ; fluid_phase*k_el_S*C3bCR1_fluid;
  C45: C3bBb_fluid => ; fluid_phase*k_el_C3*C3bBb_fluid;
  C46: C3bBbH_fluid => ; fluid_phase*k_el_C3*C3bBbH_fluid;
  C47: C3bBbCR1_fluid => ; fluid_phase*k_el_S*C3bBbCR1_fluid;
  C48: nfC3b => ; fluid_phase*k_el_C3*nfC3b;
  C49: nhC3b => ; fluid_phase*k_el_C3*nhC3b;
  C50: Ba => ; fluid_phase*k_el_Ba*Ba;
  C51: Bb => ; fluid_phase*k_el_Bb*Bb;
  C52: C3a => ; fluid_phase*k_el_C3a*C3a;
  C53: C5a => ; fluid_phase*k_el_C5a*C5a;
  C54: hC5b7_fluid => ; fluid_phase*k_el_C5*hC5b7_fluid;
  C55: iC3b_fluid => ; fluid_phase*k_el_iC3b*iC3b_fluid;
  C56: iC3bCR1_fluid => ; fluid_phase*k_el_S*iC3bCR1_fluid;
  C57: C3dg_fluid => ; fluid_phase*k_el_C3dg*C3dg_fluid;
  C58: C5b7_micelle => ; fluid_phase*k_el_C5*C5b7_micelle;
  C59: C5b8_fluid => ; fluid_phase*k_el_C5*C5b8_fluid;
  C60: CnC5b7_fluid => ; fluid_phase*k_el_C5*CnC5b7_fluid;
  C61: VnC5b7_fluid => ; fluid_phase*k_el_C5*VnC5b7_fluid;
  C62: VnC5b8_fluid => ; fluid_phase*k_el_C5*VnC5b8_fluid;
  C63: VnC5b9_1_fluid => ; fluid_phase*k_el_C5*VnC5b9_1_fluid;
  C64: CnC5b8_fluid => ; fluid_phase*k_el_C5*CnC5b8_fluid;
  C65: CnC5b9_1_fluid => ; fluid_phase*k_el_C5*CnC5b9_1_fluid;
  C66: C5b9_1_fluid => ; fluid_phase*k_el_C5*C5b9_1_fluid;
  C67: C3bBb_host => Surface_host; erythrocyte_membrane*k_el_S*C3bBb_host;
  C68: C3bBbC3b_host => Surface_host; erythrocyte_membrane*k_el_S*C3bBbC3b_host;
  C69: C3bBbC3bCR1_host => Surface_host; erythrocyte_membrane*k_el_S*C3bBbC3bCR1_host;
  C70: C3b_host => Surface_host; erythrocyte_membrane*k_el_S*C3b_host;
  C71: C3bBbC3bDAF_host => Surface_host; erythrocyte_membrane*k_el_S*C3bBbC3bDAF_host;
  C72: C3bBbC3bH_host => Surface_host; erythrocyte_membrane*k_el_S*C3bBbC3bH_host;
  C73: C3bBbP_host => Surface_host; erythrocyte_membrane*k_el_S*C3bBbP_host;
  C74: C3bBbC3bP_host => Surface_host; erythrocyte_membrane*k_el_S*C3bBbC3bP_host;
  C75: C3bBP_host => Surface_host; erythrocyte_membrane*k_el_S*C3bBP_host;
  C76: iC3b_host => Surface_host; erythrocyte_membrane*k_el_S*iC3b_host;
  C77: iC3bP_host => Surface_host; erythrocyte_membrane*k_el_S*iC3bP_host;
  C78: C3bBbC3bPC5_host => Surface_host; erythrocyte_membrane*k_el_S*C3bBbC3bPC5_host;
  C79: C3bBbC3bC5_host => Surface_host; erythrocyte_membrane*k_el_S*C3bBbC3bC5_host;
  C80: C3bBbC3bPC5b_host => Surface_host; erythrocyte_membrane*k_el_S*C3bBbC3bPC5b_host;
  C81: C3bBbC3bC5b_host => Surface_host; erythrocyte_membrane*k_el_S*C3bBbC3bC5b_host;
  C82: C3bBbC3bPC5bC6_host => Surface_host; erythrocyte_membrane*k_el_S*C3bBbC3bPC5bC6_host;
  C83: C3bBbC3bC5bC6_host => Surface_host; erythrocyte_membrane*k_el_S*C3bBbC3bC5bC6_host;
  C84: C5b7_host => Surface_host; erythrocyte_membrane*k_el_S*C5b7_host;
  C85: C3bCR1_host => Surface_host; erythrocyte_membrane*k_el_S*C3bCR1_host;
  C86: C3bH_host => Surface_host; erythrocyte_membrane*k_el_S*C3bH_host;
  C87: C3bB_host => Surface_host; erythrocyte_membrane*k_el_S*C3bB_host;
  C88: C3bBbH_host => Surface_host; erythrocyte_membrane*k_el_S*C3bBbH_host;
  C89: C3bBbCR1_host => Surface_host; erythrocyte_membrane*k_el_S*C3bBbCR1_host;
  C90: C3bBbDAF_host => Surface_host; erythrocyte_membrane*k_el_S*C3bBbDAF_host;
  C91: iC3bCR1_host => Surface_host; erythrocyte_membrane*k_el_S*iC3bCR1_host;
  C92: C3dg_host => Surface_host; erythrocyte_membrane*k_el_S*C3dg_host;
  C93: C5b8_host => Surface_host; erythrocyte_membrane*k_el_S*C5b8_host;
  C94: C5b9_1_host => Surface_host; erythrocyte_membrane*k_el_S*C5b9_1_host;
  C95: C5b9_2_host => Surface_host; erythrocyte_membrane*k_el_S*C5b9_2_host;
  C96: C5b9_3_host => Surface_host; erythrocyte_membrane*k_el_S*C5b9_3_host;
  C97: C5b9_4_host => Surface_host; erythrocyte_membrane*k_el_S*C5b9_4_host;
  C98: C5b9_5_host => Surface_host; erythrocyte_membrane*k_el_S*C5b9_5_host;
  C99: C5b9_6_host => Surface_host; erythrocyte_membrane*k_el_S*C5b9_6_host;
  C100: C5b9_7_host => Surface_host; erythrocyte_membrane*k_el_S*C5b9_7_host;
  C101: C5b9_8_host => Surface_host; erythrocyte_membrane*k_el_S*C5b9_8_host;
  C102: C5b9_9_host => Surface_host; erythrocyte_membrane*k_el_S*C5b9_9_host;
  C103: C5b9_10_host => Surface_host; erythrocyte_membrane*k_el_S*C5b9_10_host;
  C104: C5b9_11_host => Surface_host; erythrocyte_membrane*k_el_S*C5b9_11_host;
  C105: C5b9_12_host => Surface_host; erythrocyte_membrane*k_el_S*C5b9_12_host;
  C106: C5b9_13_host => Surface_host; erythrocyte_membrane*k_el_S*C5b9_13_host;
  C107: C5b9_14_host => Surface_host; erythrocyte_membrane*k_el_S*C5b9_14_host;
  C108: C5b9_15_host => Surface_host; erythrocyte_membrane*k_el_S*C5b9_15_host;
  C109: C5b9_16_host => Surface_host; erythrocyte_membrane*k_el_S*C5b9_16_host;
  C110: C5b9_17_host => Surface_host; erythrocyte_membrane*k_el_S*C5b9_17_host;
  C111: C5b9_17_host => Surface_host; erythrocyte_membrane*k_el_S*C5b9_17_host;
  C112: C5b9_17_host => Surface_host; erythrocyte_membrane*k_el_S*C5b9_17_host;
  Ez1: C5 + eculizumab -> eculizumab_C5; fluid_phase*(kon_ecu*C5*eculizumab - koff_ecu*eculizumab_C5);
  Ez2: eculizumab => ; fluid_phase*k_el_ecu*eculizumab;
  Ez3: eculizumab_C5 => ; fluid_phase*k_el_ecu*eculizumab_C5;

  // Unit definitions:
  unit length = metre;
  unit area = metre^2;
  unit volume = litre;
  unit time = second;
  unit substance = mole;
end
