// SBML level 2 version 4
// dcterms:bibliographicCitation: urn:miriam:pubmed:21918546

function Rate_Law_for_noninfected_tumor_cell_growth(r, y, K, x, epsilon)
  r*y*(1 - (y + x)^epsilon/K^epsilon);
end

function Rate_Law_for_immune_cell_proliferation(eta, x, z, z_0, xi)
  eta*x*(z + z_0)*(1 - z/xi);
end

function Rate_Law_for_virus_release(alpha, x)
  alpha*x;
end

function Rate_Law_for_infected_tumor_cells_immune_control_death(delta, x, lambda, z, z_0)
  delta*x + lambda*(z + z_0)*x;
end
Rate_Law_for_infected_tumor_cells_immune_control_death is "Rate Law for infected_tumor_cells_immune_control/death";

function Rate_Law_for_noninfected_tumor_cell_immune_control(lambda, z, z_0, y)
  lambda*(z + z_0)*y;
end

model Rommelfanger2011___Generalized_logistic_model_of_melanoma_tumor_therapy_with_vesicular_stomatitis_virus()
  // Rommelfanger2011 - Generalized logistic model of melanoma tumor therapy with vesicular stomatitis virus
  // This mathematical model is described by the publication:
  // Rommelfanger DM, Offord CP, Dev J, Bajzer Z, Vile RG, Dingli D. "Dynamics of melanoma tumor therapy with vesicular stomatitis virus: explaining the variability in outcomes using mathematical modeling". Gene Ther. 2012 May;19(5):543-9.
  // doi: 10.1038/gt.2011.132.
  // Curation Comment:
  // Plots could not be reproduced as initial conditions for the simulations could not be found in the publication, nor estimated.
  // isPropertyOf ncit:C62713
  // isPropertyOf ncit:C15438
  // hasTaxon taxonomy:9606
  // hasTaxon taxonomy:11276
  // isDescribedBy pubmed:21918546
  // hasProperty ncit:C94604 DOID:1909 mamo:MAMO_0000046

  // Compartments:
  compartment compartment = 1;

  // Species:
  species x in compartment = 0;
  species y in compartment = 3400000;
  species z in compartment = 0;
  species v in compartment = v_i*c;
  species v_i in compartment = 500000000;
  species $total_tumor in compartment;

  // Parameters:
  r = 0.541;
  beta = 24.5;
  lambda = 1.49;
  delta = 0.69;
  alpha = 0.77;
  omega = 0.1;
  gamma = 2.95;
  xi = 0.2;
  c = 0.02;
  eta = 40.7;
  z_0 = 10000;
  K = 4.41;
  epsilon = 3;

  // Assignment rules:
  total_tumor := (x + y)/1000000000;

  // Reactions:
  noninfected_tumor_cell_growth: => y; compartment*Rate_Law_for_noninfected_tumor_cell_growth(r, y, K, x, epsilon);  // modifiers: x
  tumor_cell_infection: y + v => x; compartment*beta*y*v;
  noninfected_tumor_cell_immune_control: y => ; compartment*Rate_Law_for_noninfected_tumor_cell_immune_control(lambda, z, z_0, y);  // modifiers: z
  infected_tumor_cells_immune_control_death: x => ; compartment*Rate_Law_for_infected_tumor_cells_immune_control_death(delta, x, lambda, z, z_0); infected_tumor_cells_immune_control_death is "infected_tumor_cells_immune_control/death";  // modifiers: z
  virus_release: => v; compartment*Rate_Law_for_virus_release(alpha, x);  // modifiers: x
  free_virus_inactivation: v => ; compartment*omega*v;
  immune_cell_proliferation: => z; compartment*Rate_Law_for_immune_cell_proliferation(eta, x, z, z_0, xi);  // modifiers: x
  immune_cell_death: z => ; compartment*gamma*z;

  // Unit definitions:
  unit length = metre;
  unit area = metre^2;
  unit volume = (1e-3 metre)^3;
  unit time = 86400 second;
  unit substance = 1e-3 mole;
end
