// SBML level 2 version 4
// dcterms:bibliographicCitation: urn:miriam:doi:10.1101/085910

function Rate_Law_for_Tumor_growth(r_t, T)
  r_t*T;
end

function Rate_Law_for_Innate_killer_proliferation_stimulation(rho_n, gamma_n, N, T)
  rho_n + gamma_n*N*T;
end
Rate_Law_for_Innate_killer_proliferation_stimulation is "Rate Law for Innate_killer_proliferation/stimulation";

function Rate_Law_for_Innate_killer_decay(v_n, N, T, mu_n)
  v_n*N*T + mu_n*N;
end

function Rate_Law_for_CD8_proliferation_stimulation(rho_e, alpha_e, E, T, beta_e, gamma_e, N)
  rho_e + alpha_e*E*T/(beta_e + T) + gamma_e*E*N;
end
Rate_Law_for_CD8_proliferation_stimulation is "Rate Law for CD8_proliferation/stimulation";

function Rate_Law_for_CD4_proliferation_stimulation(rho_r, gamma_r, N, R)
  rho_r + gamma_r*N*R;
end
Rate_Law_for_CD4_proliferation_stimulation is "Rate Law for CD4_proliferation/stimulation";

function Rate_Law_for_CD8_decay(v_e, E, T, lambda_e, R, mu_e)
  v_e*E*T + lambda_e*E*R + mu_e*E;
end

function Rate_Law_for_Tumor_killing(v_t, E, T, lambda_t, N)
  v_t*E*T + lambda_t*N*T;
end

model Mullinax2016___Mathematical_model_of_tumor_immune_cell_interactions_to_optimize_the_meta_phenotype_of_TIL_subpopulations()
  // Mullinax2016 - Mathematical model of tumor-immune cell interactions to optimize the meta-phenotype of TIL subpopulations
  // This model is described in the publication:
  // John Mullinax, Cliona O’Farrelly, Jacob G. Scott, Andreas Buttenschön, Asmaa E. Elkenawi, Fadoua El Moustaid, Alexander G. Fletcher, Clemens Grassberger, Eunjung Kim, Andriy Marusyk, Harry L.O. McClelland, Daria Miroshnychenko, Daniel Nichol.
  // "Harnessing the lymphocyte meta-phenotype to optimize adoptive cell therapy".
  // bioRxiv 085910; doi: 10.1101/085910
  // Curation Comment:
  // Figure 4 could not be reproduced. Attempted changing parameter values for Fig. 4(D) simulation, but plots were still not exact match for all species.
  // isPropertyOf ncit:C15351
  // isPropertyOf ncit:C15438
  // isPropertyOf ncit:C15524
  // hasTaxon taxonomy:9606
  // isDescribedBy doi:10.1101/085910
  // hasProperty DOID:1115 GO:0002837 mamo:MAMO_0000046

  // Compartments:
  compartment compartment = 1;

  // Species:
  species T in compartment = 1;
  species E in compartment = 0.1;
  species N in compartment = 0.1;
  species R in compartment = 0.1;

  // Parameters:
  r_t = 0.2225763;
  v_t = 0.5;
  lambda_t = 0.3;
  rho_e = 0.2506809;
  alpha_e = 0.31;
  beta_e = 20;
  v_e = 0.19;
  gamma_e = 0.1;
  lambda_e = 1;
  mu_e = 0.01;
  rho_n = 0.05703324;
  gamma_n = 0.02;
  v_n = 0.5;
  mu_n = 0.1;
  rho_r = 0.08203515;
  gamma_r = 0.1;
  mu_r = 0.2;

  // Reactions:
  Tumor_growth: => T; compartment*Rate_Law_for_Tumor_growth(r_t, T);
  Tumor_killing: T => ; compartment*Rate_Law_for_Tumor_killing(v_t, E, T, lambda_t, N);  // modifiers: E, N
  CD8_proliferation_stimulation: => E; compartment*Rate_Law_for_CD8_proliferation_stimulation(rho_e, alpha_e, E, T, beta_e, gamma_e, N); CD8_proliferation_stimulation is "CD8_proliferation/stimulation";  // modifiers: T, N
  CD8_decay: E => ; compartment*Rate_Law_for_CD8_decay(v_e, E, T, lambda_e, R, mu_e);  // modifiers: T, R
  Innate_killer_proliferation_stimulation: => N; compartment*Rate_Law_for_Innate_killer_proliferation_stimulation(rho_n, gamma_n, N, T); Innate_killer_proliferation_stimulation is "Innate_killer_proliferation/stimulation";  // modifiers: T
  Innate_killer_decay: N => ; compartment*Rate_Law_for_Innate_killer_decay(v_n, N, T, mu_n);  // modifiers: T
  CD4_proliferation_stimulation: => R; compartment*Rate_Law_for_CD4_proliferation_stimulation(rho_r, gamma_r, N, R); CD4_proliferation_stimulation is "CD4_proliferation/stimulation";  // modifiers: N
  CD4_decay: R => ; compartment*mu_r*R;

  // Unit definitions:
  unit length = metre;
  unit area = metre^2;
  unit volume = litre;
  unit time = second;
  unit substance = mole;
end
