// SBML level 2 version 4

function Constant_flux_irreversible(v)
  v;
end
Constant_flux_irreversible is "Constant flux (irreversible)";

function Production(k, M)
  k*M;
end

function Bi_rapid_irreversible(vmax, A, B, kma, kmb)
  vmax*A*B/(kma*kmb + kmb*A + A*B);
end
Bi_rapid_irreversible is "Bi (rapid, irreversible)";

function Phosphorylation(v, A, km, B)
  v*A/(km + B);
end

function Complex_Phosphorylation(v, A, km, B)
  v*A/(km + B);
end

function Modification(k, M)
  k*(1 - M);
end

function Hill_Cooperativity_Modifier(v, M, n, km)
  v*M^n/(km^n + M^n);
end
Hill_Cooperativity_Modifier is "Hill Cooperativity (Modifier)";

model Model_1()
  // Luna2013_CircadianClock_SIRT1
  // An in silico model to examine damage-induced circadian phase shifts by investigating a possible mechanism linking circadian rhythms to metabolism. The proposed model involves two DNA damage response proteins, SIRT1 and PARP1, that are each consumers of nicotinamide adenine dinucleotide (NAD), a metabolite involved in oxidation-reduction reactions and in ATP synthesis.
  // hasProperty mamo:MAMO_0000046

  // Compartments:
  compartment system = 1;

  // Species:
  species M in system = 1.54597;
  species TF in system = 0.1017936;
  species CP in system = 0.07231579;
  species CP2 in system = 0.04759268;
  species NAD in system = 5.208061;
  species N in system = 1.68896;
  species NP in system = 1.472878;
  species $OP_CP in system = 0.7021134;
  species $IC in system;
  species $CPtot in system;
  species AC_CP in system = 0.8003291;
  species AC_NP in system = 0.7802986;
  species $OP_NP in system = 0.6757767;

  // Parameters:
  Dex = 0;
  kms = 0;
  J = 0;
  kmd = 0.13857;
  kcps = 0.40453;
  kcpd = 0.48936;
  ka = 49.9712;
  kp1 = 9.4531;
  kd = 0.36005;
  Jp = 77.9254;
  kchk2 = 0;
  kicd = 0;
  kcp2d = 0.0025;
  kica = 28.178;
  kchk2c = 0;
  kp2 = 0.36296;
  Tftot = 0.84792;
  K_TF_CP = 0.020133;
  K_CP2_CP = 0.20757;
  K_TF_NP = 0.040267;
  K_CP2_NP = 0.21591;
  var k_cp_ac;
  var k_np_ac;
  VM = 0.40053;
  VN = 0.56383;
  n_ac = 1.6107;
  Tconst_np = 0.26014;
  Tconst_cp = 0.22107;
  VSIRT1c = 0.094568;
  knadd = 1.3309;
  knd = 0.16337;
  knps = 0.20238;
  knpd = 0.16024;
  VNADc = 5.2479;
  kaCPSIRT1 = 0.10491;
  kPARP = 0;
  VSIRT1d = 0.070926;
  kbCPSIRT1 = 0.098395;
  k_np_deac = 0.098073;
  k_cp_deac = 0.099;
  n = 5.1858;

  // Assignment rules:
  IC := Tftot - TF;
  CPtot := CP + 2*CP2 + 2*IC;
  k_cp_ac := TF/(TF + K_TF_CP)*(K_CP2_CP/(K_CP2_CP + CP2));
  k_np_ac := TF/(TF + K_TF_NP)*(K_CP2_NP/(K_CP2_NP + CP2));

  // Rate rules:
  OP_CP' = (AC_CP^n_ac - OP_CP)/Tconst_cp;
  OP_NP' = (AC_NP^n_ac - OP_NP)/Tconst_np;

  // Reactions:
  CP_mRNA_synthesis_Dex_induction: => M; system*Constant_flux_irreversible(Dex); CP_mRNA_synthesis_Dex_induction is "CP mRNA synthesis (Dex induction)";
  CP_mRNA_synthesis_TF: => M; system*Hill_Cooperativity_Modifier(kms, TF, n, J); CP_mRNA_synthesis_TF is "CP mRNA synthesis (TF)";  // modifiers: TF
  CP_mRNA_degradation: M => ; system*kmd*M;
  CP_degradation_CHK2: CP => ; system*kchk2*CP; CP_degradation_CHK2 is "CP degradation (CHK2)";
  CP_degradation: CP => ; system*kcpd*CP;
  CP2_degradation_CHK2: CP2 => ; system*kchk2*CP2; CP2_degradation_CHK2 is "CP2 degradation (CHK2)";
  N_degradation: N => ; system*knd*N;
  reaction_8: AC_CP => ; system*k_cp_deac*AC_CP; reaction_8 is "CP acetylated histone deacetylation";
  reaction_9: AC_NP => ; system*k_np_deac*AC_NP; reaction_9 is "NP acetylated histone deacetylation";
  NAD_degradation_PARP1: NAD => ; system*kPARP*NAD; NAD_degradation_PARP1 is "NAD degradation (PARP1)";
  NAD_degradation: NAD => ; system*knadd*NAD;
  NP_degradation: NP => ; system*knpd*NP;
  reaction_13: AC_NP + NAD => ; system*Bi_rapid_irreversible(VSIRT1d, AC_NP, NAD, kaCPSIRT1, kbCPSIRT1); reaction_13 is "NP acetylated histone deacetylation (NAD)";
  reaction_14: AC_CP + NAD => ; system*Bi_rapid_irreversible(VSIRT1d, AC_CP, NAD, kaCPSIRT1, kbCPSIRT1); reaction_14 is "CP acetylated histone deacetylation (NAD)";
  CP_degradation_NAD: CP + NAD => ; system*Bi_rapid_irreversible(VSIRT1c, CP, NAD, kaCPSIRT1, kbCPSIRT1); CP_degradation_NAD is "CP degradation (NAD)";
  CP2_degradation_NAD: CP2 + NAD => ; system*Bi_rapid_irreversible(VSIRT1c, CP2, NAD, kaCPSIRT1, kbCPSIRT1); CP2_degradation_NAD is "CP2 degradation (NAD)";
  IC_degradation_NAD: $IC + NAD => TF; system*Bi_rapid_irreversible(VSIRT1c, IC, NAD, kaCPSIRT1, kbCPSIRT1); IC_degradation_NAD is "IC degradation (NAD)";
  CP_dimerization: 2 CP => CP2; system*ka*CP^2;
  CP2_degradation: CP2 => ; system*kcp2d*CP2;
  IC_association: CP2 + TF => $IC; system*kica*CP2*TF;
  IC_disassociation: $IC => CP2 + TF; system*kicd*IC;
  CP2_disassociation: CP2 => 2 CP; system*kd*CP2;
  IC_degradation_CHK2: $IC => TF; system*kchk2c*IC; IC_degradation_CHK2 is "IC degradation (CHK2)";
  IC_degradation: $IC => TF; system*kcp2d*IC;
  CP_mRNA_synthesis_OP_CP: => M; system*Production(VM, OP_CP); CP_mRNA_synthesis_OP_CP is "CP mRNA synthesis (OP_CP)";  // modifiers: OP_CP
  N_mRNA_synthesis_OP_NP: => N; system*Production(VN, OP_NP); N_mRNA_synthesis_OP_NP is "N mRNA synthesis (OP_NP)";  // modifiers: OP_NP
  NAD_synthesis: => NAD; system*Production(VNADc, NP);  // modifiers: NP
  CP_synthesis: => CP; system*Production(kcps, M);  // modifiers: M
  NP_synthesis: => NP; system*Production(knps, N);  // modifiers: N
  AC_NP_histone_acetylation: => AC_NP; system*Modification(k_np_ac, AC_NP);
  AC_CP_histone_acetylation: => AC_CP; system*Modification(k_cp_ac, AC_CP);
  CP_degradation_phosphorylation: CP => ; system*Phosphorylation(kp1, CP, Jp, CPtot); CP_degradation_phosphorylation is "CP degradation (phosphorylation)";  // modifiers: CPtot
  CP2_degradation_phosphorylation: CP2 => ; system*Phosphorylation(kp2, CP2, Jp, CPtot); CP2_degradation_phosphorylation is "CP2 degradation (phosphorylation)";  // modifiers: CPtot
  IC_degradation_phosphorylation: $IC => TF; system*Complex_Phosphorylation(kp2, IC, Jp, CPtot); IC_degradation_phosphorylation is "IC degradation (phosphorylation)";  // modifiers: CPtot

  // Unit definitions:
  unit volume = dimensionless;
  unit time = 3600 second;
  unit substance = dimensionless;
end
