// SBML level 2 version 4

function Constant_flux__irreversible(v)
  v;
end
Constant_flux__irreversible is "Constant flux (irreversible)";

function Henri_Michaelis_Menten__irreversible(substrate, Km, V)
  V*substrate/(Km + substrate);
end
Henri_Michaelis_Menten__irreversible is "Henri-Michaelis-Menten (irreversible)";

function Hill_Cooperativity(substrate, Shalve, V, h)
  V*(substrate/Shalve)^h/(1 + (substrate/Shalve)^h);
end

function Denaturation_0(V, Temp, substrate)
  V*(1 - 0.4*exp(37 - Temp))*1.4^(Temp - 37)*substrate;
end

model A_minimal_titration_model_of_the_mammalian_dynamical_heat_shock_response()
  // Sivery2016 - A mammalian heat shock response model
  // Environmental stress, such as oxidative or heat stress, induces the activation of the heat shock response (HSR) and leads to an increase in the heat shock proteins (HSPs) level. These HSPs act as molecular chaperones to maintain cellular proteostasis. Controlled by highly intricate regulatory mechanisms, having stress-induced activation and feedback regulations with multiple partners, the HSR is still incompletely understood. In this context, we propose a minimal molecular model for the gene regulatory network of the HSR that reproduces quantitatively different heat shock experiments both on heat shock factor 1 (HSF1) and HSPs activities. This model, which is based on chemical kinetics laws, is kept with a low dimensionality without altering the biological interpretation of the model dynamics. This simplistic model highlights the titration of HSF1 by chaperones as the guiding line of the network. Moreover, by a steady states analysis of the network, three different temperature stress regimes appear: normal, acute, and chronic, where normal stress corresponds to pseudo thermal adaption. The protein triage that governs the fate of damaged proteins or the different stress regimes are consequences of the titration mechanism. The simplicity of the present model is of interest in order to study detailed modelling of cross regulation between the HSR and other major genetic networks like the cell cycle or the circadian clock. Sivéry, A., Courtade, E., Thommen, Q. (2016). A minimal titration model of the mammalian dynamical heat shock response. Physical biology, 13(6), 066008.
  // hasProperty mamo:MAMO_0000046

  // Compartments:
  compartment compartment = 1;

  // Species:
  // Generic Protein
  species P in compartment = 4499.855;
  // Heat Shock Factor 1 Protein
  species HSF1 in compartment = 0.0003324765;
  // HSP72 (HSPA1A) mRNA
  species mHSP in compartment = 0.02919809;
  // HSP72 (HSPA1A) 70kDA Heat Shock Protien
  species HSP in compartment = 2.197696;
  // MFP chaperoning by HSP
  species MFP_HSP in compartment = 0.08005714; MFP_HSP is "MFP:HSP";
  // sequestration complex HSF1:HSP
  species HSF1_HSP in compartment = 0.001767028; HSF1_HSP is "HSF1:HSP";
  // Generic misfolded protein
  species MFP in compartment = 0.01323438;

  // Reactions:
  // Generic Protein synthesis
  Generic_Protein_synthesis: => P; compartment*Constant_flux__irreversible(Generic_Protein_synthesis_v);
    Generic_Protein_synthesis_v = 310.5;
  HSF1_basal_synthesis: => HSF1; compartment*Constant_flux__irreversible(HSF1_basal_synthesis_v);
    HSF1_basal_synthesis_v = 8.18e-5;
  HSP_HSF1_regulated_transcription: HSF1 => HSF1 + mHSP; compartment*Hill_Cooperativity(HSF1, Shalve, HSP_HSF1_regulated_transcription_V, h); HSP_HSF1_regulated_transcription is "HSP HSF1-regulated transcription";
    Shalve = 0.0087; HSP_HSF1_regulated_transcription_V = 214.4; h = 3;
  HSP_basal_transcription: => mHSP; compartment*Constant_flux__irreversible(HSP_basal_transcription_v);
    HSP_basal_transcription_v = 5.86e-6;
  HSP_synthesis__translation: mHSP => mHSP + HSP; compartment*HSP_synthesis__translation_k1*mHSP; HSP_synthesis__translation is "HSP synthesis (translation)";
    HSP_synthesis__translation_k1 = 3.72;
  Generic_protein_degradation: P => ; compartment*Generic_protein_degradation_k1*P;
    Generic_protein_degradation_k1 = 0.069;
  HSF1_degradation: HSF1 => ; compartment*HSF1_degradation_k1*HSF1;
    HSF1_degradation_k1 = 0.0361;
  mHSP_degradation: mHSP => ; compartment*mHSP_degradation_k1*mHSP;
    mHSP_degradation_k1 = 0.41;
  HSP_degradation: HSP => ; compartment*HSP_degradation_k1*HSP;
    HSP_degradation_k1 = 0.0471;
  MFP_HSP_complex_degradation: MFP_HSP => ; compartment*MFP_HSP_complex_degradation_k1*MFP_HSP; MFP_HSP_complex_degradation is "MFP:HSP complex degradation";
    MFP_HSP_complex_degradation_k1 = 0.0629;
  HSF1_HSP_complex_degradation: HSF1_HSP => ; compartment*HSF1_HSP_complex_degradation_k1*HSF1_HSP; HSF1_HSP_complex_degradation is "HSF1:HSP complex degradation";
    HSF1_HSP_complex_degradation_k1 = 0.0395;
  Chaperoning: MFP + HSP => MFP_HSP; compartment*Chaperoning_k1*MFP*HSP;
    Chaperoning_k1 = 274.6;
  HSF1_Sequestration_by_HSP: HSF1 + HSP -> HSF1_HSP; compartment*(HSF1_Sequestration_by_HSP_k1*HSF1*HSP - k2*HSF1_HSP);
    HSF1_Sequestration_by_HSP_k1 = 60.07; k2 = 24.8;
  Renaturation: MFP_HSP => P + HSP; compartment*Henri_Michaelis_Menten__irreversible(MFP_HSP, Km, Renaturation_V);
    Km = 0.941; Renaturation_V = 101.8;
  Denaturation: P => MFP; compartment*Denaturation_0(Denaturation_V, Temp, P);
    Denaturation_V = 0.00296; Temp = 38.9928;
  Misfolded_protein_degradation: MFP => ; compartment*Misfolded_protein_degradation_k1*MFP;
    Misfolded_protein_degradation_k1 = 0.375;

  // Unit definitions:
  unit length = metre;
  unit area = metre^2;
  unit volume = litre;
  unit time = 360000 second;
  unit substance = 1e-6 mole;
end
