// SBML level 2 version 4

function Function_for_Glucose_Uptake(PTS, OD)
  PTS*OD;
end

function Function_for_ETH_excr(OD, ETH_MW, COnversionFactor, ETHtrsp)
  OD*ETHtrsp*ETH_MW/COnversionFactor;
end

function Function_for_ACE_excr(OD, MW_ace, convfactor, ACEtrsp)
  OD*ACEtrsp*MW_ace/convfactor;
end

function Function_for_FOR_excr(OD, MW_pfl, convfact, FORtrsp)
  OD*(FORtrsp*MW_pfl/convfact);
end

function Function_for_LACexcr(OD, MW_LAC, conversfct, LACtrsp)
  OD*(LACtrsp*MW_LAC/conversfct);
end

function Function_for_SUC_excretion(OD, SUCtr, SUC_MW, COnversionFactor)
  OD*SUCtr*SUC_MW/COnversionFactor;
end

function Function_for_LACtrsp(LACin, V_max_LACtrsp, k_LACtrsp)
  V_max_LACtrsp*(LACin/(LACin + k_LACtrsp));
end

function Function_for_dilution(mu, S)
  mu*S;
end

function Function_for_PFK(Vmax_PFK, ATP, k_PFK_ATP, F6P, k_PFK_F6P, n_PFK_F6P, ADP, FBP, k_PFK_EQ, k_PFK_ADP, k_PFK_FBP, k_PFK_a_ADP, k_PFK_i_PEP, PEP, n_PFK_i_PEP)
  Vmax_PFK*(ATP/k_PFK_ATP*(F6P/k_PFK_F6P)^n_PFK_F6P*(1 - ADP*FBP/(ATP*F6P^n_PFK_F6P)/k_PFK_EQ)/((1 + ATP/k_PFK_ATP)*(1 + F6P/k_PFK_F6P)^n_PFK_F6P + (1 + ADP/k_PFK_ADP)*(1 + FBP/k_PFK_FBP) - 1))*(ADP/(ADP + k_PFK_a_ADP))*(k_PFK_i_PEP/(k_PFK_i_PEP + PEP))^n_PFK_i_PEP;
end

function Function_for_FRD(Vmax_FRD, FUM, k_FRD_FUM, NADH, k_FRD_NADH, ADP, k_FRD_ADP, ATP, NAD, SUCin, k_FRD_EQ, k_FRD_ATP, k_FRD_NAD, k_FRD_SUCin, OAA, k_FRD_i_OAA)
  Vmax_FRD*(FUM/k_FRD_FUM)*(NADH/k_FRD_NADH)*(ADP/k_FRD_ADP)^0.75*(1 - ATP^0.75*NAD*SUCin/(ADP^0.75*NADH*FUM)/k_FRD_EQ)/((1 + FUM/k_FRD_FUM)*(1 + NADH/k_FRD_NADH)*(1 + ADP/k_FRD_ADP)^0.75 + (1 + ATP/k_FRD_ATP)^0.75*(1 + NAD/k_FRD_NAD)*(1 + SUCin/k_FRD_SUCin) + OAA/k_FRD_i_OAA - 1);
end

function Function_for_Biomass(mu, Biomass)
  mu*Biomass;
end

function Function_for_PFL(EA, Vmax_PFL_F, PYR, CoA, k_PFL_PYR, k_PFL_CoA, FOR, AcCoA, k_PFL_EQ, k_PFL_i_AcCoA, k_PFL_AcCoA, k_PFL_FOR, k_PFL_i_PYR)
  EA*Vmax_PFL_F*(PYR*CoA/(k_PFL_PYR*k_PFL_CoA))*(1 - FOR*AcCoA/(PYR*CoA)/k_PFL_EQ)/(PYR*CoA/(k_PFL_PYR*k_PFL_CoA) + PYR/k_PFL_PYR + CoA/k_PFL_CoA*(1 + AcCoA/k_PFL_i_AcCoA) + 1/(k_PFL_AcCoA*k_PFL_FOR)*(k_PFL_AcCoA*FOR*(1 + PYR/k_PFL_i_PYR) + AcCoA*(k_PFL_FOR + FOR)));
end

function Function_for_PTACK(Vmax_PTACK, AcCoA, k_PTACK_AcCoA, n_PTACK_AcCoA, ADP, k_PTACK_ADP, ATP, ACEin, CoA, k_PTACK_eq, k_PTACK_ATP, k_PTACK_CoA, k_PTACK_i_ATP, PYR, k_PTACK_a_PYR, PEP, k_PTACK_a_PEP)
  Vmax_PTACK*((AcCoA/k_PTACK_AcCoA)^n_PTACK_AcCoA*(ADP/k_PTACK_ADP)*(1 - ATP*ACEin*CoA/(ADP*AcCoA^n_PTACK_AcCoA)/k_PTACK_eq)/((1 + AcCoA/k_PTACK_AcCoA)^n_PTACK_AcCoA*(1 + ADP/k_PTACK_ADP) + (1 + ATP/k_PTACK_ATP)*(1 + CoA/k_PTACK_CoA) - 1))*(k_PTACK_i_ATP/(k_PTACK_i_ATP + ATP))*(PYR/(PYR + k_PTACK_a_PYR))*(PEP/(PEP + k_PTACK_a_PEP));
end

function Function_for_FORtrsp(V_max_FORtrsp, FORin, k_FORtrsp)
  V_max_FORtrsp*(FORin/(FORin + k_FORtrsp));
end

function Function_for_ACEtrsp(V_max_ACEtrsp, k_ACEtrsp, ACEin)
  V_max_ACEtrsp*(ACEin/(ACEin + k_ACEtrsp));
end

function Function_for_ETHtrsp(V_max_ETHtrsp, ETHin, k_ETHtrsp)
  V_max_ETHtrsp*(ETHin/(ETHin + k_ETHtrsp));
end

function Function_for_SUCtransp_u(V_max_SUCtrsp, SUCin, k_SUCtrsp)
  V_max_SUCtrsp*(SUCin/(SUCin + k_SUCtrsp));
end

function Function_for_Growth(mu_max, GAP, kg_GAP, PEP, kg_PEP, PYR, kg_PYR, ATP, n, kg_ATP, AcCoA, kg_AcCoA, AKG, kg_AKG, OAA, kg_OAA, NADH, kg_NADH, F6P, kg_F6P, G6P, kg_G6P, D3PG, kg_D3PG, FORin, kg_FORin)
  mu_max*(GAP/(kg_GAP + GAP))*(PEP/(kg_PEP + PEP))*(PYR/(kg_PYR + PYR))*(ATP^n/(kg_ATP^n + ATP^n))*(AcCoA/(kg_AcCoA + AcCoA))*(AKG/(AKG + kg_AKG))*(OAA/(OAA + kg_OAA))*(NADH/(NADH + kg_NADH))*(F6P/(F6P + kg_F6P))*(G6P/(G6P + kg_G6P))*(D3PG/(D3PG + kg_D3PG))*(FORin/(kg_FORin + FORin));
end

function Function_for_PTS_modified_direct_binding(Vmax_PTS, PEP, k_PTS_PEP, GLC_ex, k_PTS_Glc, PYR, G6P, k_PTS_EQ, k_PTS_G6P, n_PTS_G6P, k_PTS_PYR)
  Vmax_PTS*(PEP/k_PTS_PEP)*(GLC_ex/k_PTS_Glc)*(1 - PYR*G6P/(PEP*GLC_ex)/k_PTS_EQ)/(1 + PEP/k_PTS_PEP*(GLC_ex/k_PTS_Glc) + (G6P/k_PTS_G6P)^n_PTS_G6P*(PYR/k_PTS_PYR));
end

function Function_for_Fumarate_conversion(FUMuptake, Biomass, MWfum)
  FUMuptake*Biomass*MWfum/1000000;
end

function Function_for_ADH_Ordered_BiBi_rapid_equilibrium(Vmax_ADH, NADH, k_ADH_NADH, ACTLD, ETHin, NAD, k_ADH_EQ, k_ADH_i_ACTLD, k_ADH_i_NAD, k_ADH_ETHin)
  Vmax_ADH*(ACTLD*NADH - ETHin*NAD/k_ADH_EQ)/(k_ADH_i_ACTLD*k_ADH_NADH + k_ADH_NADH*ACTLD + ACTLD*NADH + k_ADH_i_ACTLD*k_ADH_NADH*NAD/k_ADH_i_NAD + k_ADH_i_ACTLD*k_ADH_NADH*NAD*ETHin/(k_ADH_ETHin*k_ADH_i_NAD));
end

function Function_for_FBA(Vmax_FBA_F, FBP, k_FBA_FBP, GAP, k_FBA_eq, k_FBA_GAP, PEP, k_FBA_PEP, n_FBA_PEP)
  Vmax_FBA_F*(FBP/k_FBA_FBP)*(1 - GAP^2/FBP/k_FBA_eq)/(1 + FBP/k_FBA_FBP + (GAP/k_FBA_GAP)^2 + (PEP/k_FBA_PEP)^n_FBA_PEP);
end

function Function_for_ENO_n(Vmax_ENO, D3PG, k_ENO_D3PG, PEP, k_ENO_EQ, k_ENO_PEP)
  Vmax_ENO*(D3PG/k_ENO_D3PG)*(1 - PEP/D3PG/k_ENO_EQ)/(1 + D3PG/k_ENO_D3PG + PEP/k_ENO_PEP);
end

function Function_for_PGK_upd(Vmax_PGK_F, BPG, k_PGK_BPG, ADP, k_PGK_ADP, D3PG, ATP, k_PGK_EQ, k_PGK_D3PG, k_PGK_ATP)
  Vmax_PGK_F*(BPG/k_PGK_BPG)*(ADP/k_PGK_ADP)*(1 - D3PG*ATP/(BPG*ADP)/k_PGK_EQ)/(1 + ADP/k_PGK_ADP + BPG/k_PGK_BPG + ADP*BPG/(k_PGK_BPG*k_PGK_ADP) + D3PG/k_PGK_D3PG + ATP/k_PGK_ATP + D3PG*ATP/(k_PGK_D3PG*k_PGK_ATP));
end

function Function_for_PCK_upd(Vmax_PCK, OAA, ATP, k_PCK_OAA, k_PCK_ATP, PEP, CO2, ADP, k_PCK_EQ, k_PCK_CO2, k_PCK_PEP, k_PCK_ADP)
  Vmax_PCK*(OAA*ATP/(k_PCK_OAA*k_PCK_ATP))*(1 - PEP*CO2*ADP/(OAA*ATP)/k_PCK_EQ)/(1 + ATP/k_PCK_ATP + OAA/k_PCK_OAA + OAA*ATP/(k_PCK_OAA*k_PCK_ATP) + CO2/k_PCK_CO2 + PEP/k_PCK_PEP + ADP/k_PCK_ADP + PEP*CO2/(k_PCK_PEP*k_PCK_CO2) + CO2*ADP/(k_PCK_CO2*k_PCK_ADP) + ADP*PEP/(k_PCK_PEP*k_PCK_ADP) + PEP*CO2*ADP/(k_PCK_CO2*k_PCK_ADP*k_PCK_PEP));
end

function Function_for_LDH_2(Vmax_LDH, PYR, k_LDH_PYR, n_LDH_PYR, NADH, k_LDH_NADH, LACin, NAD, k_LDH_EQ, k_LDH_NAD, k_LDH_LAC)
  Vmax_LDH*(PYR/k_LDH_PYR)^n_LDH_PYR*(NADH/k_LDH_NADH)*(1 - LACin*NAD/(PYR^n_LDH_PYR*NADH)/k_LDH_EQ)/((1 + NADH/k_LDH_NADH + (PYR/k_LDH_PYR)^n_LDH_PYR)*(1 + NAD/k_LDH_NAD + LACin/k_LDH_LAC));
end

function Function_for_GDH_un(Vmax_GDH_F, GAP, k_GDH_GAP, NAD, k_GDH_NAD, BPG, NADH, k_GDH_EQ, k_GDH_NADH, k_GDH_BPG)
  Vmax_GDH_F*(GAP/k_GDH_GAP)*(NAD/k_GDH_NAD)*(1 - BPG*NADH/(GAP*NAD)/k_GDH_EQ)/((1 + NADH/k_GDH_NADH + NAD/k_GDH_NAD)*(1 + BPG/k_GDH_BPG + GAP/k_GDH_GAP));
end

function Function_for_ADK_n(Vmax_ADK, ATP, k_ADK_ATP, AMP, k_ADK_AMP, ADP, k_ADK_eq, k_ADK_ADP)
  Vmax_ADK*(ATP/k_ADK_ATP)*(AMP/k_ADK_AMP)*(1 - ADP^2/(ATP*AMP)/k_ADK_eq)/(1 + ATP/k_ADK_ATP + AMP/k_ADK_AMP + ADP/k_ADK_ADP);
end

function Funciton_for_FUMupt_n(Vmax_FUMup, FUMext, k_FUMup_FUMext, FUM, k_FUMup_EQ, k_FUMup_FUM)
  Vmax_FUMup*(FUMext/k_FUMup_FUMext)*(1 - FUM/FUMext/k_FUMup_EQ)/(1 + FUMext/k_FUMup_FUMext + FUM/k_FUMup_FUM);
end

function Function_for_NGAM(Vmax_NGAM, ATP, n_NGAM, k_NGAM_ATP)
  Vmax_NGAM*(ATP^n_NGAM/(k_NGAM_ATP^n_NGAM + ATP^n_NGAM));
end
Function_for_NGAM is "Function for NGAM [1]";

function Function_for_ATPase_u(Vmax_ATPase, ATP, n_ATPase, k_ATPase_ATP)
  Vmax_ATPase*(ATP^n_ATPase/(k_ATPase_ATP^n_ATPase + ATP^n_ATPase));
end
Function_for_ATPase_u is "Function for ATPase u [1]";

function Function_for_PGI_u(Vmax_PGI, G6P, k_PGI_G6P, F6P, k_PGI_EQ, k_PGI_F6P, PEP, k_PGI_PEP)
  Vmax_PGI*(G6P/k_PGI_G6P)*(1 - F6P/G6P/k_PGI_EQ)/(1 + G6P/k_PGI_G6P + F6P/k_PGI_F6P + PEP/k_PGI_PEP);
end

function Function_for_ALDH_u(Vmax_ALDH, AcCoA, NADH, ACTLD, CoA, k_ALDH_EQ, k_ALDH_i_AcCoA, k_ALDH_NADH, k_ALDH_i_CoA, k_ALDH_ACTLD)
  Vmax_ALDH*(AcCoA*NADH - ACTLD*CoA/k_ALDH_EQ)/(k_ALDH_i_AcCoA*k_ALDH_NADH + k_ALDH_NADH*AcCoA + AcCoA*NADH + k_ALDH_i_AcCoA*k_ALDH_NADH*CoA/k_ALDH_i_CoA + k_ALDH_i_AcCoA*k_ALDH_NADH*CoA*ACTLD/(k_ALDH_ACTLD*k_ALDH_i_CoA));
end

function Function_for_CSICD_u(Vmax_CSICD, AcCoA, k_CSICD_AcCoA, NAD, k_CSICD_NAD, OAA, k_CSICD_OAA, AKG, NADH, CoA, CO2, k_CSICD_EQ, k_CSICD_AKG, k_CSICD_NADH, k_CSICD_CoA, k_CSICD_CO2, k_CSICD_i_AKG, n_CSICD_AGK, k_CSICD_i_NADH)
  Vmax_CSICD*(AcCoA/k_CSICD_AcCoA*(NAD/k_CSICD_NAD)*(OAA/k_CSICD_OAA)*(1 - AKG*NADH*CoA*CO2/(AcCoA*NAD*OAA)/k_CSICD_EQ)/((1 + AcCoA/k_CSICD_AcCoA)*(1 + NAD/k_CSICD_NAD)*(1 + OAA/k_CSICD_OAA) + (1 + AKG/k_CSICD_AKG)*(1 + NADH/k_CSICD_NADH)*(1 + CoA/k_CSICD_CoA)*(1 + CO2/k_CSICD_CO2) - 1))*(k_CSICD_i_AKG/(k_CSICD_i_AKG + AKG))^n_CSICD_AGK*(k_CSICD_i_NADH/(k_CSICD_i_NADH + NADH));
end

function Function_for_MDH(Vmax_MDH, OAA, k_MDH_i_OAA, NADH, k_MDH_NADH, FUM, NAD, k_MDH_eq, k_MDH_OAA, k_MDH_NAD, k_MDH_FUM, k_MDH_i_NAD, k_MDH_i_NADH, k_MDH_i_FUM)
  Vmax_MDH*(OAA/k_MDH_i_OAA)*(NADH/k_MDH_NADH)*(1 - FUM*NAD/(OAA*NADH)/k_MDH_eq)/(1 + NADH*k_MDH_OAA/(k_MDH_i_OAA*k_MDH_NADH) + OAA/k_MDH_i_OAA + OAA*NADH/(k_MDH_i_OAA*k_MDH_NADH) + k_MDH_NAD*OAA*FUM/(k_MDH_FUM*k_MDH_i_NAD*k_MDH_i_OAA) + NAD*FUM/(k_MDH_FUM*k_MDH_i_NAD) + NADH*NAD*FUM/(k_MDH_FUM*k_MDH_i_NAD*k_MDH_i_NADH) + OAA*NADH*FUM/(k_MDH_i_FUM*k_MDH_i_OAA*k_MDH_NADH) + k_MDH_OAA*NADH*NAD/(k_MDH_i_NAD*k_MDH_i_OAA*k_MDH_NADH) + k_MDH_NAD*FUM/(k_MDH_FUM*k_MDH_i_NAD) + NAD/k_MDH_i_NAD);
end

function Function_for_PYK_noPYK_reg(Vmax_PYK, PEP, k_PYK_PEP, n_PYK_PEP, ADP, k_PYK_ADP, PYR, ATP, k_PYK_eq, k_PYK_PYR, k_PYK_ATP, FBP, k_PYK_a_FBP, n_PYK_FBP, k_PYK_i_ATP)
  Vmax_PYK*(PEP/k_PYK_PEP)^n_PYK_PEP*(ADP/k_PYK_ADP)*(1 - PYR*ATP/(PEP*ADP)/k_PYK_eq)/((1 + PEP/k_PYK_PEP)^n_PYK_PEP*(1 + ADP/k_PYK_ADP) + (1 + PYR/k_PYK_PYR)*(1 + ATP/k_PYK_ATP) - 1)*(FBP/(FBP + k_PYK_a_FBP))^n_PYK_FBP*(k_PYK_i_ATP/(ATP + k_PYK_i_ATP));
end

function Function_for_PPC(Vmax_PPC, PEP, k_PPC_PEP, n_PPC_PEP, CO2, k_PPC_CO2, OAA, k_PPC_EQ, k_PPC_OAA, AcCoA, k_PPC_AcCoA, n_PPC_AcCoA, FBP, k_PPC_FBP, k_PPC_i_FUM, FUM)
  Vmax_PPC*(PEP/k_PPC_PEP)^n_PPC_PEP*(CO2/k_PPC_CO2)*(1 - OAA/(PEP^n_PPC_PEP*CO2)/k_PPC_EQ)/(1 + (PEP/k_PPC_PEP)^n_PPC_PEP*(CO2/k_PPC_CO2) + OAA/k_PPC_OAA)*(AcCoA/(AcCoA + k_PPC_AcCoA))^n_PPC_AcCoA*(FBP/(FBP + k_PPC_FBP))*(k_PPC_i_FUM/(FUM + k_PPC_i_FUM));
end

model Slaviero2021___E__coli_anaerobic_central_carbon_and_energy_metabolism_Version1()
  // Slaviero2021 - E. coli anaerobic central carbon and energy metabolism_Version1
  // This model describes the central carbon and energy metabolism of E. coli growing under anaerobic conditions.
  // For complete information about the model see:
  // 'Deciphering the physiological response of Escherichia coli under high ATP demand
  // Simon Boecker, Giulia Slaviero, Thorben Schramm, Witold Szymanski, Ralf Steuer, Hannes Link, Steffen Klamt
  // Mol Syst Biol. (2021) 17: e10504https://doi.org/10.15252/msb.202110504'
  // hasProperty mamo:MAMO_0000046

  // Compartments:
  compartment Cytoplasm = 1;
  compartment Out = 1;

  // Species:
  species $GLC_ex in Out;
  species G6P in Cytoplasm = 2;
  species FBP in Cytoplasm = 3;
  species GAP in Cytoplasm = 0.5;
  species PEP in Cytoplasm = 1;
  species PYR in Cytoplasm = 1;
  species ATP in Cytoplasm = 1.622;
  species ADP in Out = 0.409;
  species Biomass in Out = 0.04;
  species F6P in Cytoplasm = 2;
  species $GLC_umol in Out = 21647.3;
  species $EA in Cytoplasm;
  species AcCoA in Cytoplasm = 1;
  species FOR in Out = 0;
  species LAC in Out = 0;
  species OAA in Cytoplasm = 0.4;
  species AKG in Cytoplasm = 0.15;
  species SUCin in Cytoplasm = 0.15;
  species SUC in Out = 0;
  species $NAD in Out;
  species NADH in Out = 1;
  species $CoA in Out;
  species ACE in Out = 0;
  species ETH in Out = 0;
  species $CO2 in Cytoplasm = 2.478;
  species D3PG in Cytoplasm = 1;
  species BPG in Cytoplasm = 1;
  species LACin in Cytoplasm = 0.1;
  species FORin in Cytoplasm = 0.1;
  species ETHin in Cytoplasm = 0.1;
  species ACEin in Cytoplasm = 0.1;
  species FUM in Cytoplasm = 0.8;
  species $FUMext in Out = 1;
  species ACTLD in Cytoplasm = 0.1;
  species $AMP in Cytoplasm;
  species $mu in Cytoplasm;
  species $FixedEnzymeBuden in Cytoplasm = 1;

  // Parameters:
  var Growth__1_s; Growth__1_s is "Growth [1/s]";
  EA_n = 3.1;
  EA_KmATP = 0.98;
  Mw_ETH = 46.069;
  Mw_LAC = 89.071;
  Mw_ACT = 59.044;
  Mw_FOR = 45.018;
  Conversionfactor = 1000000;
  MW_SUC = 118.09;
  MW_FUM = 116.07;
  MW_PYR = 87.005;

  // Assignment rules:
  EA := ATP^EA_n/(EA_KmATP^EA_n + ATP^EA_n);
  NAD := 2 - NADH;
  CoA := 3.67 - AcCoA;
  AMP := 2.70058 - ADP - ATP;
  mu := Growth*3600;
  Growth__1_s := Growth;
  PTS := PTS_0;
  SUC_tr := SUCtr;
  LACtrsp := LACtrsp_0;
  FORtrsp := FORtrsp_0;
  ETHtrsp := ETHtrsp_0;
  ACEtrsp := ACEtrsp_0;
  FumarateUptake := FUMuptake;
  GLC_ex := GLC_umol*180.16/1000000;

  // Reactions:
  Growth: 459.271 GAP + 810.19 PEP + 2784.13 PYR + 5.31076e4 ATP + 3856.57 AcCoA + 1075.32 AKG + 2924.97 OAA + 1.48893e4 NADH + 466.429 F6P + 600.28 G6P + 1717.48 D3PG + 107.952 FORin -> 581.01 ACEin + 2334.41 $CO2 + 1040.71 SUCin + 4.97395e4 ADP; Function_for_Growth(mu_max, GAP, kg_GAP, PEP, kg_PEP, PYR, kg_PYR, ATP, n, kg_ATP, AcCoA, kg_AcCoA, AKG, kg_AKG, OAA, kg_OAA, NADH, kg_NADH, F6P, kg_F6P, G6P, kg_G6P, D3PG, kg_D3PG, FORin, kg_FORin);
    mu_max = 0.0003065; kg_GAP = 0.00215; kg_PEP = 0.0075; kg_PYR = 0.007; n = 1; kg_ATP = 2.814; kg_AcCoA = 0.0043; kg_AKG = 0.00143; kg_OAA = 0.009; kg_NADH = 0.00072; kg_F6P = 0.015; kg_G6P = 0.075; kg_D3PG = 0.0018; kg_FORin = 0.0018;
  Biomass_production: => Biomass; Out*Function_for_Biomass(Growth__1_s, Biomass);
  Glucose_Uptake: $GLC_umol => ; Out*Function_for_Glucose_Uptake(PTS, Biomass);  // modifiers: Biomass
  PTS_0: PEP -> PYR + G6P; Out*Function_for_PTS_modified_direct_binding(Vmax_PTS, PEP, k_PTS_PEP, GLC_ex, k_PTS_Glc, PYR, G6P, k_PTS_EQ, k_PTS_G6P, n_PTS_G6P, k_PTS_PYR);  // modifiers: GLC_ex
    Vmax_PTS = 13.5326; k_PTS_PEP = 0.531; k_PTS_Glc = 0.0345; k_PTS_EQ = 12; k_PTS_G6P = 1.0625; n_PTS_G6P = 2.21; k_PTS_PYR = 3.45;
  PFK: ATP + F6P -> ADP + FBP; Out*Function_for_PFK(Vmax_PFK, ATP, k_PFK_ATP, F6P, k_PFK_F6P, n_PFK_F6P, ADP, FBP, k_PFK_EQ, k_PFK_ADP, k_PFK_FBP, k_PFK_a_ADP, k_PFK_i_PEP, PEP, n_PFK_i_PEP);  // modifiers: PEP
    Vmax_PFK = 18.74; k_PFK_ATP = 1.1371; k_PFK_F6P = 0.0531; n_PFK_F6P = 1.9; k_PFK_EQ = 1300; k_PFK_ADP = 4.2857; k_PFK_FBP = 5; k_PFK_a_ADP = 0.2886; k_PFK_i_PEP = 3.45; n_PFK_i_PEP = 2.61;
  FBA: FBP -> 2 GAP; Out*Function_for_FBA(Vmax_FBA_F, FBP, k_FBA_FBP, GAP, k_FBA_eq, k_FBA_GAP, PEP, k_FBA_PEP, n_FBA_PEP);  // modifiers: PEP
    Vmax_FBA_F = 19; k_FBA_FBP = 40; k_FBA_eq = 0.177; k_FBA_GAP = 16.6; k_FBA_PEP = 0.81; n_FBA_PEP = 3;
  GDH: GAP + $NAD -> BPG + NADH; Out*Function_for_GDH_un(Vmax_GDH_F, GAP, k_GDH_GAP, NAD, k_GDH_NAD, BPG, NADH, k_GDH_EQ, k_GDH_NADH, k_GDH_BPG);
    Vmax_GDH_F = 20.86; k_GDH_GAP = 0.0983; k_GDH_NAD = 0.0194; k_GDH_EQ = 1679; k_GDH_NADH = 6.549; k_GDH_BPG = 0.354;
  PYK: PEP + ADP -> PYR + ATP; Out*Function_for_PYK_noPYK_reg(Vmax_PYK, PEP, k_PYK_PEP, n_PYK_PEP, ADP, k_PYK_ADP, PYR, ATP, k_PYK_eq, k_PYK_PYR, k_PYK_ATP, FBP, k_PYK_a_FBP, n_PYK_FBP, k_PYK_i_ATP);  // modifiers: FBP
    Vmax_PYK = 8.44; k_PYK_PEP = 0.177; n_PYK_PEP = 1.05; k_PYK_ADP = 0.0027; k_PYK_eq = 24000; k_PYK_PYR = 0.3154; k_PYK_ATP = 0.5357; k_PYK_a_FBP = 5.28; n_PYK_FBP = 1.3; k_PYK_i_ATP = 22.5;
  PGI: G6P -> F6P; Out*Function_for_PGI_u(Vmax_PGI, G6P, k_PGI_G6P, F6P, k_PGI_EQ, k_PGI_F6P, PEP, k_PGI_PEP);  // modifiers: PEP
    Vmax_PGI = 18.71; k_PGI_G6P = 0.31; k_PGI_EQ = 0.3; k_PGI_F6P = 0.293; k_PGI_PEP = 0.46;
  CSICD: AcCoA + $NAD + OAA => AKG + NADH + $CoA + $CO2; Out*Function_for_CSICD_u(Vmax_CSICD, AcCoA, k_CSICD_AcCoA, NAD, k_CSICD_NAD, OAA, k_CSICD_OAA, AKG, NADH, CoA, CO2, k_CSICD_EQ, k_CSICD_AKG, k_CSICD_NADH, k_CSICD_CoA, k_CSICD_CO2, k_CSICD_i_AKG, n_CSICD_AGK, k_CSICD_i_NADH);
    Vmax_CSICD = 1.956; k_CSICD_AcCoA = 0.2124; k_CSICD_NAD = 0.067; k_CSICD_OAA = 0.04602; k_CSICD_EQ = 6.2; k_CSICD_AKG = 0.628; k_CSICD_NADH = 0.7; k_CSICD_CoA = 1.53; k_CSICD_CO2 = 2.87; k_CSICD_i_AKG = 0.628; n_CSICD_AGK = 4; k_CSICD_i_NADH = 0.7;
  PTACK: AcCoA + ADP => ATP + ACEin + $CoA; Out*Function_for_PTACK(Vmax_PTACK, AcCoA, k_PTACK_AcCoA, n_PTACK_AcCoA, ADP, k_PTACK_ADP, ATP, ACEin, CoA, k_PTACK_eq, k_PTACK_ATP, k_PTACK_CoA, k_PTACK_i_ATP, PYR, k_PTACK_a_PYR, PEP, k_PTACK_a_PEP);  // modifiers: PYR, PEP
    Vmax_PTACK = 23.53; k_PTACK_AcCoA = 0.0794; n_PTACK_AcCoA = 4; k_PTACK_ADP = 0.3161; k_PTACK_eq = 4790; k_PTACK_ATP = 0.1239; k_PTACK_CoA = 0.118; k_PTACK_i_ATP = 4.56; k_PTACK_a_PYR = 0.0261; k_PTACK_a_PEP = 0.25;
  PPC: PEP + $CO2 -> OAA; Out*Function_for_PPC(Vmax_PPC, PEP, k_PPC_PEP, n_PPC_PEP, CO2, k_PPC_CO2, OAA, k_PPC_EQ, k_PPC_OAA, AcCoA, k_PPC_AcCoA, n_PPC_AcCoA, FBP, k_PPC_FBP, k_PPC_i_FUM, FUM);  // modifiers: AcCoA, FBP, FUM
    Vmax_PPC = 4.0879; k_PPC_PEP = 0.2655; n_PPC_PEP = 4; k_PPC_CO2 = 1.09; k_PPC_EQ = 2001; k_PPC_OAA = 1.3879; k_PPC_AcCoA = 0.7611; n_PPC_AcCoA = 1.4; k_PPC_FBP = 5.98; k_PPC_i_FUM = 0.2124;
  PFL: PYR + $CoA -> FORin + AcCoA; Out*Function_for_PFL(FixedEnzymeBuden, Vmax_PFL_F, PYR, CoA, k_PFL_PYR, k_PFL_CoA, FORin, AcCoA, k_PFL_EQ, k_PFL_i_AcCoA, k_PFL_AcCoA, k_PFL_FOR, k_PFL_i_PYR);  // modifiers: FixedEnzymeBuden
    Vmax_PFL_F = 20.01; k_PFL_PYR = 0.4518; k_PFL_CoA = 0.0124; k_PFL_EQ = 3000; k_PFL_i_AcCoA = 1.51; k_PFL_AcCoA = 0.0903; k_PFL_FOR = 43.36; k_PFL_i_PYR = 1;
  ADH: NADH + ACTLD -> ETHin + $NAD; Out*Function_for_ADH_Ordered_BiBi_rapid_equilibrium(Vmax_ADH, NADH, k_ADH_NADH, ACTLD, ETHin, NAD, k_ADH_EQ, k_ADH_i_ACTLD, k_ADH_i_NAD, k_ADH_ETHin);
    Vmax_ADH = 18; k_ADH_NADH = 0.172; k_ADH_EQ = 1500; k_ADH_i_ACTLD = 0.0531; k_ADH_i_NAD = 0.142; k_ADH_ETHin = 1.77;
  LDH: PYR + NADH => LACin + $NAD; Out*Function_for_LDH_2(Vmax_LDH, PYR, k_LDH_PYR, n_LDH_PYR, NADH, k_LDH_NADH, LACin, NAD, k_LDH_EQ, k_LDH_NAD, k_LDH_LAC);  // modifiers: ATP
    Vmax_LDH = 11; k_LDH_PYR = 12.74; n_LDH_PYR = 1.2; k_LDH_NADH = 0.004; k_LDH_EQ = 14000; k_LDH_NAD = 0.4425; k_LDH_LAC = 7.48;
  LAC_prod: => LAC; Out*Function_for_LACexcr(Biomass, Mw_LAC, Conversionfactor, LACtrsp);  // modifiers: Biomass
  FOR_prod: => FOR; Out*Function_for_FOR_excr(Biomass, Mw_FOR, Conversionfactor, FORtrsp);  // modifiers: Biomass
  SUCtr: SUCin => ; Out*Function_for_SUCtransp_u(V_max_SUCtrsp, SUCin, k_SUCtrsp);
    V_max_SUCtrsp = 100; k_SUCtrsp = 10;
  MDH: OAA + NADH => FUM + $NAD; Out*Function_for_MDH(Vmax_MDH, OAA, k_MDH_i_OAA, NADH, k_MDH_NADH, FUM, NAD, k_MDH_eq, k_MDH_OAA, k_MDH_NAD, k_MDH_FUM, k_MDH_i_NAD, k_MDH_i_NADH, k_MDH_i_FUM);
    Vmax_MDH = 2.57; k_MDH_i_OAA = 0.0354; k_MDH_NADH = 0.1079; k_MDH_eq = 44000; k_MDH_OAA = 0.09912; k_MDH_NAD = 0.16638; k_MDH_FUM = 0.1699; k_MDH_i_NAD = 0.041; k_MDH_i_NADH = 0.02932; k_MDH_i_FUM = 0.8;
  SUC_prodiction: => SUC; Out*Function_for_SUC_excretion(Biomass, SUC_tr, MW_SUC, Conversionfactor);  // modifiers: Biomass
  D_AcCoA: AcCoA => ; Cytoplasm*Function_for_dilution(Growth__1_s, AcCoA);
  D_AKG: AKG => ; Cytoplasm*Function_for_dilution(Growth__1_s, AKG);
  D_ATP: ATP => ; Cytoplasm*Function_for_dilution(Growth__1_s, ATP);
  D_F6P: F6P => ; Cytoplasm*Function_for_dilution(Growth__1_s, F6P);
  D_FBP: FBP => ; Cytoplasm*Function_for_dilution(Growth__1_s, FBP);
  D_G6P: G6P => ; Cytoplasm*Function_for_dilution(Growth__1_s, G6P);
  D_GAP: GAP => ; Cytoplasm*Function_for_dilution(Growth__1_s, GAP);
  D_OAA: OAA => ; Cytoplasm*Function_for_dilution(Growth__1_s, OAA);
  D_PEP: PEP => ; Cytoplasm*Function_for_dilution(Growth__1_s, PEP);
  D_PYR: PYR => ; Cytoplasm*Function_for_dilution(Growth__1_s, PYR);
  D_SUCin: SUCin => ; Cytoplasm*Function_for_dilution(Growth__1_s, SUCin);
  ACE_prod: => ACE; Out*Function_for_ACE_excr(Biomass, Mw_ACT, Conversionfactor, ACEtrsp);  // modifiers: Biomass
  ETH_prod: => ETH; Out*Function_for_ETH_excr(Biomass, Mw_ETH, Conversionfactor, ETHtrsp);  // modifiers: Biomass
  PGK: BPG + ADP -> D3PG + ATP; Function_for_PGK_upd(Vmax_PGK_F, BPG, k_PGK_BPG, ADP, k_PGK_ADP, D3PG, ATP, k_PGK_EQ, k_PGK_D3PG, k_PGK_ATP);
    Vmax_PGK_F = 28.9; k_PGK_BPG = 0.3186; k_PGK_ADP = 0.0122; k_PGK_EQ = 2700; k_PGK_D3PG = 2.265; k_PGK_ATP = 2.1996;
  ENO: D3PG -> PEP; Cytoplasm*Function_for_ENO_n(Vmax_ENO, D3PG, k_ENO_D3PG, PEP, k_ENO_EQ, k_ENO_PEP);
    Vmax_ENO = 32.12; k_ENO_D3PG = 1.94; k_ENO_EQ = 4.7; k_ENO_PEP = 0.177;
  D_D3PG: D3PG => ; Cytoplasm*Function_for_dilution(Growth__1_s, D3PG);
  D_CO2: $CO2 => ; Cytoplasm*Function_for_dilution(Growth__1_s, CO2);
  D_BPG: BPG => ; Cytoplasm*Function_for_dilution(Growth__1_s, BPG);
  PCK: OAA + ATP -> PEP + $CO2 + ADP; Cytoplasm*Function_for_PCK_upd(Vmax_PCK, OAA, ATP, k_PCK_OAA, k_PCK_ATP, PEP, CO2, ADP, k_PCK_EQ, k_PCK_CO2, k_PCK_PEP, k_PCK_ADP);
    Vmax_PCK = 0.0513; k_PCK_OAA = 1.18; k_PCK_ATP = 0.1062; k_PCK_EQ = 1.88; k_PCK_CO2 = 2.571; k_PCK_PEP = 0.885; k_PCK_ADP = 0.0885;
  D_NAD: $NAD => ; Out*Function_for_dilution(Growth__1_s, NAD);
  LACtrsp_0: LACin => ; Cytoplasm*Function_for_LACtrsp(LACin, V_max_LACtrsp, k_LACtrsp);
    V_max_LACtrsp = 100; k_LACtrsp = 10;
  FORtrsp_0: FORin => ; Cytoplasm*Function_for_FORtrsp(V_max_FORtrsp, FORin, k_FORtrsp);
    V_max_FORtrsp = 100; k_FORtrsp = 10;
  ETHtrsp_0: ETHin => ; Cytoplasm*Function_for_ETHtrsp(V_max_ETHtrsp, ETHin, k_ETHtrsp);
    V_max_ETHtrsp = 100; k_ETHtrsp = 10;
  ACEtrsp_0: ACEin => ; Cytoplasm*Function_for_ACEtrsp(V_max_ACEtrsp, k_ACEtrsp, ACEin);
    V_max_ACEtrsp = 100; k_ACEtrsp = 10;
  D_LACin: LACin => ; Cytoplasm*Function_for_dilution(Growth__1_s, LACin);
  D_FORin: FORin => ; Cytoplasm*Function_for_dilution(Growth__1_s, FORin);
  D_ACEin: ACEin => ; Cytoplasm*Function_for_dilution(Growth__1_s, ACEin);
  D_ETHin: ETHin => ; Cytoplasm*Function_for_dilution(Growth__1_s, ETHin);
  FRD: FUM + NADH + 0.75 ADP -> 0.75 ATP + $NAD + SUCin; Function_for_FRD(Vmax_FRD, FUM, k_FRD_FUM, NADH, k_FRD_NADH, ADP, k_FRD_ADP, ATP, NAD, SUCin, k_FRD_EQ, k_FRD_ATP, k_FRD_NAD, k_FRD_SUCin, OAA, k_FRD_i_OAA);  // modifiers: OAA
    Vmax_FRD = 4.89; k_FRD_FUM = 0.0354; k_FRD_NADH = 0.02; k_FRD_ADP = 0.1429; k_FRD_EQ = 120; k_FRD_ATP = 0.84; k_FRD_NAD = 0.007; k_FRD_SUCin = 1.45; k_FRD_i_OAA = 2.63;
  D_FUM: FUM => ; Cytoplasm*Function_for_dilution(Growth__1_s, FUM);
  FUMuptake: => FUM; Funciton_for_FUMupt_n(Vmax_FUMup, FUMext, k_FUMup_FUMext, FUM, k_FUMup_EQ, k_FUMup_FUM);  // modifiers: FUMext
    Vmax_FUMup = 0; k_FUMup_FUMext = 0.1; k_FUMup_EQ = 1; k_FUMup_FUM = 1.4;
  FUM_conversion: $FUMext => ; Out*Function_for_Fumarate_conversion(FumarateUptake, Biomass, MW_FUM);  // modifiers: Biomass
  D_ACTLD: ACTLD => ; Cytoplasm*Function_for_dilution(Growth__1_s, ACTLD);
  ALDH: AcCoA + NADH -> ACTLD + $CoA + $NAD; Function_for_ALDH_u(Vmax_ALDH, AcCoA, NADH, ACTLD, CoA, k_ALDH_EQ, k_ALDH_i_AcCoA, k_ALDH_NADH, k_ALDH_i_CoA, k_ALDH_ACTLD);
    Vmax_ALDH = 30; k_ALDH_EQ = 0.273; k_ALDH_i_AcCoA = 0.012; k_ALDH_NADH = 0.1; k_ALDH_i_CoA = 0.014; k_ALDH_ACTLD = 17.7;
  ADK: ATP + $AMP -> 2 ADP; Function_for_ADK_n(Vmax_ADK, ATP, k_ADK_ATP, AMP, k_ADK_AMP, ADP, k_ADK_eq, k_ADK_ADP);
    Vmax_ADK = 14; k_ADK_ATP = 0.87; k_ADK_AMP = 0.25; k_ADK_eq = 0.9; k_ADK_ADP = 0.08;
  ATPase: ATP => ADP; Function_for_ATPase_u(Vmax_ATPase, ATP, n_ATPase, k_ATPase_ATP);
    Vmax_ATPase = 0; n_ATPase = 2.2; k_ATPase_ATP = 0.48;
  NGAM: ATP => ADP; Function_for_NGAM(Vmax_NGAM, ATP, n_NGAM, k_NGAM_ATP);
    Vmax_NGAM = 1.2; n_NGAM = 8; k_NGAM_ATP = 0.008;

  // Unit definitions:
  unit length = metre;
  unit area = metre^2;
  unit volume = litre;
  unit time = second;
  unit substance = 1e-3 mole;
end
