// SBML level 2 version 3

model MODEL2937159804()
  // Shimoni2009 - Escherichia Coli SOS
  // Simple model, involving only the basic components of the circuit, sufficient to explain the peaks in the promoter activities of recA and lexA.
  // This model is described in the article:
  // Stochastic analysis of the SOS response in Escherichia coli.
  // Shimoni Y, Altuvia S, Margalit H, Biham O
  // PloS one. 2009; 4(5):e5363
  // Abstract:
  // BACKGROUND: DNA damage in Escherichia coli evokes a response mechanism called the SOS response. The genetic circuit of this mechanism includes the genes recA and lexA, which regulate each other via a mixed feedback loop involving transcriptional regulation and protein-protein interaction. Under normal conditions, recA is transcriptionally repressed by LexA, which also functions as an auto-repressor. In presence of DNA damage, RecA proteins recognize stalled replication forks and participate in the DNA repair process. Under these conditions, RecA marks LexA for fast degradation. Generally, such mixed feedback loops are known to exhibit either bi-stability or a single steady state. However, when the dynamics of the SOS system following DNA damage was recently studied in single cells, ordered peaks were observed in the promoter activity of both genes (Friedman et al., 2005, PLoS Biol. 3(7):e238). This surprising phenomenon was masked in previous studies of cell populations. Previous attempts to explain these results harnessed additional genes to the system and deployed complex deterministic mathematical models that were only partially successful in explaining the results.
  // PRINCIPAL FINDINGS: Here we apply stochastic methods, which are better suited for dynamic simulations of single cells. We show that a simple model, involving only the basic components of the circuit, is sufficient to explain the peaks in the promoter activities of recA and lexA. Notably, deterministic simulations of the same model do not produce peaks in the promoter activities.
  // SIGNIFICANCE: We conclude that the double negative mixed feedback loop with auto-repression accounts for the experimentally observed peaks in the promoter activities. In addition to explaining the experimental results, this result shows that including additional regulations in a mixed feedback loop may dramatically change the dynamic functionality of this regulatory module. Furthermore, our results suggests that stochastic fluctuations strongly affect the qualitative behavior of important regulatory modules even under biologically relevant conditions, thus emphasizing the importance of stochastic analysis of regulatory circuits.
  // This model is hosted on BioModels Database and identified by: MODEL2937159804.
  // To cite BioModels Database, please use: BioModels Database: An enhanced, curated and annotated resource for published quantitative kinetic models.
  // To the extent possible under law, all copyright and related or neighbouring rights to this encoded model have been dedicated to the public domain worldwide. Please refer to CC0 Public Domain Dedication for more information.
  // biomodels.db:MODEL2937159804
  // isDescribedBy pubmed:19424504
  // hasTaxon taxonomy:562
  // isVersionOf GO:0009432

  // Compartments:
  compartment compartment = 1;

  // Species:
  species bLexA in compartment = 0;
  species mLexA in compartment = 0;
  species LexA in compartment = 0;
  species bRecA in compartment = 0;
  species mRecA in compartment = 0;
  species RecA in compartment = 0;
  species $fluxL in compartment = 1;
  species $fluxR in compartment = 1;
  species $degradation in compartment = 0;

  // Parameters:
  J9_k = 0.1;
  J10_k = 0.05;
  g_mR = 0.05;
  mRecADegradation_k = 0.02;
  g_mL = 0.03;
  mLexADegradation_k = 0.003;
  g_L = 0.1;
  LexADegradation_k = 0.002;
  g_R = 0.04;
  RecADegradation_k = 0.02;
  LexAUnbindingAuto_k = 0.01;
  LexAUnbindingRecAPromoter_k = 0.04;
  c_R = 0.02;
  c_L = 0.01;

  // Reactions:
  mRecATranscription: $fluxR => mRecA; g_mR*fluxR*(1 - bRecA);  // modifiers: bRecA
  RecATranslation: $fluxR => RecA; g_R*fluxR*mRecA;  // modifiers: mRecA
  mLexATranscription: $fluxL => mLexA; g_mL*fluxL*(1 - bLexA);  // modifiers: bLexA
  LexATranslation: $fluxL => LexA; g_L*fluxL*mLexA;  // modifiers: mLexA
  LexABindingAuto: LexA => bLexA; c_L*LexA*(1 - bLexA);
  LexAUnbindingAuto: bLexA => LexA; LexAUnbindingAuto_k*bLexA;
  LexABindingRecAPromoter: LexA => bRecA; c_R*LexA*(1 - bRecA);
  LexAUnbindingRecAPromoter: bRecA => LexA; LexAUnbindingRecAPromoter_k*bRecA;
  J9: $degradation => $degradation; J9_k*degradation;
  LexAAutoCleavage: LexA => $degradation; J10_k*LexA*RecA;  // modifiers: RecA
  RecADegradation: RecA => $degradation; RecADegradation_k*RecA;
  mRecADegradation: mRecA => $degradation; mRecADegradation_k*mRecA;
  mLexADegradation: mLexA => $degradation; mLexADegradation_k*mLexA;
  LexADegradation: LexA => $degradation; LexADegradation_k*LexA;
end
