// SBML level 2 version 3

model Folate2004()
  // Nijhout2004_FolateCycle
  // This is an SBML version of the folate cycle model model from:
  // A mathematical model of the folate cycle: new insights into folate homeostasis.
  // Nijhout HF, Reed MC, Budu P, Ulrich CM J. Biol. Chem.,2004, 279 (53),55008-16
  // Reference publication: 15496403
  // Abstract:
  // A mathematical model is developed for the folate cycle based on standard biochemical kinetics. We use the model to provide new insights into several different mechanisms of folate homeostasis. The model reproduces the known pool sizes of folate substrates and the fluxes through each of the loops of the folate cycle and has the qualitative behavior observed in a variety of experimental studies. Vitamin B(12) deficiency, modeled as a reduction in the V(max) of the methionine synthase reaction, results in a secondary folate deficiency via the accumulation of folate as 5-methyltetrahydrofolate (the "methyl trap"). One form of homeostasis is revealed by the fact that a 100-fold up-regulation of thymidylate synthase and dihydrofolate reductase (known to occur at the G(1)/S transition) dramatically increases pyrimidine production without affecting the other reactions of the folate cycle. The model also predicts that an almost total inhibition of dihydrofolate reductase is required to significantly inhibit the thymidylate synthase reaction, consistent with experimental and clinical studies on the effects of methotrexate. Sensitivity to variation in enzymatic parameters tends to be local in the cycle and inversely proportional to the number of reactions that interconvert two folate substrates. Another form of homeostasis is a consequence of the nonenzymatic binding of folate substrates to folate enzymes. Without folate binding, the velocities of the reactions decrease approximately linearly as total folate is decreased. In the presence of folate binding and allosteric inhibition, the velocities show a remarkable constancy as total folate is decreased.
  // A curated version of this model is available: BIOMD0000000213 .
  // This model originates from BioModels Database: A Database of Annotated Published Models (http://www.ebi.ac.uk/biomodels/). It is copyright (c) 2005-2012 The BioModels.net Team.
  // For more information see the terms of use .
  // To cite BioModels Database, please use: Li C, Donizelli M, Rodriguez N, Dharuri H, Endler L, Chelliah V, Li L, He E, Henry A, Stefan MI, Snoep JL, Hucka M, Le Novère N, Laibe C (2010) BioModels Database: An enhanced, curated and annotated resource for published quantitative kinetic models. BMC Syst Biol., 4:92.
  // biomodels.db:MODEL6655501972
  // isDescribedBy pubmed:15496403

  // Compartments:
  compartment cytoplasm = 1;

  // Species:
  species _5mTHF in cytoplasm = 5;
  species THF in cytoplasm = 6;
  species DHF in cytoplasm = 0.02;
  species _5_10_CH2THF in cytoplasm = 1;
  species _5_10_CHTHF in cytoplasm = 1.1;
  species _10fTHF in cytoplasm = 6;
  species $Ser in cytoplasm = 468;
  species $Gly in cytoplasm = 1850;
  species $dUMP in cytoplasm = 20;
  species $GAR in cytoplasm = 10;
  species $AICAR in cytoplasm = 2.1;
  species $HCOOH in cytoplasm = 900;
  species $NADPH in cytoplasm = 50;
  species $Hcy in cytoplasm = 1;
  species $F in cytoplasm = 20;
  species $purine_synth in cytoplasm = 0;
  species $Met in cytoplasm = 0;
  species $NADP in cytoplasm = 50;
  species $dTMP_pyrimidine_synth in cytoplasm = 0;

  // Parameters:
  k1 = 0.15;
  k2 = 12;
  alpha = 0.0013;
  MS_Vmax = 500;
  MS_Km_Hcy = 0.1;
  MS_Km_5mTHF = 25;
  MTHFR_Vmax = 6000;
  MTHFR_Km_NADPH = 16;
  MTHFR_Km_5_10_CH2THF = 50;
  FTD_Vmax = 14000;
  FTD_Km_10fTHF = 20;
  FTS_Vmax = 2000;
  FTS_Km_HCOOH = 43;
  FTS_Km_THF = 3;
  AICART_Vmax = 45000;
  AICART_Km_AICAR = 100;
  AICART_Km_10fTHF = 5.9;
  PGT_Vmax = 16200;
  PGT_Km_GAR = 520;
  PGT_Km_10fTHF = 4.9;
  TS_Vmax = 50;
  TS_Km_dUMP = 6.3;
  TS_Km_5_10_CH2THF = 14;
  DHFR_Vmax = 50;
  DHFR_Km_NADPH = 4;
  DHFR_Km_DHF = 0.5;
  MTCH_VmaxF = 800000;
  MTCH_Km_5_10_CHTHF = 250;
  MTCH_VmaxR = 20000;
  MTCH_Km_10fTHF = 100;
  SHMT_VmaxF = 40000;
  SHMT_Km_Ser = 600;
  SHMT_Km_THF = 50;
  SHMT_VmaxR = 25000;
  SHMT_Km_Gly = 10000;
  SHMT_Km_5_10_CH2THF = 3200;
  MTD_VmaxF = 200000;
  MTD_Km_NADP = 10;
  MTD_Km_5_10_CH2THF = 2;
  MTD_VmaxR = 594000;
  MTD_Km_NADPH = 10;
  MTD_Km_5_10_CHTHF = 10;
  k = 0.00033333333;

  // Reactions:
  NE: THF => _5_10_CH2THF; cytoplasm*(k1*THF - k2*_5_10_CH2THF);
  Fin: $F => _5mTHF; cytoplasm*k*F;
  Fout: _5mTHF => $F; cytoplasm*alpha*_5mTHF;
  MS: _5mTHF + $Hcy => THF + $Met; cytoplasm*MS_Vmax*(Hcy/(MS_Km_Hcy + Hcy))*(_5mTHF/(MS_Km_5mTHF + _5mTHF));
  MTHFR: _5_10_CH2THF + $NADPH => _5mTHF + $NADP; cytoplasm*MTHFR_Vmax*(NADPH/(MTHFR_Km_NADPH + NADPH))*(_5_10_CH2THF/(MTHFR_Km_5_10_CH2THF + _5_10_CH2THF));
  FTD: _10fTHF => THF; cytoplasm*FTD_Vmax*(_10fTHF/(FTD_Km_10fTHF + _10fTHF));
  FTS: THF + $HCOOH => _10fTHF; cytoplasm*FTS_Vmax*(HCOOH/(FTS_Km_HCOOH + HCOOH))*(THF/(FTS_Km_THF + THF));
  AICART: _10fTHF + $AICAR => THF + $purine_synth; cytoplasm*AICART_Vmax*(AICAR/(AICART_Km_AICAR + AICAR))*(_10fTHF/(AICART_Km_10fTHF + _10fTHF));
  PGT: _10fTHF + $GAR => THF + $AICAR; cytoplasm*PGT_Vmax*(GAR/(PGT_Km_GAR + GAR))*(_10fTHF/(PGT_Km_10fTHF + _10fTHF));
  TS: _5_10_CH2THF + $dUMP => DHF + $dTMP_pyrimidine_synth; cytoplasm*TS_Vmax*(dUMP/(TS_Km_dUMP + dUMP))*(_5_10_CH2THF/(TS_Km_5_10_CH2THF + _5_10_CH2THF));
  DHFR: DHF + $NADPH => THF + $NADP; cytoplasm*DHFR_Vmax*(NADPH/(DHFR_Km_NADPH + NADPH))*(DHF/(DHFR_Km_DHF + DHF));
  MTCH: _5_10_CHTHF => _10fTHF; cytoplasm*(MTCH_VmaxF*(_5_10_CHTHF/(MTCH_Km_5_10_CHTHF + _5_10_CHTHF)) - MTCH_VmaxR*(_10fTHF/(MTCH_Km_10fTHF + _10fTHF)));
  SHMT: THF + $Ser => _5_10_CH2THF + $Gly; cytoplasm*(SHMT_VmaxF*(Ser/(SHMT_Km_Ser + Ser))*(THF/(SHMT_Km_THF + THF)) - SHMT_VmaxR*(Gly/(SHMT_Km_Gly + Gly))*(THF/(SHMT_Km_5_10_CH2THF + _5_10_CH2THF)));
  MTD: _5_10_CH2THF + $NADP => _5_10_CHTHF + $NADPH; cytoplasm*(MTD_VmaxF*(NADP/(MTD_Km_NADP + NADP))*(_5_10_CH2THF/(MTD_Km_5_10_CH2THF + _5_10_CH2THF)) - MTD_VmaxR*(NADPH/(MTD_Km_NADPH + NADPH))*(_5_10_CHTHF/(MTD_Km_5_10_CHTHF + _5_10_CHTHF)));
end
