// SBML level 2 version 2

model whatever()
  // EGFR_pathway
  // .
  // .
  // .
  // SBML level 2 code generated for the JWS Online project by Jacky Snoep using PySCeS
  // Run this model online at http://jjj.biochem.sun.ac.za
  // To cite JWS Online please refer to: Olivier, B.G. and Snoep, J.L. (2004) Web-based modelling using JWS Online , Bioinformatics, 20:2143-2144
  // .
  // .
  // .
  // .
  // .
  // .
  // This model was created using the irreversible Michaelis Menten rate laws and the corresponding parameters from the publication.
  // This model originates from BioModels Database: A Database of Annotated Published Models (http://www.ebi.ac.uk/biomodels/). It is copyright (c) 2005-2011 The BioModels.net Team.
  // To the extent possible under law, all copyright and related or neighbouring rights to this encoded model have been dedicated to the public domain worldwide. Please refer to CC0 Public Domain Dedication for more information.
  // In summary, you are entitled to use this encoded model in absolutely any manner you deem suitable, verbatim, or with modification, alone or embedded it in a larger context, redistribute it, commercially or not, in a restricted way or not..
  // To cite BioModels Database, please use: Li C, Donizelli M, Rodriguez N, Dharuri H, Endler L, Chelliah V, Li L, He E, Henry A, Stefan MI, Snoep JL, Hucka M, Le Novère N, Laibe C (2010) BioModels Database: An enhanced, curated and annotated resource for published quantitative kinetic models. BMC Syst Biol., 4:92.
  // biomodels.db:MODEL6624199343
  // isDescribedBy pubmed:11453985
  // hasTaxon taxonomy:4932
  // isVersionOf GO:0019244

  // Compartments:
  // Default size of compartment is 1e-10 litre by comparison with the article.
  compartment compartment = 3e-12; compartment is "cytoplasm";  // GO:0005737

  // Species:
  species EGF in compartment = 680; EGF is "Epidermal_Growth_Factor";  // uniprot:P07522
  species R in compartment = 100; R is "EGFR";  // isVersionOf uniprot:Q9QX70
  species Ra in compartment = 0; Ra is "EGF_EGFR";  // hasPart uniprot:Q9QX70 uniprot:P07522
  species EGF_EGFR_2 in compartment = 0; EGF_EGFR_2 is "(EGF_EGFR)2";  // hasPart uniprot:P07522 uniprot:Q9QX70
  species RP in compartment = 0; RP is "(EGF_EGFR)2-P";  // isVersionOf uniprot:Q9QX701
  species PLCg in compartment = 105;  // isVersionOf interpro:IPR001192; hasVersion uniprot:P10686 uniprot:P24135
  species RPLCg in compartment = 0; RPLCg is "(EGF_EGFR)2_PLCg";  // hasVersion uniprot:P10686 uniprot:P24135 uniprot:Q9QX70
  species RPLCgP in compartment = 0; RPLCgP is "(EGF_EGFR)2_PLCg-P";  // hasVersion uniprot:P24135 uniprot:P10686 uniprot:Q9QX70
  species PLCgP in compartment = 0; PLCgP is "PLCg-P";  // hasVersion interpro:IPR0011922; isVersionOf uniprot:P24135 uniprot:P10686
  species Grb in compartment = 85; Grb is "Grb2";  // uniprot:P62994
  species RG in compartment = 0; RG is "(EGF_EGFR)2_Grb2";  // hasPart uniprot:P62994 uniprot:Q9QX70
  species SOS in compartment = 34;  // uniprot:Q9Z1I1
  species RGS in compartment = 0; RGS is "(EGF_EGFR)2_Grb2_SOS";  // hasPart uniprot:Q9QX70 uniprot:P62994 uniprot:Q9Z1I1
  species GS in compartment = 0; GS is "Grb2_SOS";  // hasPart uniprot:P62994 uniprot:Q9Z1I1
  species Shc in compartment = 150;  // isVersionOf uniprot:Q5M824
  species RSh in compartment = 0; RSh is "(EGF_EGFR)2_Shc";  // hasPart uniprot:Q9QX70 uniprot:Q5M824
  species RShP in compartment = 0; RShP is "(EGF_EGFR)_Shc-P";  // hasPart uniprot:Q5M824 uniprot:Q9QX70
  species ShP in compartment = 0; ShP is "Shc-P";  // isVersionOf uniprot:Q5M8242
  species RShG in compartment = 0; RShG is "(EGF_EGFR)2_Shc_Grb2";  // hasPart uniprot:Q5M824 uniprot:P62994 uniprot:Q9QX70
  species ShG in compartment = 0; ShG is "Shc_Grb2";  // hasPart uniprot:Q5M824 uniprot:P62994
  species RShGS in compartment = 0; RShGS is "(EGF_EGFR)2_Shc_Grb2_SOS";  // hasPart uniprot:P62994 uniprot:Q5M824 uniprot:Q9Z1I1 uniprot:Q9QX70
  species ShGS in compartment = 0; ShGS is "Shc_Grb2_SOS";  // hasPart uniprot:Q5M824 uniprot:P62994 uniprot:Q9Z1I1
  species PLCgl in compartment = 0; PLCgl is "PLCgP-I";  // isVersionOf interpro:IPR001192; hasVersion uniprot:P24135 uniprot:P10686

  // Reactions:
  EGF_binds_to_EGFR: R + EGF -> Ra; (k1f*R*EGF - k1b*Ra)*compartment;  // GO:0005154 GO:0048408; isPartOf GO:0045741
    k1f = 0.003; k1b = 0.06;
  association_of_2_Ra_into_dimer: 2 Ra -> EGF_EGFR_2; (k2f*Ra*Ra - k2b*EGF_EGFR_2)*compartment;  // isVersionOf GO:0046983
    k2f = 0.01; k2b = 0.1;
  phosphorylation_of_R2: EGF_EGFR_2 -> RP; (k3f*EGF_EGFR_2 - k3b*RP)*compartment;  // isVersionOf ec-code:2.7.1.37 GO:0006468 GO:0004716
    k3f = 1; k3b = 0.01;
  // According to the artical, this dephosphorylation of RP should be irriversible.
  dephosphorylation_of_RP: RP => EGF_EGFR_2; V4*RP/(K4 + RP)*compartment;  // isVersionOf ec-code:3.1.3.16 GO:0006470
    V4 = 450; K4 = 50;
  binding_of_PLCg_to_RP: RP + PLCg -> RPLCg; (k5f*RP*PLCg - k5b*RPLCg)*compartment;  // isVersionOf GO:0051425 GO:0042169
    k5f = 0.06; k5b = 0.2;
  phosphorylation_of_PLCg: RPLCg -> RPLCgP; (k6f*RPLCg - k6b*RPLCgP)*compartment;  // isVersionOf ec-code:2.7.1.37 GO:0006468 GO:0004716
    k6f = 1; k6b = 0.05;
  dissociation_of_RPLCgP: RPLCgP -> PLCgP + RP; (k7f*RPLCgP - k7b*RP*PLCgP)*compartment;
    k7f = 0.3; k7b = 0.006;
  // Dephosphorylation is irriversible, according to article.
  dephosphorylation_of_PLCgP: PLCgP => PLCg; V8*PLCgP/(K8 + PLCgP)*compartment;  // isVersionOf ec-code:3.1.3.16 GO:0006470
    V8 = 1; K8 = 100;
  binding_of_Grb2_to_RP: Grb + RP -> RG; (k9f*RP*Grb - k9b*RG)*compartment;  // isVersionOf GO:0042169 GO:0051425
    k9f = 0.003; k9b = 0.05;
  binding_of_SOS_to_RG: RG + SOS -> RGS; (k10f*RG*SOS - k10b*RGS)*compartment;  // isVersionOf GO:0005070 GO:0017124 GO:0005068
    k10f = 0.01; k10b = 0.06;
  dissociation_of_RGS: RGS -> GS + RP; (k11f*RGS - k11b*RP*GS)*compartment;
    k11f = 0.03; k11b = 0.0045;
  dissociation_of_GS: GS -> Grb + SOS; (k12f*GS - k12b*Grb*SOS)*compartment;
    k12f = 0.0015; k12b = 0.0001;
  binding_of_Shc_to_RP: Shc + RP -> RSh; (k13f*RP*Shc - k13b*RSh)*compartment;  // isVersionOf GO:0051425 GO:0042169
    k13f = 0.09; k13b = 0.6;
  phosphorylation_of_RSh: RSh -> RShP; (k14f*RSh - k14b*RShP)*compartment;  // isVersionOf ec-code:2.7.1.37 GO:0006468 GO:0004716
    k14f = 6; k14b = 0.06;
  dissociation_of_RShp: RShP -> RP + ShP; (k15f*RShP - k15b*ShP*RP)*compartment;
    k15f = 0.3; k15b = 0.0009;
  // Dephosphorylation is irriversible, according to artical.
  dephosphorylation_of_ShP: ShP => Shc; V16*ShP/(K16 + ShP)*compartment;  // isVersionOf ec-code:3.1.3.16 GO:0006470
    V16 = 1.7; K16 = 340;
  binding_of_Grb2_to_RShP: RShP + Grb -> RShG; (k17f*RShP*Grb - k17b*RShG)*compartment;  // isVersionOf GO:0051425 GO:0042169
    k17f = 0.003; k17b = 0.1;
  dissociation_of_RShG: RShG -> ShG + RP; (k18f*RShG - k18b*RP*ShG)*compartment;
    k18f = 0.3; k18b = 0.0009;
  binding_of_SOS_to_RShG: SOS + RShG -> RShGS; (k19f*RShG*SOS - k19b*RShGS)*compartment;  // isVersionOf GO:0017124 GO:0005070 GO:0005068
    k19f = 0.01; k19b = 0.0214;
  dissociation_of_RShGS: RShGS -> ShGS + RP; (k20f*RShGS - k20b*ShGS*RP)*compartment;
    k20f = 0.12; k20b = 0.00024;
  binding_of_Grb2_to_ShP: Grb + ShP -> ShG; (k21f*ShP*Grb - k21b*ShG)*compartment;  // isVersionOf GO:0051425 GO:0042169
    k21f = 0.003; k21b = 0.1;
  binding_of_SOS_to_ShG: ShG + SOS -> ShGS; (k22f*ShG*SOS - k22b*ShGS)*compartment;  // isVersionOf GO:0017124 GO:0005070
    k22f = 0.03; k22b = 0.064;
  dissociation_of_ShGS: ShGS -> GS + ShP; (k23f*ShGS - k23b*ShP*GS)*compartment;
    k23f = 0.1; k23b = 0.021;
  association_of_RShP_and_GS: RShP + GS -> RShGS; (k24f*RShP*GS - k24b*RShGS)*compartment;  // isVersionOf GO:0051425 GO:0042169
    k24f = 0.009; k24b = 0.0429;
  translocation_of_PLCgP: PLCgP -> PLCgl; (k25f*PLCgP - k25b*PLCgl)*compartment;  // isVersionOf GO:0030845
    k25f = 1; k25b = 0.03;

  // Unit definitions:
  // Default unit of substance redefined to nanomole.
  unit substance = 1e-9 mole; substance is "nanomole";
end
