// SBML level 2 version 2

model whatever()
  // Martins2001_glyoxalase
  // .
  // .
  // .
  // SBML level 2 code generated for the JWS Online project by Jacky Snoep using PySCeS
  // Run this model online at http://jjj.biochem.sun.ac.za
  // To cite JWS Online please refer to: Olivier, B.G. and Snoep, J.L. (2004) Web-based modelling using JWS Online , Bioinformatics, 20:2143-2144
  // .
  // .
  // .
  // .
  // .
  // .
  // This model was created using the reversible Michaelis Menten rate laws and the corresponding parameters from the publication. It is not as such described in the article.
  // This model originates from BioModels Database: A Database of Annotated Published Models (http://www.ebi.ac.uk/biomodels/). It is copyright (c) 2005-2011 The BioModels.net Team.
  // To the extent possible under law, all copyright and related or neighbouring rights to this encoded model have been dedicated to the public domain worldwide. Please refer to CC0 Public Domain Dedication for more information.
  // In summary, you are entitled to use this encoded model in absolutely any manner you deem suitable, verbatim, or with modification, alone or embedded it in a larger context, redistribute it, commercially or not, in a restricted way or not..
  // To cite BioModels Database, please use: Li C, Donizelli M, Rodriguez N, Dharuri H, Endler L, Chelliah V, Li L, He E, Henry A, Stefan MI, Snoep JL, Hucka M, Le Novère N, Laibe C (2010) BioModels Database: An enhanced, curated and annotated resource for published quantitative kinetic models. BMC Syst Biol., 4:92.
  // biomodels.db:MODEL6624199343
  // isDescribedBy pubmed:11453985
  // hasTaxon taxonomy:4932
  // isVersionOf GO:0019244

  // Compartments:
  compartment compartment = 1;  // GO:0005622

  // Species:
  species A in compartment = 10;  // CHEBI:17158
  species B in compartment = 5;  // CHEBI:131710
  species C in compartment = 0;  // CHEBI:15694

  // Reactions:
  reversMA: A -> B; k1f*A - k1r*B;
    k1f = 4; k1r = 2;
  irreversMA: B => C; k2f*B;
    k2f = 6;
end
