// SBML level 2 version 2

model whatever()
  // Martins2001_glyoxalase
  // .
  // .
  // .
  // SBML level 2 code generated for the JWS Online project by Jacky Snoep using PySCeS
  // Run this model online at http://jjj.biochem.sun.ac.za
  // To cite JWS Online please refer to: Olivier, B.G. and Snoep, J.L. (2004) Web-based modelling using JWS Online , Bioinformatics, 20:2143-2144
  // .
  // .
  // .
  // .
  // .
  // .
  // This model was created using the reversible Michaelis Menten rate laws and the corresponding parameters from the publication. It is not as such described in the article.
  // This model originates from BioModels Database: A Database of Annotated Published Models (http://www.ebi.ac.uk/biomodels/). It is copyright (c) 2005-2011 The BioModels.net Team.
  // To the extent possible under law, all copyright and related or neighbouring rights to this encoded model have been dedicated to the public domain worldwide. Please refer to CC0 Public Domain Dedication for more information.
  // In summary, you are entitled to use this encoded model in absolutely any manner you deem suitable, verbatim, or with modification, alone or embedded it in a larger context, redistribute it, commercially or not, in a restricted way or not..
  // To cite BioModels Database, please use: Li C, Donizelli M, Rodriguez N, Dharuri H, Endler L, Chelliah V, Li L, He E, Henry A, Stefan MI, Snoep JL, Hucka M, Le Novère N, Laibe C (2010) BioModels Database: An enhanced, curated and annotated resource for published quantitative kinetic models. BMC Syst Biol., 4:92.
  // biomodels.db:MODEL6624199343
  // isDescribedBy pubmed:11453985
  // hasTaxon taxonomy:4932
  // isVersionOf GO:0019244

  // Compartments:
  compartment compartment = 1;  // GO:0005622

  // Species:
  species GSH in compartment = 0.15;  // CHEBI:16856
  species HTA in compartment = 0;  // CHEBI:131710
  species SLG in compartment = 100;  // CHEBI:15694
  species Lac in compartment = 0;  // CHEBI:16004
  species MG in compartment = 0.01;  // CHEBI:17158
  species ZAZ in compartment = 0.2;  // CHEBI:17234

  // Reactions:
  reversMA: MG + GSH -> HTA; k1neHTA*MG*GSH - k2neHTA*HTA;
    k1neHTA = 8; k2neHTA = 2;
  reversMM: HTA -> SLG; (A*HTA - B*SLG)/(1 + C*HTA + D*SLG);
    A = 2.24686091e3; B = 7.74164835e-1; C = 4.70901709e2; D = 2.65279889e4;
  irreversMM: SLG => Lac; Vm1*SLG*(Km1 + SLG)^(-1);
    Vm1 = 0.5; Km1 = 100;
  irreversMA: Lac => ZAZ; Kf*Lac;
    Kf = 0.16;
end
